// SBML level 3 version 2

model main()

  // Compartments:
  compartment hearth_compartment_876; hearth_compartment_876 is "hearth plasma membrane";  // GO:0005886
  compartment liver_compartment_876; liver_compartment_876 is "liver plasma membrane";  // GO:0005886
  compartment hearth_compartment_70101; hearth_compartment_70101 is "hearth cytosol";  // GO:0005829
  compartment liver_compartment_70101; liver_compartment_70101 is "liver cytosol";  // GO:0005829
  compartment hearth_compartment_984; hearth_compartment_984 is "hearth extracellular region";  // GO:0005576
  compartment liver_compartment_984; liver_compartment_984 is "liver extracellular region";  // GO:0005576

  // Species:
  // Derived from a Reactome DefinedSet. This is a list of alternative entities, any of which can perform the given function
  species hearth_species_1220585 in hearth_compartment_876; hearth_species_1220585 is "hearth Resistant ligand-responsive EGFR mutants [plasma membrane]";  // reactome:R-HSA-1220585; hasPart uniprot:P00533 uniprot:Q16543 uniprot:P07900 uniprot:P01133
  // Derived from a Reactome DefinedSet. This is a list of alternative entities, any of which can perform the given function
  species liver_species_1220585 in liver_compartment_876; liver_species_1220585 is "liver Resistant ligand-responsive EGFR mutants [plasma membrane]";  // reactome:R-HSA-1220585; hasPart uniprot:P00533 uniprot:Q16543 uniprot:P07900 uniprot:P01133
  // Derived from a Reactome Complex. Here is Reactomes nested structure for this complex: (Q13480, P62993). Reactome uses a nested structure for complexes, which cannot be fully represented in SBML Level 3 Version 1 core
  species hearth_species_179849 in hearth_compartment_70101; hearth_species_179849 is "hearth GRB2:GAB1 [cytosol]";  // reactome:R-HSA-179849; hasPart uniprot:Q13480 uniprot:P62993; isHomologTo reactome:R-MMU-179849 reactome:R-RNO-179849 reactome:R-CFA-179849 reactome:R-BTA-179849
  // Derived from a Reactome Complex. Here is Reactomes nested structure for this complex: (Q13480, P62993). Reactome uses a nested structure for complexes, which cannot be fully represented in SBML Level 3 Version 1 core
  species liver_species_179849 in liver_compartment_70101; liver_species_179849 is "liver GRB2:GAB1 [cytosol]";  // reactome:R-HSA-179849; hasPart uniprot:Q13480 uniprot:P62993; isHomologTo reactome:R-MMU-179849 reactome:R-RNO-179849 reactome:R-CFA-179849 reactome:R-BTA-179849
  // Derived from a Reactome Complex. Here is Reactomes nested structure for this complex: (2xP00533, P19174, 4xQ16543, 4xP07900). Reactome uses a nested structure for complexes, which cannot be fully represented in SBML Level 3 Version 1 core
  species hearth_species_5637698 in hearth_compartment_876; hearth_species_5637698 is "hearth p-5Y-EGFRvIII:PLCG1 [plasma membrane]";  // reactome:R-HSA-5637698; hasPart uniprot:P00533 uniprot:P19174 uniprot:Q16543 uniprot:P07900
  // Derived from a Reactome Complex. Here is Reactomes nested structure for this complex: (2xP00533, P19174, 4xQ16543, 4xP07900). Reactome uses a nested structure for complexes, which cannot be fully represented in SBML Level 3 Version 1 core
  species liver_species_5637698 in liver_compartment_876; liver_species_5637698 is "liver p-5Y-EGFRvIII:PLCG1 [plasma membrane]";  // reactome:R-HSA-5637698; hasPart uniprot:P00533 uniprot:P19174 uniprot:Q16543 uniprot:P07900
  // Derived from a Reactome Complex. Here is Reactomes nested structure for this complex: (2xP00533, 4xQ16543, 4xP07900). Reactome uses a nested structure for complexes, which cannot be fully represented in SBML Level 3 Version 1 core
  species hearth_species_1248654 in hearth_compartment_876; hearth_species_1248654 is "hearth p-5Y-EGFRvIII mutant dimer [plasma membrane]";  // reactome:R-HSA-1248654; hasPart uniprot:P00533 uniprot:Q16543 uniprot:P07900
  // Derived from a Reactome Complex. Here is Reactomes nested structure for this complex: (2xP00533, 4xQ16543, 4xP07900). Reactome uses a nested structure for complexes, which cannot be fully represented in SBML Level 3 Version 1 core
  species liver_species_1248654 in liver_compartment_876; liver_species_1248654 is "liver p-5Y-EGFRvIII mutant dimer [plasma membrane]";  // reactome:R-HSA-1248654; hasPart uniprot:P00533 uniprot:Q16543 uniprot:P07900
  // Derived from a Reactome DefinedSet. This is a list of alternative entities, any of which can perform the given function
  species hearth_species_1181062 in hearth_compartment_876; hearth_species_1181062 is "hearth Ligand-responsive p-6Y-EGFR mutant dimers [plasma membrane]";  // reactome:R-HSA-1181062; hasPart uniprot:P00533 uniprot:Q16543 uniprot:P07900 uniprot:P01133
  // Derived from a Reactome DefinedSet. This is a list of alternative entities, any of which can perform the given function
  species liver_species_1181062 in liver_compartment_876; liver_species_1181062 is "liver Ligand-responsive p-6Y-EGFR mutant dimers [plasma membrane]";  // reactome:R-HSA-1181062; hasPart uniprot:P00533 uniprot:Q16543 uniprot:P07900 uniprot:P01133
  // Derived from a Reactome Complex. Here is Reactomes nested structure for this complex: (100xP00533, P19174, 16xQ16543, 16xP07900, 4xP01133). Reactome uses a nested structure for complexes, which cannot be fully represented in SBML Level 3 Version 1 core
  species hearth_species_1247845 in hearth_compartment_876; hearth_species_1247845 is "hearth Ligand-responsive p-6Y-EGFR mutants:PLCG1 [plasma membrane]";  // reactome:R-HSA-1247845; hasPart uniprot:P00533 uniprot:P19174 uniprot:Q16543 uniprot:P07900
  // Derived from a Reactome Complex. Here is Reactomes nested structure for this complex: (100xP00533, P19174, 16xQ16543, 16xP07900, 4xP01133). Reactome uses a nested structure for complexes, which cannot be fully represented in SBML Level 3 Version 1 core
  species liver_species_1247845 in liver_compartment_876; liver_species_1247845 is "liver Ligand-responsive p-6Y-EGFR mutants:PLCG1 [plasma membrane]";  // reactome:R-HSA-1247845; hasPart uniprot:P00533 uniprot:P19174 uniprot:Q16543 uniprot:P07900
  // Derived from a Reactome Complex. Here is Reactomes nested structure for this complex: (50xP00533, 8xQ16543, 8xP07900, 4xP01133). Reactome uses a nested structure for complexes, which cannot be fully represented in SBML Level 3 Version 1 core
  species hearth_species_1500847 in hearth_compartment_876; hearth_species_1500847 is "hearth EGF:Ligand-responsive EGFR mutants dimer [plasma membrane]";  // reactome:R-HSA-1500847; hasPart uniprot:P00533 uniprot:Q16543 uniprot:P07900 uniprot:P01133
  // Derived from a Reactome Complex. Here is Reactomes nested structure for this complex: (50xP00533, 8xQ16543, 8xP07900, 4xP01133). Reactome uses a nested structure for complexes, which cannot be fully represented in SBML Level 3 Version 1 core
  species liver_species_1500847 in liver_compartment_876; liver_species_1500847 is "liver EGF:Ligand-responsive EGFR mutants dimer [plasma membrane]";  // reactome:R-HSA-1500847; hasPart uniprot:P00533 uniprot:Q16543 uniprot:P07900 uniprot:P01133
  // Derived from a Reactome Complex. Here is Reactomes nested structure for this complex: (50xP00533, 8xQ16543, 8xP07900). Reactome uses a nested structure for complexes, which cannot be fully represented in SBML Level 3 Version 1 core
  species hearth_species_1500849 in hearth_compartment_876; hearth_species_1500849 is "hearth Ligand-responsive EGFR mutants dimer [plasma membrane]";  // reactome:R-HSA-1500849; hasPart uniprot:P00533 uniprot:Q16543 uniprot:P07900
  // Derived from a Reactome Complex. Here is Reactomes nested structure for this complex: (50xP00533, 8xQ16543, 8xP07900). Reactome uses a nested structure for complexes, which cannot be fully represented in SBML Level 3 Version 1 core
  species liver_species_1500849 in liver_compartment_876; liver_species_1500849 is "liver Ligand-responsive EGFR mutants dimer [plasma membrane]";  // reactome:R-HSA-1500849; hasPart uniprot:P00533 uniprot:Q16543 uniprot:P07900
  // Derived from a Reactome Complex. Here is Reactomes nested structure for this complex: (P01111, P01116, P01112, P01116, 37565). Reactome uses a nested structure for complexes, which cannot be fully represented in SBML Level 3 Version 1 core
  species hearth_species_109783 in hearth_compartment_876; hearth_species_109783 is "hearth p21 RAS:GTP [plasma membrane]";  // reactome:R-HSA-109783; hasPart uniprot:P01111 uniprot:P01116 uniprot:P01112 CHEBI:37565; isHomologTo reactome:R-MMU-109783 reactome:R-RNO-109783 reactome:R-CFA-109783 reactome:R-BTA-109783
  // Derived from a Reactome Complex. Here is Reactomes nested structure for this complex: (P01111, P01116, P01112, P01116, 37565). Reactome uses a nested structure for complexes, which cannot be fully represented in SBML Level 3 Version 1 core
  species liver_species_109783 in liver_compartment_876; liver_species_109783 is "liver p21 RAS:GTP [plasma membrane]";  // reactome:R-HSA-109783; hasPart uniprot:P01111 uniprot:P01116 uniprot:P01112 CHEBI:37565; isHomologTo reactome:R-MMU-109783 reactome:R-RNO-109783 reactome:R-CFA-109783 reactome:R-BTA-109783
  // Derived from a Reactome DefinedSet. This is a list of alternative entities, any of which can perform the given function
  species hearth_species_1217511 in hearth_compartment_70101; hearth_species_1217511 is "hearth Benzoquinoid ansamycins [cytosol]";  // isDescribedBy pubmed:16024644; reactome:R-ALL-1217511; hasPart iuphar.ligand:7751 iuphar.ligand:5984 iuphar.ligand:9829 iuphar.ligand:9827
  // Derived from a Reactome DefinedSet. This is a list of alternative entities, any of which can perform the given function
  species liver_species_1217511 in liver_compartment_70101; liver_species_1217511 is "liver Benzoquinoid ansamycins [cytosol]";  // isDescribedBy pubmed:16024644; reactome:R-ALL-1217511; hasPart iuphar.ligand:7751 iuphar.ligand:5984 iuphar.ligand:9829 iuphar.ligand:9827
  // Derived from a Reactome Complex. Here is Reactomes nested structure for this complex: (100xP00533, P19174, 16xQ16543, 16xP07900, 4xP01133). Reactome uses a nested structure for complexes, which cannot be fully represented in SBML Level 3 Version 1 core
  species hearth_species_1247846 in hearth_compartment_876; hearth_species_1247846 is "hearth Ligand-responsive p-6Y-EGFR mutants:p-Y472,771,783,1254-PLCG1 [plasma membrane]";  // reactome:R-HSA-1247846; hasPart uniprot:P00533 uniprot:P19174 uniprot:Q16543 uniprot:P07900
  // Derived from a Reactome Complex. Here is Reactomes nested structure for this complex: (100xP00533, P19174, 16xQ16543, 16xP07900, 4xP01133). Reactome uses a nested structure for complexes, which cannot be fully represented in SBML Level 3 Version 1 core
  species liver_species_1247846 in liver_compartment_876; liver_species_1247846 is "liver Ligand-responsive p-6Y-EGFR mutants:p-Y472,771,783,1254-PLCG1 [plasma membrane]";  // reactome:R-HSA-1247846; hasPart uniprot:P00533 uniprot:P19174 uniprot:Q16543 uniprot:P07900
  // Derived from a Reactome Complex. Here is Reactomes nested structure for this complex: (2xO14944, 2xP00533, 2xQ99075, 2xP35070, 2xQ6UW88, 2xP15514, 2xP01135, 2xP01133). Reactome uses a nested structure for complexes, which cannot be fully represented in SBML Level 3 Version 1 core
  species hearth_species_9624420 in hearth_compartment_876; hearth_species_9624420 is "hearth EGF-like ligands:EGFR dimer [plasma membrane]";  // reactome:R-HSA-9624420; hasPart uniprot:O14944 uniprot:P00533 uniprot:Q99075 uniprot:P35070; isHomologTo reactome:R-MMU-9624420 reactome:R-RNO-9624420 reactome:R-CFA-9624420 reactome:R-BTA-9624420
  // Derived from a Reactome Complex. Here is Reactomes nested structure for this complex: (2xO14944, 2xP00533, 2xQ99075, 2xP35070, 2xQ6UW88, 2xP15514, 2xP01135, 2xP01133). Reactome uses a nested structure for complexes, which cannot be fully represented in SBML Level 3 Version 1 core
  species liver_species_9624420 in liver_compartment_876; liver_species_9624420 is "liver EGF-like ligands:EGFR dimer [plasma membrane]";  // reactome:R-HSA-9624420; hasPart uniprot:O14944 uniprot:P00533 uniprot:Q99075 uniprot:P35070; isHomologTo reactome:R-MMU-9624420 reactome:R-RNO-9624420 reactome:R-CFA-9624420 reactome:R-BTA-9624420
  // Derived from a Reactome SimpleEntity. This is a small compound
  species hearth_species_179856 in hearth_compartment_876; hearth_species_179856 is "hearth PI(4,5)P2 [plasma membrane]";  // CHEBI:58456 reactome:R-ALL-179856
  // Derived from a Reactome SimpleEntity. This is a small compound
  species liver_species_179856 in liver_compartment_876; liver_species_179856 is "liver PI(4,5)P2 [plasma membrane]";  // CHEBI:58456 reactome:R-ALL-179856
  // Derived from a Reactome EntityWithAccessionedSequence. This is a protein
  species hearth_species_179863 in hearth_compartment_984; hearth_species_179863 is "hearth EGF [extracellular region]";  // uniprot:P01133 reactome:R-HSA-179863; isHomologTo reactome:R-MMU-179863 reactome:R-RNO-179863 reactome:R-CFA-179863 reactome:R-SSC-179863
  // Derived from a Reactome EntityWithAccessionedSequence. This is a protein
  species liver_species_179863 in liver_compartment_984; liver_species_179863 is "liver EGF [extracellular region]";  // uniprot:P01133 reactome:R-HSA-179863; isHomologTo reactome:R-MMU-179863 reactome:R-RNO-179863 reactome:R-CFA-179863 reactome:R-SSC-179863
  // Derived from a Reactome DefinedSet. This is a list of alternative entities, any of which can perform the given function
  species hearth_species_1216522 in hearth_compartment_70101; hearth_species_1216522 is "hearth Covalent EGFR tyrosine kinase inhibitors [cytosol]";  // reactome:R-ALL-1216522; hasPart iuphar.ligand:7644 iuphar.ligand:5667 iuphar.ligand:5675 iuphar.ligand:5686
  // Derived from a Reactome DefinedSet. This is a list of alternative entities, any of which can perform the given function
  species liver_species_1216522 in liver_compartment_70101; liver_species_1216522 is "liver Covalent EGFR tyrosine kinase inhibitors [cytosol]";  // reactome:R-ALL-1216522; hasPart iuphar.ligand:7644 iuphar.ligand:5667 iuphar.ligand:5675 iuphar.ligand:5686
  // Derived from a Reactome Complex. Here is Reactomes nested structure for this complex: (100xP00533, 16xQ16543, 16xP07900, 4xP01133, P29353). Reactome uses a nested structure for complexes, which cannot be fully represented in SBML Level 3 Version 1 core
  species hearth_species_1225858 in hearth_compartment_876; hearth_species_1225858 is "hearth Ligand-responsive p-6Y-EGFR mutants:SHC1 [plasma membrane]";  // reactome:R-HSA-1225858; hasPart uniprot:P00533 uniprot:Q16543 uniprot:P07900 uniprot:P01133
  // Derived from a Reactome Complex. Here is Reactomes nested structure for this complex: (100xP00533, 16xQ16543, 16xP07900, 4xP01133, P29353). Reactome uses a nested structure for complexes, which cannot be fully represented in SBML Level 3 Version 1 core
  species liver_species_1225858 in liver_compartment_876; liver_species_1225858 is "liver Ligand-responsive p-6Y-EGFR mutants:SHC1 [plasma membrane]";  // reactome:R-HSA-1225858; hasPart uniprot:P00533 uniprot:Q16543 uniprot:P07900 uniprot:P01133
  // Derived from a Reactome EntityWithAccessionedSequence. This is a protein
  species hearth_species_167679 in hearth_compartment_876; hearth_species_167679 is "hearth p-4Y-PLCG1 [plasma membrane]";  // uniprot:P19174 reactome:R-HSA-167679; isHomologTo reactome:R-MMU-167679 reactome:R-RNO-167679 reactome:R-CFA-167679 reactome:R-BTA-167679
  // Derived from a Reactome EntityWithAccessionedSequence. This is a protein
  species liver_species_167679 in liver_compartment_876; liver_species_167679 is "liver p-4Y-PLCG1 [plasma membrane]";  // uniprot:P19174 reactome:R-HSA-167679; isHomologTo reactome:R-MMU-167679 reactome:R-RNO-167679 reactome:R-CFA-167679 reactome:R-BTA-167679
  // Derived from a Reactome SimpleEntity. This is a small compound
  species hearth_species_29370 in hearth_compartment_70101; hearth_species_29370 is "hearth ADP [cytosol]";  // CHEBI:456216 reactome:R-ALL-29370
  // Derived from a Reactome SimpleEntity. This is a small compound
  species liver_species_29370 in liver_compartment_70101; liver_species_29370 is "liver ADP [cytosol]";  // CHEBI:456216 reactome:R-ALL-29370
  // Derived from a Reactome Complex. Here is Reactomes nested structure for this complex: (100xP00533, 16xQ16543, 16xP07900, 4xP01133, P29353). Reactome uses a nested structure for complexes, which cannot be fully represented in SBML Level 3 Version 1 core
  species hearth_species_1225854 in hearth_compartment_876; hearth_species_1225854 is "hearth Ligand-responsive p-6Y-EGFR mutants:p-Y349,350-SHC1 [plasma membrane]";  // reactome:R-HSA-1225854; hasPart uniprot:P00533 uniprot:Q16543 uniprot:P07900 uniprot:P01133
  // Derived from a Reactome Complex. Here is Reactomes nested structure for this complex: (100xP00533, 16xQ16543, 16xP07900, 4xP01133, P29353). Reactome uses a nested structure for complexes, which cannot be fully represented in SBML Level 3 Version 1 core
  species liver_species_1225854 in liver_compartment_876; liver_species_1225854 is "liver Ligand-responsive p-6Y-EGFR mutants:p-Y349,350-SHC1 [plasma membrane]";  // reactome:R-HSA-1225854; hasPart uniprot:P00533 uniprot:Q16543 uniprot:P07900 uniprot:P01133
  // Derived from a Reactome Complex. Here is Reactomes nested structure for this complex: (2x5692, 76xP00533, 2x4920, 2x4941, 2x5717, 8xQ16543, 8xP07900, 2xP01133). Reactome uses a nested structure for complexes, which cannot be fully represented in SBML Level 3 Version 1 core
  species hearth_species_1220587 in hearth_compartment_876; hearth_species_1220587 is "hearth Sensitive ligand-responsive EGFR mutants:Non-covalent EGFR TKIs [plasma membrane]";  // reactome:R-HSA-1220587; hasPart iuphar.ligand:5692 uniprot:P00533 iuphar.ligand:4920 iuphar.ligand:4941
  // Derived from a Reactome Complex. Here is Reactomes nested structure for this complex: (2x5692, 76xP00533, 2x4920, 2x4941, 2x5717, 8xQ16543, 8xP07900, 2xP01133). Reactome uses a nested structure for complexes, which cannot be fully represented in SBML Level 3 Version 1 core
  species liver_species_1220587 in liver_compartment_876; liver_species_1220587 is "liver Sensitive ligand-responsive EGFR mutants:Non-covalent EGFR TKIs [plasma membrane]";  // reactome:R-HSA-1220587; hasPart iuphar.ligand:5692 uniprot:P00533 iuphar.ligand:4920 iuphar.ligand:4941
  // Derived from a Reactome EntityWithAccessionedSequence. This is a protein
  species hearth_species_167682 in hearth_compartment_876; hearth_species_167682 is "hearth PLCG1 [plasma membrane]";  // uniprot:P19174 reactome:R-HSA-167682; isHomologTo reactome:R-MMU-167682 reactome:R-RNO-167682 reactome:R-CFA-167682 reactome:R-BTA-167682
  // Derived from a Reactome EntityWithAccessionedSequence. This is a protein
  species liver_species_167682 in liver_compartment_876; liver_species_167682 is "liver PLCG1 [plasma membrane]";  // uniprot:P19174 reactome:R-HSA-167682; isHomologTo reactome:R-MMU-167682 reactome:R-RNO-167682 reactome:R-CFA-167682 reactome:R-BTA-167682
  // Derived from a Reactome DefinedSet. This is a list of alternative entities, any of which can perform the given function
  species hearth_species_1220578 in hearth_compartment_876; hearth_species_1220578 is "hearth EGF:Ligand-responsive EGFR mutants:HSP90:CDC37 [plasma membrane]";  // reactome:R-HSA-1220578; hasPart uniprot:P00533 uniprot:Q16543 uniprot:P07900 uniprot:P01133
  // Derived from a Reactome DefinedSet. This is a list of alternative entities, any of which can perform the given function
  species liver_species_1220578 in liver_compartment_876; liver_species_1220578 is "liver EGF:Ligand-responsive EGFR mutants:HSP90:CDC37 [plasma membrane]";  // reactome:R-HSA-1220578; hasPart uniprot:P00533 uniprot:Q16543 uniprot:P07900 uniprot:P01133
  // Derived from a Reactome DefinedSet. This is a list of alternative entities, any of which can perform the given function
  species hearth_species_1218825 in hearth_compartment_876; hearth_species_1218825 is "hearth Ligand-responsive EGFR mutants:HSP90:CDC37 [plasma membrane]";  // reactome:R-HSA-1218825; hasPart uniprot:P00533 uniprot:Q16543 uniprot:P07900
  // Derived from a Reactome DefinedSet. This is a list of alternative entities, any of which can perform the given function
  species liver_species_1218825 in liver_compartment_876; liver_species_1218825 is "liver Ligand-responsive EGFR mutants:HSP90:CDC37 [plasma membrane]";  // reactome:R-HSA-1218825; hasPart uniprot:P00533 uniprot:Q16543 uniprot:P07900
  // Derived from a Reactome SimpleEntity. This is a small compound
  species hearth_species_29420 in hearth_compartment_70101; hearth_species_29420 is "hearth GDP [cytosol]";  // CHEBI:58189 reactome:R-ALL-29420
  // Derived from a Reactome SimpleEntity. This is a small compound
  species liver_species_29420 in liver_compartment_70101; liver_species_29420 is "liver GDP [cytosol]";  // CHEBI:58189 reactome:R-ALL-29420
  // Derived from a Reactome Complex. Here is Reactomes nested structure for this complex: (2xP22681, 100xP00533, 16xQ16543, 16xP07900, 4xP01133). Reactome uses a nested structure for complexes, which cannot be fully represented in SBML Level 3 Version 1 core
  species hearth_species_1225857 in hearth_compartment_876; hearth_species_1225857 is "hearth Ligand-responsive p-6Y-EGFR mutants:p-Y371-CBL [plasma membrane]";  // reactome:R-HSA-1225857; hasPart uniprot:P22681 uniprot:P00533 uniprot:Q16543 uniprot:P07900
  // Derived from a Reactome Complex. Here is Reactomes nested structure for this complex: (2xP22681, 100xP00533, 16xQ16543, 16xP07900, 4xP01133). Reactome uses a nested structure for complexes, which cannot be fully represented in SBML Level 3 Version 1 core
  species liver_species_1225857 in liver_compartment_876; liver_species_1225857 is "liver Ligand-responsive p-6Y-EGFR mutants:p-Y371-CBL [plasma membrane]";  // reactome:R-HSA-1225857; hasPart uniprot:P22681 uniprot:P00533 uniprot:Q16543 uniprot:P07900
  // Derived from a Reactome Complex. Here is Reactomes nested structure for this complex: (2xP00533, 4xQ16543, 4xP07900, P29353). Reactome uses a nested structure for complexes, which cannot be fully represented in SBML Level 3 Version 1 core
  species hearth_species_5637701 in hearth_compartment_876; hearth_species_5637701 is "hearth p-5Y-EGFRvIII:SHC1 [plasma membrane]";  // reactome:R-HSA-5637701; hasPart uniprot:P00533 uniprot:Q16543 uniprot:P07900 uniprot:P29353
  // Derived from a Reactome Complex. Here is Reactomes nested structure for this complex: (2xP00533, 4xQ16543, 4xP07900, P29353). Reactome uses a nested structure for complexes, which cannot be fully represented in SBML Level 3 Version 1 core
  species liver_species_5637701 in liver_compartment_876; liver_species_5637701 is "liver p-5Y-EGFRvIII:SHC1 [plasma membrane]";  // reactome:R-HSA-5637701; hasPart uniprot:P00533 uniprot:Q16543 uniprot:P07900 uniprot:P29353
  // Derived from a Reactome Complex. Here is Reactomes nested structure for this complex: (P42336, 2xP00533, 4xQ16543, 4xP07900, Q13480, P62993, P27986). Reactome uses a nested structure for complexes, which cannot be fully represented in SBML Level 3 Version 1 core
  species hearth_species_5637693 in hearth_compartment_876; hearth_species_5637693 is "hearth p-5Y-EGFRvIII:GRB2:GAB1:PI3K [plasma membrane]";  // reactome:R-HSA-5637693; hasPart uniprot:P42336 uniprot:P00533 uniprot:Q16543 uniprot:P07900
  // Derived from a Reactome Complex. Here is Reactomes nested structure for this complex: (P42336, 2xP00533, 4xQ16543, 4xP07900, Q13480, P62993, P27986). Reactome uses a nested structure for complexes, which cannot be fully represented in SBML Level 3 Version 1 core
  species liver_species_5637693 in liver_compartment_876; liver_species_5637693 is "liver p-5Y-EGFRvIII:GRB2:GAB1:PI3K [plasma membrane]";  // reactome:R-HSA-5637693; hasPart uniprot:P42336 uniprot:P00533 uniprot:Q16543 uniprot:P07900
  // Derived from a Reactome Complex. Here is Reactomes nested structure for this complex: (2xP00533, Q07889, 4xQ16543, 4xP07900, P62993). Reactome uses a nested structure for complexes, which cannot be fully represented in SBML Level 3 Version 1 core
  species hearth_species_5637697 in hearth_compartment_876; hearth_species_5637697 is "hearth p-5Y-EGFRvIII:GRB2:SOS1 [plasma membrane]";  // reactome:R-HSA-5637697; hasPart uniprot:P00533 uniprot:Q07889 uniprot:Q16543 uniprot:P07900
  // Derived from a Reactome Complex. Here is Reactomes nested structure for this complex: (2xP00533, Q07889, 4xQ16543, 4xP07900, P62993). Reactome uses a nested structure for complexes, which cannot be fully represented in SBML Level 3 Version 1 core
  species liver_species_5637697 in liver_compartment_876; liver_species_5637697 is "liver p-5Y-EGFRvIII:GRB2:SOS1 [plasma membrane]";  // reactome:R-HSA-5637697; hasPart uniprot:P00533 uniprot:Q07889 uniprot:Q16543 uniprot:P07900
  // Derived from a Reactome DefinedSet. This is a list of alternative entities, any of which can perform the given function
  species hearth_species_113595 in hearth_compartment_70101; hearth_species_113595 is "hearth Ub [cytosol]";  // reactome:R-HSA-113595; hasPart uniprot:P0CG48 uniprot:P0CG47 uniprot:P62979 uniprot:P62987; isHomologTo reactome:R-MMU-113595 reactome:R-RNO-113595 reactome:R-CFA-113595 reactome:R-BTA-113595
  // Derived from a Reactome DefinedSet. This is a list of alternative entities, any of which can perform the given function
  species liver_species_113595 in liver_compartment_70101; liver_species_113595 is "liver Ub [cytosol]";  // reactome:R-HSA-113595; hasPart uniprot:P0CG48 uniprot:P0CG47 uniprot:P62979 uniprot:P62987; isHomologTo reactome:R-MMU-113595 reactome:R-RNO-113595 reactome:R-CFA-113595 reactome:R-BTA-113595
  // Derived from a Reactome Complex. Here is Reactomes nested structure for this complex: (2x7751, 2x5984, 2x9829, 2xP07900, 2x9827, 2x9828). Reactome uses a nested structure for complexes, which cannot be fully represented in SBML Level 3 Version 1 core
  species hearth_species_1218829 in hearth_compartment_70101; hearth_species_1218829 is "hearth HSP90:Benzoquinoid ansamycins [cytosol]";  // reactome:R-HSA-1218829; hasPart iuphar.ligand:7751 iuphar.ligand:5984 iuphar.ligand:9829 uniprot:P07900
  // Derived from a Reactome Complex. Here is Reactomes nested structure for this complex: (2x7751, 2x5984, 2x9829, 2xP07900, 2x9827, 2x9828). Reactome uses a nested structure for complexes, which cannot be fully represented in SBML Level 3 Version 1 core
  species liver_species_1218829 in liver_compartment_70101; liver_species_1218829 is "liver HSP90:Benzoquinoid ansamycins [cytosol]";  // reactome:R-HSA-1218829; hasPart iuphar.ligand:7751 iuphar.ligand:5984 iuphar.ligand:9829 uniprot:P07900
  // Derived from a Reactome Complex. Here is Reactomes nested structure for this complex: (2xP00533, 4xQ16543, 4xP07900, P29353). Reactome uses a nested structure for complexes, which cannot be fully represented in SBML Level 3 Version 1 core
  species hearth_species_5637703 in hearth_compartment_876; hearth_species_5637703 is "hearth p-5Y-EGFRvIII:p-Y349,Y350-SHC1 [plasma membrane]";  // reactome:R-HSA-5637703; hasPart uniprot:P00533 uniprot:Q16543 uniprot:P07900 uniprot:P29353
  // Derived from a Reactome Complex. Here is Reactomes nested structure for this complex: (2xP00533, 4xQ16543, 4xP07900, P29353). Reactome uses a nested structure for complexes, which cannot be fully represented in SBML Level 3 Version 1 core
  species liver_species_5637703 in liver_compartment_876; liver_species_5637703 is "liver p-5Y-EGFRvIII:p-Y349,Y350-SHC1 [plasma membrane]";  // reactome:R-HSA-5637703; hasPart uniprot:P00533 uniprot:Q16543 uniprot:P07900 uniprot:P29353
  // Derived from a Reactome Complex. Here is Reactomes nested structure for this complex: (24xP00533, 2x7644, 2x5667, 2x5675, 8xQ16543, 8xP07900, 2xP01133, 2x5686, 2x9176). Reactome uses a nested structure for complexes, which cannot be fully represented in SBML Level 3 Version 1 core
  species hearth_species_1220579 in hearth_compartment_876; hearth_species_1220579 is "hearth Resistant ligand-responsive EGFR mutants:Covalent EGFR TKIs [plasma membrane]";  // reactome:R-HSA-1220579; hasPart uniprot:P00533 iuphar.ligand:7644 iuphar.ligand:5667 iuphar.ligand:5675
  // Derived from a Reactome Complex. Here is Reactomes nested structure for this complex: (24xP00533, 2x7644, 2x5667, 2x5675, 8xQ16543, 8xP07900, 2xP01133, 2x5686, 2x9176). Reactome uses a nested structure for complexes, which cannot be fully represented in SBML Level 3 Version 1 core
  species liver_species_1220579 in liver_compartment_876; liver_species_1220579 is "liver Resistant ligand-responsive EGFR mutants:Covalent EGFR TKIs [plasma membrane]";  // reactome:R-HSA-1220579; hasPart uniprot:P00533 iuphar.ligand:7644 iuphar.ligand:5667 iuphar.ligand:5675
  // Derived from a Reactome Complex. Here is Reactomes nested structure for this complex: (P42336, P27986). Reactome uses a nested structure for complexes, which cannot be fully represented in SBML Level 3 Version 1 core
  species hearth_species_1806218 in hearth_compartment_70101; hearth_species_1806218 is "hearth PIK3CA:PIK3R1 [cytosol]";  // reactome:R-HSA-1806218; hasPart uniprot:P42336 uniprot:P27986; isHomologTo reactome:R-MMU-1806218 reactome:R-RNO-1806218 reactome:R-CFA-1806218 reactome:R-BTA-1806218
  // Derived from a Reactome Complex. Here is Reactomes nested structure for this complex: (P42336, P27986). Reactome uses a nested structure for complexes, which cannot be fully represented in SBML Level 3 Version 1 core
  species liver_species_1806218 in liver_compartment_70101; liver_species_1806218 is "liver PIK3CA:PIK3R1 [cytosol]";  // reactome:R-HSA-1806218; hasPart uniprot:P42336 uniprot:P27986; isHomologTo reactome:R-MMU-1806218 reactome:R-RNO-1806218 reactome:R-CFA-1806218 reactome:R-BTA-1806218
  // Derived from a Reactome Complex. Here is Reactomes nested structure for this complex: (100xP00533, 16xQ16543, 16xP07900, Q13480, P62993, 4xP01133). Reactome uses a nested structure for complexes, which cannot be fully represented in SBML Level 3 Version 1 core
  species hearth_species_1226015 in hearth_compartment_876; hearth_species_1226015 is "hearth Ligand-responsive p-6Y-EGFR mutants:GRB2:GAB1 [plasma membrane]";  // reactome:R-HSA-1226015; hasPart uniprot:P00533 uniprot:Q16543 uniprot:P07900 uniprot:Q13480
  // Derived from a Reactome Complex. Here is Reactomes nested structure for this complex: (100xP00533, 16xQ16543, 16xP07900, Q13480, P62993, 4xP01133). Reactome uses a nested structure for complexes, which cannot be fully represented in SBML Level 3 Version 1 core
  species liver_species_1226015 in liver_compartment_876; liver_species_1226015 is "liver Ligand-responsive p-6Y-EGFR mutants:GRB2:GAB1 [plasma membrane]";  // reactome:R-HSA-1226015; hasPart uniprot:P00533 uniprot:Q16543 uniprot:P07900 uniprot:Q13480
  // Derived from a Reactome Complex. Here is Reactomes nested structure for this complex: (100xP00533, Q07889, 16xQ16543, 16xP07900, 4xP01133, P62993). Reactome uses a nested structure for complexes, which cannot be fully represented in SBML Level 3 Version 1 core
  species hearth_species_1225859 in hearth_compartment_876; hearth_species_1225859 is "hearth Ligand-responsive p-6Y-EGFR mutants:GRB2:SOS1 [plasma membrane]";  // reactome:R-HSA-1225859; hasPart uniprot:P00533 uniprot:Q07889 uniprot:Q16543 uniprot:P07900
  // Derived from a Reactome Complex. Here is Reactomes nested structure for this complex: (100xP00533, Q07889, 16xQ16543, 16xP07900, 4xP01133, P62993). Reactome uses a nested structure for complexes, which cannot be fully represented in SBML Level 3 Version 1 core
  species liver_species_1225859 in liver_compartment_876; liver_species_1225859 is "liver Ligand-responsive p-6Y-EGFR mutants:GRB2:SOS1 [plasma membrane]";  // reactome:R-HSA-1225859; hasPart uniprot:P00533 uniprot:Q07889 uniprot:Q16543 uniprot:P07900
  // Derived from a Reactome SimpleEntity. This is a small compound
  species hearth_species_113592 in hearth_compartment_70101; hearth_species_113592 is "hearth ATP [cytosol]";  // CHEBI:30616 reactome:R-ALL-113592
  // Derived from a Reactome SimpleEntity. This is a small compound
  species liver_species_113592 in liver_compartment_70101; liver_species_113592 is "liver ATP [cytosol]";  // CHEBI:30616 reactome:R-ALL-113592
  // Derived from a Reactome SimpleEntity. This is a small compound
  species hearth_species_179838 in hearth_compartment_876; hearth_species_179838 is "hearth PI(3,4,5)P3 [plasma membrane]";  // CHEBI:57836 reactome:R-ALL-179838
  // Derived from a Reactome SimpleEntity. This is a small compound
  species liver_species_179838 in liver_compartment_876; liver_species_179838 is "liver PI(3,4,5)P3 [plasma membrane]";  // CHEBI:57836 reactome:R-ALL-179838
  // Derived from a Reactome Complex. Here is Reactomes nested structure for this complex: (2xP00533, Q07889, 4xQ16543, 4xP07900, P29353, P62993). Reactome uses a nested structure for complexes, which cannot be fully represented in SBML Level 3 Version 1 core
  species hearth_species_5637704 in hearth_compartment_876; hearth_species_5637704 is "hearth p-5Y-EGFRvIII:p-Y349,Y350-SHC1:GRB2:SOS1 [plasma membrane]";  // reactome:R-HSA-5637704; hasPart uniprot:P00533 uniprot:Q07889 uniprot:Q16543 uniprot:P07900
  // Derived from a Reactome Complex. Here is Reactomes nested structure for this complex: (2xP00533, Q07889, 4xQ16543, 4xP07900, P29353, P62993). Reactome uses a nested structure for complexes, which cannot be fully represented in SBML Level 3 Version 1 core
  species liver_species_5637704 in liver_compartment_876; liver_species_5637704 is "liver p-5Y-EGFRvIII:p-Y349,Y350-SHC1:GRB2:SOS1 [plasma membrane]";  // reactome:R-HSA-5637704; hasPart uniprot:P00533 uniprot:Q07889 uniprot:Q16543 uniprot:P07900
  // Derived from a Reactome SimpleEntity. This is a small compound
  species hearth_species_29438 in hearth_compartment_70101; hearth_species_29438 is "hearth GTP [cytosol]";  // CHEBI:37565 reactome:R-ALL-29438
  // Derived from a Reactome SimpleEntity. This is a small compound
  species liver_species_29438 in liver_compartment_70101; liver_species_29438 is "liver GTP [cytosol]";  // CHEBI:37565 reactome:R-ALL-29438
  // Derived from a Reactome Complex. Here is Reactomes nested structure for this complex: (2xP22681, 100xP00533, 16xQ16543, 16xP07900, 4xP01133). Reactome uses a nested structure for complexes, which cannot be fully represented in SBML Level 3 Version 1 core
  species hearth_species_1225855 in hearth_compartment_876; hearth_species_1225855 is "hearth Ligand-responsive p-6Y-EGFR mutants:CBL [plasma membrane]";  // reactome:R-HSA-1225855; hasPart uniprot:P22681 uniprot:P00533 uniprot:Q16543 uniprot:P07900
  // Derived from a Reactome Complex. Here is Reactomes nested structure for this complex: (2xP22681, 100xP00533, 16xQ16543, 16xP07900, 4xP01133). Reactome uses a nested structure for complexes, which cannot be fully represented in SBML Level 3 Version 1 core
  species liver_species_1225855 in liver_compartment_876; liver_species_1225855 is "liver Ligand-responsive p-6Y-EGFR mutants:CBL [plasma membrane]";  // reactome:R-HSA-1225855; hasPart uniprot:P22681 uniprot:P00533 uniprot:Q16543 uniprot:P07900
  // Derived from a Reactome ProteinDrug. A drug
  species hearth_species_1248673 in hearth_compartment_984; hearth_species_1248673 is "hearth Cetuximab [extracellular region]";  // iuphar.ligand:6882 reactome:R-ALL-1248673
  // Derived from a Reactome ProteinDrug. A drug
  species liver_species_1248673 in liver_compartment_984; liver_species_1248673 is "liver Cetuximab [extracellular region]";  // iuphar.ligand:6882 reactome:R-ALL-1248673
  // Derived from a Reactome DefinedSet. This is a list of alternative entities, any of which can perform the given function
  species hearth_species_1216523 in hearth_compartment_70101; hearth_species_1216523 is "hearth Non-covalent EGFR tyrosine kinase inhibitors [cytosol]";  // reactome:R-ALL-1216523; hasPart iuphar.ligand:5692 iuphar.ligand:4920 iuphar.ligand:4941 iuphar.ligand:5717
  // Derived from a Reactome DefinedSet. This is a list of alternative entities, any of which can perform the given function
  species liver_species_1216523 in liver_compartment_70101; liver_species_1216523 is "liver Non-covalent EGFR tyrosine kinase inhibitors [cytosol]";  // reactome:R-ALL-1216523; hasPart iuphar.ligand:5692 iuphar.ligand:4920 iuphar.ligand:4941 iuphar.ligand:5717
  // Derived from a Reactome EntityWithAccessionedSequence. This is a protein
  species hearth_species_112199 in hearth_compartment_70101; hearth_species_112199 is "hearth CBL [cytosol]";  // uniprot:P22681 reactome:R-HSA-112199; isHomologTo reactome:R-MMU-112199 reactome:R-RNO-112199 reactome:R-CFA-112199 reactome:R-BTA-112199
  // Derived from a Reactome EntityWithAccessionedSequence. This is a protein
  species liver_species_112199 in liver_compartment_70101; liver_species_112199 is "liver CBL [cytosol]";  // uniprot:P22681 reactome:R-HSA-112199; isHomologTo reactome:R-MMU-112199 reactome:R-RNO-112199 reactome:R-CFA-112199 reactome:R-BTA-112199
  // Derived from a Reactome Complex. Here is Reactomes nested structure for this complex: (P00533, 2xQ16543, 2xP07900). Reactome uses a nested structure for complexes, which cannot be fully represented in SBML Level 3 Version 1 core
  species hearth_species_1248004 in hearth_compartment_876; hearth_species_1248004 is "hearth EGFRvIII mutant:HSP90:CDC37 [plasma membrane]";  // reactome:R-HSA-1248004; hasPart uniprot:P00533 uniprot:Q16543 uniprot:P07900
  // Derived from a Reactome Complex. Here is Reactomes nested structure for this complex: (P00533, 2xQ16543, 2xP07900). Reactome uses a nested structure for complexes, which cannot be fully represented in SBML Level 3 Version 1 core
  species liver_species_1248004 in liver_compartment_876; liver_species_1248004 is "liver EGFRvIII mutant:HSP90:CDC37 [plasma membrane]";  // reactome:R-HSA-1248004; hasPart uniprot:P00533 uniprot:Q16543 uniprot:P07900
  // Derived from a Reactome EntityWithAccessionedSequence. This is a protein
  species hearth_species_74680 in hearth_compartment_70101; hearth_species_74680 is "hearth SHC1 [cytosol]";  // uniprot:P29353 reactome:R-HSA-74680; isHomologTo reactome:R-MMU-74680 reactome:R-RNO-74680 reactome:R-CFA-74680 reactome:R-BTA-74680
  // Derived from a Reactome EntityWithAccessionedSequence. This is a protein
  species liver_species_74680 in liver_compartment_70101; liver_species_74680 is "liver SHC1 [cytosol]";  // uniprot:P29353 reactome:R-HSA-74680; isHomologTo reactome:R-MMU-74680 reactome:R-RNO-74680 reactome:R-CFA-74680 reactome:R-BTA-74680
  // Derived from a Reactome Complex. Here is Reactomes nested structure for this complex: (P01111, P01116, P01112, P01116, 58189). Reactome uses a nested structure for complexes, which cannot be fully represented in SBML Level 3 Version 1 core
  species hearth_species_109796 in hearth_compartment_876; hearth_species_109796 is "hearth p21 RAS:GDP [plasma membrane]";  // reactome:R-HSA-109796; hasPart uniprot:P01111 uniprot:P01116 uniprot:P01112 CHEBI:58189; isHomologTo reactome:R-MMU-109796 reactome:R-RNO-109796 reactome:R-CFA-109796 reactome:R-BTA-109796
  // Derived from a Reactome Complex. Here is Reactomes nested structure for this complex: (P01111, P01116, P01112, P01116, 58189). Reactome uses a nested structure for complexes, which cannot be fully represented in SBML Level 3 Version 1 core
  species liver_species_109796 in liver_compartment_876; liver_species_109796 is "liver p21 RAS:GDP [plasma membrane]";  // reactome:R-HSA-109796; hasPart uniprot:P01111 uniprot:P01116 uniprot:P01112 CHEBI:58189; isHomologTo reactome:R-MMU-109796 reactome:R-RNO-109796 reactome:R-CFA-109796 reactome:R-BTA-109796
  // Derived from a Reactome DefinedSet. This is a list of alternative entities, any of which can perform the given function
  species hearth_species_1220582 in hearth_compartment_876; hearth_species_1220582 is "hearth Active dimers of ligand-responsive EGFR mutants [plasma membrane]";  // reactome:R-HSA-1220582; hasPart uniprot:P00533 uniprot:Q16543 uniprot:P07900 uniprot:P01133
  // Derived from a Reactome DefinedSet. This is a list of alternative entities, any of which can perform the given function
  species liver_species_1220582 in liver_compartment_876; liver_species_1220582 is "liver Active dimers of ligand-responsive EGFR mutants [plasma membrane]";  // reactome:R-HSA-1220582; hasPart uniprot:P00533 uniprot:Q16543 uniprot:P07900 uniprot:P01133
  // Derived from a Reactome Complex. Here is Reactomes nested structure for this complex: (2xP07900). Reactome uses a nested structure for complexes, which cannot be fully represented in SBML Level 3 Version 1 core
  species hearth_species_1221657 in hearth_compartment_70101; hearth_species_1221657 is "hearth HSP90 [cytosol]";  // isDescribedBy pubmed:14718169; reactome:R-HSA-1221657; hasPart uniprot:P07900; isHomologTo reactome:R-MMU-1221657 reactome:R-RNO-1221657 reactome:R-CFA-1221657 reactome:R-BTA-1221657
  // Derived from a Reactome Complex. Here is Reactomes nested structure for this complex: (2xP07900). Reactome uses a nested structure for complexes, which cannot be fully represented in SBML Level 3 Version 1 core
  species liver_species_1221657 in liver_compartment_70101; liver_species_1221657 is "liver HSP90 [cytosol]";  // isDescribedBy pubmed:14718169; reactome:R-HSA-1221657; hasPart uniprot:P07900; isHomologTo reactome:R-MMU-1221657 reactome:R-RNO-1221657 reactome:R-CFA-1221657 reactome:R-BTA-1221657
  // Derived from a Reactome Complex. Here is Reactomes nested structure for this complex: (P42336, 100xP00533, 16xQ16543, 16xP07900, Q13480, P62993, 4xP01133, P27986). Reactome uses a nested structure for complexes, which cannot be fully represented in SBML Level 3 Version 1 core
  species hearth_species_1226013 in hearth_compartment_876; hearth_species_1226013 is "hearth Ligand-responsive p-6Y-EGFR mutants:GRB2:GAB1:PI3K [plasma membrane]";  // reactome:R-HSA-1226013; hasPart uniprot:P42336 uniprot:P00533 uniprot:Q16543 uniprot:P07900
  // Derived from a Reactome Complex. Here is Reactomes nested structure for this complex: (P42336, 100xP00533, 16xQ16543, 16xP07900, Q13480, P62993, 4xP01133, P27986). Reactome uses a nested structure for complexes, which cannot be fully represented in SBML Level 3 Version 1 core
  species liver_species_1226013 in liver_compartment_876; liver_species_1226013 is "liver Ligand-responsive p-6Y-EGFR mutants:GRB2:GAB1:PI3K [plasma membrane]";  // reactome:R-HSA-1226013; hasPart uniprot:P42336 uniprot:P00533 uniprot:Q16543 uniprot:P07900
  // Derived from a Reactome Complex. Here is Reactomes nested structure for this complex: (2xQ16543). Reactome uses a nested structure for complexes, which cannot be fully represented in SBML Level 3 Version 1 core
  species hearth_species_1225828 in hearth_compartment_70101; hearth_species_1225828 is "hearth CDC37 [cytosol]";  // reactome:R-HSA-1225828; hasPart uniprot:Q16543; isHomologTo reactome:R-MMU-1225828 reactome:R-RNO-1225828 reactome:R-CFA-1225828 reactome:R-BTA-1225828
  // Derived from a Reactome Complex. Here is Reactomes nested structure for this complex: (2xQ16543). Reactome uses a nested structure for complexes, which cannot be fully represented in SBML Level 3 Version 1 core
  species liver_species_1225828 in liver_compartment_70101; liver_species_1225828 is "liver CDC37 [cytosol]";  // reactome:R-HSA-1225828; hasPart uniprot:Q16543; isHomologTo reactome:R-MMU-1225828 reactome:R-RNO-1225828 reactome:R-CFA-1225828 reactome:R-BTA-1225828
  // Derived from a Reactome Complex. Here is Reactomes nested structure for this complex: (5667, 5675, 2xP15514, 2xP01135, 2xP01133, 5686, 9176, 2xO14944, 2xP00533, 7644, 2xQ99075, 2xP35070, 2xQ6UW88). Reactome uses a nested structure for complexes, which cannot be fully represented in SBML Level 3 Version 1 core
  species hearth_species_1225979 in hearth_compartment_876; hearth_species_1225979 is "hearth EGF-like ligands:EGFR Dimer:Covalent EGFR TKIs [plasma membrane]";  // reactome:R-HSA-1225979; hasPart iuphar.ligand:5667 iuphar.ligand:5675 uniprot:P15514 uniprot:P01135
  // Derived from a Reactome Complex. Here is Reactomes nested structure for this complex: (5667, 5675, 2xP15514, 2xP01135, 2xP01133, 5686, 9176, 2xO14944, 2xP00533, 7644, 2xQ99075, 2xP35070, 2xQ6UW88). Reactome uses a nested structure for complexes, which cannot be fully represented in SBML Level 3 Version 1 core
  species liver_species_1225979 in liver_compartment_876; liver_species_1225979 is "liver EGF-like ligands:EGFR Dimer:Covalent EGFR TKIs [plasma membrane]";  // reactome:R-HSA-1225979; hasPart iuphar.ligand:5667 iuphar.ligand:5675 uniprot:P15514 uniprot:P01135
  // Derived from a Reactome Complex. Here is Reactomes nested structure for this complex: (2xP00533, 4xQ16543, 4xP07900). Reactome uses a nested structure for complexes, which cannot be fully represented in SBML Level 3 Version 1 core
  species hearth_species_1248010 in hearth_compartment_876; hearth_species_1248010 is "hearth EGFRvIII mutant dimer [plasma membrane]";  // reactome:R-HSA-1248010; hasPart uniprot:P00533 uniprot:Q16543 uniprot:P07900
  // Derived from a Reactome Complex. Here is Reactomes nested structure for this complex: (2xP00533, 4xQ16543, 4xP07900). Reactome uses a nested structure for complexes, which cannot be fully represented in SBML Level 3 Version 1 core
  species liver_species_1248010 in liver_compartment_876; liver_species_1248010 is "liver EGFRvIII mutant dimer [plasma membrane]";  // reactome:R-HSA-1248010; hasPart uniprot:P00533 uniprot:Q16543 uniprot:P07900
  // Derived from a Reactome Complex. Here is Reactomes nested structure for this complex: (Q07889, P62993). Reactome uses a nested structure for complexes, which cannot be fully represented in SBML Level 3 Version 1 core
  species hearth_species_109797 in hearth_compartment_70101; hearth_species_109797 is "hearth GRB2-1:SOS1 [cytosol]";  // isDescribedBy pubmed:19665053 pubmed:8493579; reactome:R-HSA-109797; hasPart uniprot:Q07889 uniprot:P62993; isHomologTo reactome:R-MMU-109797 reactome:R-RNO-109797 reactome:R-CFA-109797 reactome:R-BTA-109797
  // Derived from a Reactome Complex. Here is Reactomes nested structure for this complex: (Q07889, P62993). Reactome uses a nested structure for complexes, which cannot be fully represented in SBML Level 3 Version 1 core
  species liver_species_109797 in liver_compartment_70101; liver_species_109797 is "liver GRB2-1:SOS1 [cytosol]";  // isDescribedBy pubmed:19665053 pubmed:8493579; reactome:R-HSA-109797; hasPart uniprot:Q07889 uniprot:P62993; isHomologTo reactome:R-MMU-109797 reactome:R-RNO-109797 reactome:R-CFA-109797 reactome:R-BTA-109797
  // Derived from a Reactome EntityWithAccessionedSequence. This is a protein
  species hearth_species_179837 in hearth_compartment_876; hearth_species_179837 is "hearth EGFR [plasma membrane]";  // uniprot:P00533 reactome:R-HSA-179837; isHomologTo reactome:R-MMU-179837 reactome:R-RNO-179837 reactome:R-CFA-179837 reactome:R-BTA-179837
  // Derived from a Reactome EntityWithAccessionedSequence. This is a protein
  species liver_species_179837 in liver_compartment_876; liver_species_179837 is "liver EGFR [plasma membrane]";  // uniprot:P00533 reactome:R-HSA-179837; isHomologTo reactome:R-MMU-179837 reactome:R-RNO-179837 reactome:R-CFA-179837 reactome:R-BTA-179837
  // Derived from a Reactome Complex. Here is Reactomes nested structure for this complex: (100xP00533, Q07889, 16xQ16543, 16xP07900, 4xP01133, P29353, P62993). Reactome uses a nested structure for complexes, which cannot be fully represented in SBML Level 3 Version 1 core
  species hearth_species_1225856 in hearth_compartment_876; hearth_species_1225856 is "hearth Ligand responsive p-6Y-EGFR mutants:p-Y349,350-SHC1:GRB2:SOS1 [plasma membrane]";  // reactome:R-HSA-1225856; hasPart uniprot:P00533 uniprot:Q07889 uniprot:Q16543 uniprot:P07900
  // Derived from a Reactome Complex. Here is Reactomes nested structure for this complex: (100xP00533, Q07889, 16xQ16543, 16xP07900, 4xP01133, P29353, P62993). Reactome uses a nested structure for complexes, which cannot be fully represented in SBML Level 3 Version 1 core
  species liver_species_1225856 in liver_compartment_876; liver_species_1225856 is "liver Ligand responsive p-6Y-EGFR mutants:p-Y349,350-SHC1:GRB2:SOS1 [plasma membrane]";  // reactome:R-HSA-1225856; hasPart uniprot:P00533 uniprot:Q07889 uniprot:Q16543 uniprot:P07900
  // Derived from a Reactome EntityWithAccessionedSequence. This is a protein
  // EGFR V30_R297delinsG mutant of EGFR, commonly known as EGFRvIII, is found in ~25% high-grade glioblastomas and can also be found in squamous cell carcinoma of the lung. EGFRvIII lacks the ligand biding domain and is constitutively active.
  species hearth_species_1214162 in hearth_compartment_876; hearth_species_1214162 is "hearth EGFRvIII [plasma membrane]";  // uniprot:P00533 reactome:R-HSA-1214162
  // Derived from a Reactome EntityWithAccessionedSequence. This is a protein
  // EGFR V30_R297delinsG mutant of EGFR, commonly known as EGFRvIII, is found in ~25% high-grade glioblastomas and can also be found in squamous cell carcinoma of the lung. EGFRvIII lacks the ligand biding domain and is constitutively active.
  species liver_species_1214162 in liver_compartment_876; liver_species_1214162 is "liver EGFRvIII [plasma membrane]";  // uniprot:P00533 reactome:R-HSA-1214162
  // Derived from a Reactome Complex. Here is Reactomes nested structure for this complex: (2xP00533, 4xQ16543, 4xP07900, Q13480, P62993). Reactome uses a nested structure for complexes, which cannot be fully represented in SBML Level 3 Version 1 core
  species hearth_species_5637694 in hearth_compartment_876; hearth_species_5637694 is "hearth p-5Y-EGFRvIII:GRB2:GAB1 [plasma membrane]";  // reactome:R-HSA-5637694; hasPart uniprot:P00533 uniprot:Q16543 uniprot:P07900 uniprot:Q13480
  // Derived from a Reactome Complex. Here is Reactomes nested structure for this complex: (2xP00533, 4xQ16543, 4xP07900, Q13480, P62993). Reactome uses a nested structure for complexes, which cannot be fully represented in SBML Level 3 Version 1 core
  species liver_species_5637694 in liver_compartment_876; liver_species_5637694 is "liver p-5Y-EGFRvIII:GRB2:GAB1 [plasma membrane]";  // reactome:R-HSA-5637694; hasPart uniprot:P00533 uniprot:Q16543 uniprot:P07900 uniprot:Q13480
  // Derived from a Reactome DefinedSet. This is a list of alternative entities, any of which can perform the given function
  species hearth_species_1182966 in hearth_compartment_876; hearth_species_1182966 is "hearth Ligand-responsive EGFR mutants [plasma membrane]";  // reactome:R-HSA-1182966; hasPart uniprot:P00533
  // Derived from a Reactome DefinedSet. This is a list of alternative entities, any of which can perform the given function
  species liver_species_1182966 in liver_compartment_876; liver_species_1182966 is "liver Ligand-responsive EGFR mutants [plasma membrane]";  // reactome:R-HSA-1182966; hasPart uniprot:P00533
  // Derived from a Reactome Complex. Here is Reactomes nested structure for this complex: (P00533, 6882). Reactome uses a nested structure for complexes, which cannot be fully represented in SBML Level 3 Version 1 core
  species hearth_species_1248675 in hearth_compartment_876; hearth_species_1248675 is "hearth EGFR:Cetuximab [plasma membrane]";  // reactome:R-HSA-1248675; hasPart uniprot:P00533 iuphar.ligand:6882
  // Derived from a Reactome Complex. Here is Reactomes nested structure for this complex: (P00533, 6882). Reactome uses a nested structure for complexes, which cannot be fully represented in SBML Level 3 Version 1 core
  species liver_species_1248675 in liver_compartment_876; liver_species_1248675 is "liver EGFR:Cetuximab [plasma membrane]";  // reactome:R-HSA-1248675; hasPart uniprot:P00533 iuphar.ligand:6882
  // Derived from a Reactome Complex. Here is Reactomes nested structure for this complex: (2xP00533, P19174, 4xQ16543, 4xP07900). Reactome uses a nested structure for complexes, which cannot be fully represented in SBML Level 3 Version 1 core
  species hearth_species_5637706 in hearth_compartment_876; hearth_species_5637706 is "hearth p-5Y-EGFRvIII:p-Y771,Y783,Y1254-PLCG1 [plasma membrane]";  // reactome:R-HSA-5637706; hasPart uniprot:P00533 uniprot:P19174 uniprot:Q16543 uniprot:P07900
  // Derived from a Reactome Complex. Here is Reactomes nested structure for this complex: (2xP00533, P19174, 4xQ16543, 4xP07900). Reactome uses a nested structure for complexes, which cannot be fully represented in SBML Level 3 Version 1 core
  species liver_species_5637706 in liver_compartment_876; liver_species_5637706 is "liver p-5Y-EGFRvIII:p-Y771,Y783,Y1254-PLCG1 [plasma membrane]";  // reactome:R-HSA-5637706; hasPart uniprot:P00533 uniprot:P19174 uniprot:Q16543 uniprot:P07900

  // Reactions:
  // EGFR L858R mutant was shown to directly phosphorylate CBL on tyrosine residue Y371. Other EGFR cancer mutants with phosphorylation of tyrosine Y1069 (i.e. Y1045 in the mature protein) are assumed to bind and phosphorylate CBL in a manner similar to the wild-type EGFR.
  hearth_reaction_1225960: 2 hearth_species_113592 + hearth_species_1225855 => 2 hearth_species_29370 + hearth_species_1225857; hearth_species_1225855*1*(k_forcat_reaction_1225960*(hearth_speciesreference_1225960_input_113592/k_reaction_1225960_species_113592)^2*(hearth_speciesreference_1225960_input_1225855/k_reaction_1225960_species_1225855)^1/((1 + hearth_speciesreference_1225960_input_113592/k_reaction_1225960_species_113592 + (hearth_speciesreference_1225960_input_113592/k_reaction_1225960_species_113592)^2)*(1 + hearth_speciesreference_1225960_input_1225855/k_reaction_1225960_species_1225855))); hearth_reaction_1225960 is "hearth Phosphorylation of CBL by ligand-responsive p-6Y-EGFR mutants";
  // EGFR L858R mutant was shown to directly phosphorylate CBL on tyrosine residue Y371. Other EGFR cancer mutants with phosphorylation of tyrosine Y1069 (i.e. Y1045 in the mature protein) are assumed to bind and phosphorylate CBL in a manner similar to the wild-type EGFR.
  liver_reaction_1225960: 2 liver_species_113592 + liver_species_1225855 => 2 liver_species_29370 + liver_species_1225857; liver_species_1225855*1*(k_forcat_reaction_1225960*(liver_speciesreference_1225960_input_113592/k_reaction_1225960_species_113592)^2*(liver_speciesreference_1225960_input_1225855/k_reaction_1225960_species_1225855)^1/((1 + liver_speciesreference_1225960_input_113592/k_reaction_1225960_species_113592 + (liver_speciesreference_1225960_input_113592/k_reaction_1225960_species_113592)^2)*(1 + liver_speciesreference_1225960_input_1225855/k_reaction_1225960_species_1225855))); liver_reaction_1225960 is "liver Phosphorylation of CBL by ligand-responsive p-6Y-EGFR mutants";
  // Direct binding of GRB2:SOS1 complex to phosphorylated homodimers of EGFR cancer mutants has not been tested. GRB2 binds to phosphorylated tyrosine residues Y1068 and Y1086 (corresponding to Y1092 and Y1110, respectively, when counting from the first amino acid of the EGFR precursor, prior to cleavage of the 24-amino acid signal peptide at the N-terminus). Phosphorylation of Y1068 (i.e. Y1092) has been directly demonstrated in the following EGFR cancer mutants: EGFR L858R mutant (Sordella et al. 2004, Lynch et al. 2004, Greulich et al. 2005, Yang et al. 2006, Choi et al. 2007); EGFR G719S mutant (Greulich et al. 2005, Choi et al. 2007); EGFR L747_P753insS mutant (Sordella et al. 2004, Lynch et al. 2004, Choi et al. 2007); EGFR L747_A750delinsP (Greulich et al. 2005); EGFR L747_S752del mutant (Pao et al. 2004); EGFR L861Q mutant (Lee et al. 2006, Yang et al. 2006); EGFRvIII mutant (Huang et al. 2007); EGFR A289V mutant (Lee et al. 2006); EGFR G598V mutant (Lee et al. 2006); EGFR R108K mutant (Lee et al. 2006); EGFR T263P mutant (Lee et al. 2006); EGFR D770_N771insNPG mutant (Greulich et al. 2005, Xu et al. 2007); EGFR N771_H773dup mutant (Xu et al. 2007); EGFR K739_I744dup mutant (Xu et al. 2007); EGFR A767_V769dup mutant (Xu et al. 2007).
  hearth_reaction_1225950: hearth_species_109797 + hearth_species_1181062 => hearth_species_1225859; k_forcat_reaction_1225950*hearth_species_109797*hearth_species_1181062; hearth_reaction_1225950 is "hearth Binding of GRB2:SOS1 complex to phosphorylated ligand-responsive EGFR mutants";
  // Direct binding of GRB2:SOS1 complex to phosphorylated homodimers of EGFR cancer mutants has not been tested. GRB2 binds to phosphorylated tyrosine residues Y1068 and Y1086 (corresponding to Y1092 and Y1110, respectively, when counting from the first amino acid of the EGFR precursor, prior to cleavage of the 24-amino acid signal peptide at the N-terminus). Phosphorylation of Y1068 (i.e. Y1092) has been directly demonstrated in the following EGFR cancer mutants: EGFR L858R mutant (Sordella et al. 2004, Lynch et al. 2004, Greulich et al. 2005, Yang et al. 2006, Choi et al. 2007); EGFR G719S mutant (Greulich et al. 2005, Choi et al. 2007); EGFR L747_P753insS mutant (Sordella et al. 2004, Lynch et al. 2004, Choi et al. 2007); EGFR L747_A750delinsP (Greulich et al. 2005); EGFR L747_S752del mutant (Pao et al. 2004); EGFR L861Q mutant (Lee et al. 2006, Yang et al. 2006); EGFRvIII mutant (Huang et al. 2007); EGFR A289V mutant (Lee et al. 2006); EGFR G598V mutant (Lee et al. 2006); EGFR R108K mutant (Lee et al. 2006); EGFR T263P mutant (Lee et al. 2006); EGFR D770_N771insNPG mutant (Greulich et al. 2005, Xu et al. 2007); EGFR N771_H773dup mutant (Xu et al. 2007); EGFR K739_I744dup mutant (Xu et al. 2007); EGFR A767_V769dup mutant (Xu et al. 2007).
  liver_reaction_1225950: liver_species_109797 + liver_species_1181062 => liver_species_1225859; k_forcat_reaction_1225950*liver_species_109797*liver_species_1181062; liver_reaction_1225950 is "liver Binding of GRB2:SOS1 complex to phosphorylated ligand-responsive EGFR mutants";
  // EGFRvIII mutant lacks the ligand binding domain and is therefore unable to bind EGFR ligands (Fernandes et al. 2001).
  hearth_reaction_5638137: hearth_species_179863 + hearth_species_1248004 => ; k_forcat_reaction_5638137*hearth_species_179863*hearth_species_1248004; hearth_reaction_5638137 is "hearth EGFRvIII cancer variant does not bind EGF ligand";
  // EGFRvIII mutant lacks the ligand binding domain and is therefore unable to bind EGFR ligands (Fernandes et al. 2001).
  liver_reaction_5638137: liver_species_179863 + liver_species_1248004 => ; k_forcat_reaction_5638137*liver_species_179863*liver_species_1248004; liver_reaction_5638137 is "liver EGFRvIII cancer variant does not bind EGF ligand";
  // Cetuximab binds to the extracellular domain of EGFR and blocks ligand binding, leading to receptor inactivation, internalization and degradation. Cetuximab is approved for combination therapy and monotherapy of metastatic colorectal cancer and advanced squamous cell carcinoma of head and neck in patients whose tumors over-express wild-type EGFR protein, usually due to amplification of EGFR gene.
  hearth_reaction_1248677: hearth_species_179837 + hearth_species_1248673 => hearth_species_1248675; k_forcat_reaction_1248677*hearth_species_179837*hearth_species_1248673; hearth_reaction_1248677 is "hearth Inactivation of over-expressed wild type EGFR by Cetuximab recombinant antibody";
  // Cetuximab binds to the extracellular domain of EGFR and blocks ligand binding, leading to receptor inactivation, internalization and degradation. Cetuximab is approved for combination therapy and monotherapy of metastatic colorectal cancer and advanced squamous cell carcinoma of head and neck in patients whose tumors over-express wild-type EGFR protein, usually due to amplification of EGFR gene.
  liver_reaction_1248677: liver_species_179837 + liver_species_1248673 => liver_species_1248675; k_forcat_reaction_1248677*liver_species_179837*liver_species_1248673; liver_reaction_1248677 is "liver Inactivation of over-expressed wild type EGFR by Cetuximab recombinant antibody";
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  hearth_reaction_1225949: 2 hearth_species_112199 + hearth_species_1181062 => hearth_species_1225855; k_forcat_reaction_1225949*hearth_species_112199^2*hearth_species_1181062; hearth_reaction_1225949 is "hearth Binding of CBL to ligand-responsive p-6Y-EGFR mutants";
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  liver_reaction_1225949: 2 liver_species_112199 + liver_species_1181062 => liver_species_1225855; k_forcat_reaction_1225949*liver_species_112199^2*liver_species_1181062; liver_reaction_1225949 is "liver Binding of CBL to ligand-responsive p-6Y-EGFR mutants";
  // Covalent (irreversible) tyrosine kinase inhibitors (TKIs), pelitinib, WZ4002, HKI-272, canertinib and afatinib, form a covalent bond with the EGFR cysteine residue C397 and inhibit trans-autophosphorylation of mutants resistant to non-covalent TKIs. However, effective concentrations of covalent TKIs also inhibit wild type EGFR, resulting in severe side effects. Hence, covalent TKIs have not shown much promise as therapeutics.
  hearth_reaction_1220611: 2 hearth_species_1216522 + hearth_species_1220585 => hearth_species_1220579; k_forcat_reaction_1220611*hearth_species_1216522^2*hearth_species_1220585; hearth_reaction_1220611 is "hearth Covalent tyrosine kinase inhibitors bind and inactivate EGFR kinase domain mutant dimers resistant to non-covalent tyrosine kinase inhibitors";
  // Covalent (irreversible) tyrosine kinase inhibitors (TKIs), pelitinib, WZ4002, HKI-272, canertinib and afatinib, form a covalent bond with the EGFR cysteine residue C397 and inhibit trans-autophosphorylation of mutants resistant to non-covalent TKIs. However, effective concentrations of covalent TKIs also inhibit wild type EGFR, resulting in severe side effects. Hence, covalent TKIs have not shown much promise as therapeutics.
  liver_reaction_1220611: 2 liver_species_1216522 + liver_species_1220585 => liver_species_1220579; k_forcat_reaction_1220611*liver_species_1216522^2*liver_species_1220585; liver_reaction_1220611 is "liver Covalent tyrosine kinase inhibitors bind and inactivate EGFR kinase domain mutant dimers resistant to non-covalent tyrosine kinase inhibitors";
  // Covalent (irreversible) TKIs, pelitinib, WZ4002, HKI-272, canertinib and afatinib, inhibit the wild-type EGFR through formation of the covalent bond with the cysteine residue C397.
  hearth_reaction_1225978: hearth_species_9624420 + 2 hearth_species_1216522 => hearth_species_1225979; k_forcat_reaction_1225978*hearth_species_9624420*hearth_species_1216522^2; hearth_reaction_1225978 is "hearth Covalent tyrosine kinase inhibitors bind and inhibit wild-type EGF:EGFR dimers";
  // Covalent (irreversible) TKIs, pelitinib, WZ4002, HKI-272, canertinib and afatinib, inhibit the wild-type EGFR through formation of the covalent bond with the cysteine residue C397.
  liver_reaction_1225978: liver_species_9624420 + 2 liver_species_1216522 => liver_species_1225979; k_forcat_reaction_1225978*liver_species_9624420*liver_species_1216522^2; liver_reaction_1225978 is "liver Covalent tyrosine kinase inhibitors bind and inhibit wild-type EGF:EGFR dimers";
  // SHC1 (Src homology 2 domain-containing transforming protein) is known to bind two phosphorylated tyrosine docking sites of EGFR: Y1148 and Y1173 (corresponding to Y1172 and Y1197 when counting from the first amino acid of EGFR precursor, before the cleavage of the 24-amino acid signal peptide at the N-terminus takes place). Phosphorylation of Y1173 tyrosine residue was directly demonstrated in EGFRvIII mutant (Han et al. 2006, Grandal et al. 2007) as well as the phosphorylation of Y1148 (Huang et al. 2007). Binding of SHC1 to EGFRvIII cancer mutant has not been tested but SHC1 is assumed to bind EGFRvIII in the same way it binds wild-type EGFR.
  hearth_reaction_5637766: hearth_species_1248654 + hearth_species_74680 => hearth_species_5637701; k_forcat_reaction_5637766*hearth_species_1248654*hearth_species_74680; hearth_reaction_5637766 is "hearth Binding of SHC1 to p-5Y-EGFRvIII";
  // SHC1 (Src homology 2 domain-containing transforming protein) is known to bind two phosphorylated tyrosine docking sites of EGFR: Y1148 and Y1173 (corresponding to Y1172 and Y1197 when counting from the first amino acid of EGFR precursor, before the cleavage of the 24-amino acid signal peptide at the N-terminus takes place). Phosphorylation of Y1173 tyrosine residue was directly demonstrated in EGFRvIII mutant (Han et al. 2006, Grandal et al. 2007) as well as the phosphorylation of Y1148 (Huang et al. 2007). Binding of SHC1 to EGFRvIII cancer mutant has not been tested but SHC1 is assumed to bind EGFRvIII in the same way it binds wild-type EGFR.
  liver_reaction_5637766: liver_species_1248654 + liver_species_74680 => liver_species_5637701; k_forcat_reaction_5637766*liver_species_1248654*liver_species_74680; liver_reaction_5637766 is "liver Binding of SHC1 to p-5Y-EGFRvIII";
  // Once phosphorylated, PLC-gamma 1 is expected to dissociate from phosphorylated EGFRvIII cancer mutant and induce downstream signaling in the same way it does when activated by the wild-type EGFR. However, except for the phosphorylation of PLCG1 binding site in EGFRvIII (Grandal et al. 2007), other events involved in activation of PLCG1 signaling have not been studied in cells expressing EGFRvIII.
  hearth_reaction_5637800: hearth_species_5637706 => hearth_species_167679 + hearth_species_1248654; k_forcat_reaction_5637800*hearth_species_5637706; hearth_reaction_5637800 is "hearth Dissociation of phosphorylated PLC-gamma 1 from p-EGFRvIII mutant";
  // Once phosphorylated, PLC-gamma 1 is expected to dissociate from phosphorylated EGFRvIII cancer mutant and induce downstream signaling in the same way it does when activated by the wild-type EGFR. However, except for the phosphorylation of PLCG1 binding site in EGFRvIII (Grandal et al. 2007), other events involved in activation of PLCG1 signaling have not been studied in cells expressing EGFRvIII.
  liver_reaction_5637800: liver_species_5637706 => liver_species_167679 + liver_species_1248654; k_forcat_reaction_5637800*liver_species_5637706; liver_reaction_5637800 is "liver Dissociation of phosphorylated PLC-gamma 1 from p-EGFRvIII mutant";
  // EGFR ligand-responsive mutants dimerize spontaneously, without ligand binding, although ligand binding ability is preserved. This was experimentally demonstrated for EFGR L858R mutant and is presumed to happen in other constitutively active EGFR kinase domain mutants and EGFR extracellular domain point mutants.
  hearth_reaction_1220614: 2 hearth_species_1218825 => hearth_species_1500849; k_forcat_reaction_1220614*hearth_species_1218825^2; hearth_reaction_1220614 is "hearth Spontaneous dimerization of ligand-responsive EGFR mutants";
  // EGFR ligand-responsive mutants dimerize spontaneously, without ligand binding, although ligand binding ability is preserved. This was experimentally demonstrated for EFGR L858R mutant and is presumed to happen in other constitutively active EGFR kinase domain mutants and EGFR extracellular domain point mutants.
  liver_reaction_1220614: 2 liver_species_1218825 => liver_species_1500849; k_forcat_reaction_1220614*liver_species_1218825^2; liver_reaction_1220614 is "liver Spontaneous dimerization of ligand-responsive EGFR mutants";
  // Once recruited, PLC-gamma 1 is assumed to be phosphorylated by EGFRvIII cancer mutant in the same way it is phosphorylated by the wild-type EGFR (Meisenhelder et al. 1989, Wahl et al. 1990).
  hearth_reaction_5637795: 4 hearth_species_113592 + hearth_species_5637698 => 4 hearth_species_29370 + hearth_species_5637706; hearth_species_5637698*1*(k_forcat_reaction_5637795*(hearth_speciesreference_5637795_input_113592/k_reaction_5637795_species_113592)^4*(hearth_speciesreference_5637795_input_5637698/k_reaction_5637795_species_5637698)^1/((1 + hearth_speciesreference_5637795_input_113592/k_reaction_5637795_species_113592 + (hearth_speciesreference_5637795_input_113592/k_reaction_5637795_species_113592)^2 + (hearth_speciesreference_5637795_input_113592/k_reaction_5637795_species_113592)^3 + (hearth_speciesreference_5637795_input_113592/k_reaction_5637795_species_113592)^4)*(1 + hearth_speciesreference_5637795_input_5637698/k_reaction_5637795_species_5637698))); hearth_reaction_5637795 is "hearth Phosphorylation of PLC-gamma 1 by p-EGFRvIII mutant";
  // Once recruited, PLC-gamma 1 is assumed to be phosphorylated by EGFRvIII cancer mutant in the same way it is phosphorylated by the wild-type EGFR (Meisenhelder et al. 1989, Wahl et al. 1990).
  liver_reaction_5637795: 4 liver_species_113592 + liver_species_5637698 => 4 liver_species_29370 + liver_species_5637706; liver_species_5637698*1*(k_forcat_reaction_5637795*(liver_speciesreference_5637795_input_113592/k_reaction_5637795_species_113592)^4*(liver_speciesreference_5637795_input_5637698/k_reaction_5637795_species_5637698)^1/((1 + liver_speciesreference_5637795_input_113592/k_reaction_5637795_species_113592 + (liver_speciesreference_5637795_input_113592/k_reaction_5637795_species_113592)^2 + (liver_speciesreference_5637795_input_113592/k_reaction_5637795_species_113592)^3 + (liver_speciesreference_5637795_input_113592/k_reaction_5637795_species_113592)^4)*(1 + liver_speciesreference_5637795_input_5637698/k_reaction_5637795_species_5637698))); liver_reaction_5637795 is "liver Phosphorylation of PLC-gamma 1 by p-EGFRvIII mutant";
  // Constitutive phosphorylation of SHC1 was directly demonstrated in cells expressing EGFR L858R mutant (Greulich et al. 2005). Other EGFR cancer mutants were not directly tested for their ability to phosphorylate SHC1, but are assumed to interact with SHC1 in the same way as the wild-type EGFR protein.
  hearth_reaction_1225952: 2 hearth_species_113592 + hearth_species_1225858 => 2 hearth_species_29370 + hearth_species_1225854; hearth_species_1225858*1*(k_forcat_reaction_1225952*(hearth_speciesreference_1225952_input_113592/k_reaction_1225952_species_113592)^2*(hearth_speciesreference_1225952_input_1225858/k_reaction_1225952_species_1225858)^1/((1 + hearth_speciesreference_1225952_input_113592/k_reaction_1225952_species_113592 + (hearth_speciesreference_1225952_input_113592/k_reaction_1225952_species_113592)^2)*(1 + hearth_speciesreference_1225952_input_1225858/k_reaction_1225952_species_1225858))); hearth_reaction_1225952 is "hearth Phosphorylation of SHC1 by ligand-responsive p-6Y-EGFR mutants";
  // Constitutive phosphorylation of SHC1 was directly demonstrated in cells expressing EGFR L858R mutant (Greulich et al. 2005). Other EGFR cancer mutants were not directly tested for their ability to phosphorylate SHC1, but are assumed to interact with SHC1 in the same way as the wild-type EGFR protein.
  liver_reaction_1225952: 2 liver_species_113592 + liver_species_1225858 => 2 liver_species_29370 + liver_species_1225854; liver_species_1225858*1*(k_forcat_reaction_1225952*(liver_speciesreference_1225952_input_113592/k_reaction_1225952_species_113592)^2*(liver_speciesreference_1225952_input_1225858/k_reaction_1225952_species_1225858)^1/((1 + liver_speciesreference_1225952_input_113592/k_reaction_1225952_species_113592 + (liver_speciesreference_1225952_input_113592/k_reaction_1225952_species_113592)^2)*(1 + liver_speciesreference_1225952_input_1225858/k_reaction_1225952_species_1225858))); liver_reaction_1225952 is "liver Phosphorylation of SHC1 by ligand-responsive p-6Y-EGFR mutants";
  // SOS1 is the guanine nucleotide exchange factor (GEF) for RAS. SOS1, recruited by GRB2 bound to p-SHC1:p-EGFRvIII mutant, is assumed to activate RAS nucleotide exchange from the inactive form (bound to GDP) to an active form (bound to GTP). Although this reaction has not been shown to occur directly for EGFRvIII cancer mutant, activation of RAF/MAP kinase cascade has been demonstrated in cells expressing EGFRvIII (Montgomery et al. 1995).
  hearth_reaction_5637808: hearth_species_109796 + hearth_species_29438 => hearth_species_109783 + hearth_species_29420; hearth_species_5637704*1*(k_forcat_reaction_5637808*(hearth_speciesreference_5637808_input_109796/k_reaction_5637808_species_109796)^1*(hearth_speciesreference_5637808_input_29438/k_reaction_5637808_species_29438)^1/((1 + hearth_speciesreference_5637808_input_109796/k_reaction_5637808_species_109796)*(1 + hearth_speciesreference_5637808_input_29438/k_reaction_5637808_species_29438))); hearth_reaction_5637808 is "hearth SOS-mediated nucleotide exchange of RAS (mediated by GRB2:SOS1 in complex with phosphorylated SHC1 and p-EGFRvIII)";  // modifiers: hearth_species_5637704
  // SOS1 is the guanine nucleotide exchange factor (GEF) for RAS. SOS1, recruited by GRB2 bound to p-SHC1:p-EGFRvIII mutant, is assumed to activate RAS nucleotide exchange from the inactive form (bound to GDP) to an active form (bound to GTP). Although this reaction has not been shown to occur directly for EGFRvIII cancer mutant, activation of RAF/MAP kinase cascade has been demonstrated in cells expressing EGFRvIII (Montgomery et al. 1995).
  liver_reaction_5637808: liver_species_109796 + liver_species_29438 => liver_species_109783 + liver_species_29420; liver_species_5637704*1*(k_forcat_reaction_5637808*(liver_speciesreference_5637808_input_109796/k_reaction_5637808_species_109796)^1*(liver_speciesreference_5637808_input_29438/k_reaction_5637808_species_29438)^1/((1 + liver_speciesreference_5637808_input_109796/k_reaction_5637808_species_109796)*(1 + liver_speciesreference_5637808_input_29438/k_reaction_5637808_species_29438))); liver_reaction_5637808 is "liver SOS-mediated nucleotide exchange of RAS (mediated by GRB2:SOS1 in complex with phosphorylated SHC1 and p-EGFRvIII)";  // modifiers: liver_species_5637704
  // EGFR kinase domain mutants need continuous association with HSP90 chaperone protein for proper functioning. CDC37 is a co-chaperone of HSP90 that acts as a scaffold and regulator of interaction between HSP90 and its protein kinase clients. CDC37 binds a protein kinase through its N-terminal domain and HSP90 through its C-terminal domain, arresting ATP-ase activity of HSP90 and enabling the loading of a client kinase. CDC37 is frequently over-expressed in cancers involving mutant kinases and acts as an oncogene (reviewed by Gray Jr. et al. 2008). Association of EGFR extracellular domain point mutants with HSP90 chaperone has not been tested.
  hearth_reaction_1218833: 2 hearth_species_1225828 + hearth_species_1182966 + 2 hearth_species_1221657 => hearth_species_1218825; k_forcat_reaction_1218833*hearth_species_1225828^2*hearth_species_1182966*hearth_species_1221657^2; hearth_reaction_1218833 is "hearth Binding of ligand-responsive EGFR mutants to chaperoning proteins HSP90 and CDC37";
  // EGFR kinase domain mutants need continuous association with HSP90 chaperone protein for proper functioning. CDC37 is a co-chaperone of HSP90 that acts as a scaffold and regulator of interaction between HSP90 and its protein kinase clients. CDC37 binds a protein kinase through its N-terminal domain and HSP90 through its C-terminal domain, arresting ATP-ase activity of HSP90 and enabling the loading of a client kinase. CDC37 is frequently over-expressed in cancers involving mutant kinases and acts as an oncogene (reviewed by Gray Jr. et al. 2008). Association of EGFR extracellular domain point mutants with HSP90 chaperone has not been tested.
  liver_reaction_1218833: 2 liver_species_1225828 + liver_species_1182966 + 2 liver_species_1221657 => liver_species_1218825; k_forcat_reaction_1218833*liver_species_1225828^2*liver_species_1182966*liver_species_1221657^2; liver_reaction_1218833 is "liver Binding of ligand-responsive EGFR mutants to chaperoning proteins HSP90 and CDC37";
  // The kinase activity of PI3K mediates the phosphorylation of PIP2 to form PIP3. It is assumed that EGFRvIII cancer mutant induces PI3K/AKT signaling in a manner similar to wild-type EGFR. Accordingly, activation of PI3K/AKT signaling cascade has been demonstrated in cells expressing EGFRvIII (Lammering et al. 2003, Li et al. 2004)
  hearth_reaction_5637801: hearth_species_113592 + hearth_species_179856 => hearth_species_179838 + hearth_species_29370; hearth_species_5637693*1*(k_forcat_reaction_5637801*(hearth_speciesreference_5637801_input_113592/k_reaction_5637801_species_113592)^1*(hearth_speciesreference_5637801_input_179856/k_reaction_5637801_species_179856)^1/((1 + hearth_speciesreference_5637801_input_113592/k_reaction_5637801_species_113592)*(1 + hearth_speciesreference_5637801_input_179856/k_reaction_5637801_species_179856))); hearth_reaction_5637801 is "hearth Conversion of PIP2 to PIP3 by PI3K bound to phosphorylated EGFRvIII";  // modifiers: hearth_species_5637693
  // The kinase activity of PI3K mediates the phosphorylation of PIP2 to form PIP3. It is assumed that EGFRvIII cancer mutant induces PI3K/AKT signaling in a manner similar to wild-type EGFR. Accordingly, activation of PI3K/AKT signaling cascade has been demonstrated in cells expressing EGFRvIII (Lammering et al. 2003, Li et al. 2004)
  liver_reaction_5637801: liver_species_113592 + liver_species_179856 => liver_species_179838 + liver_species_29370; liver_species_5637693*1*(k_forcat_reaction_5637801*(liver_speciesreference_5637801_input_113592/k_reaction_5637801_species_113592)^1*(liver_speciesreference_5637801_input_179856/k_reaction_5637801_species_179856)^1/((1 + liver_speciesreference_5637801_input_113592/k_reaction_5637801_species_113592)*(1 + liver_speciesreference_5637801_input_179856/k_reaction_5637801_species_179856))); liver_reaction_5637801 is "liver Conversion of PIP2 to PIP3 by PI3K bound to phosphorylated EGFRvIII";  // modifiers: liver_species_5637693
  // Direct binding of GRB2:GAB1 complex to phosphorylated homodimers of EGFR cancer mutants has not been tested. This complex is recruted to EGFR via GRB2 binding to phosphorylated tyrosine residues Y1068 and Y1086 (corresponding to Y1092 and Y1110, respectively, when counting from the first amino acid of the EGFR precursor, prior to cleavage of the 24-amino acid signal peptide at the N-terminus). Phosphorylation of Y1068 (i.e. Y1092) has been directly demonstrated in the following EGFR cancer mutants: EGFR L858R mutant (Sordella et al. 2004, Lynch et al. 2004, Greulich et al. 2005, Yang et al. 2006, Choi et al. 2007); EGFR G719S mutant (Greulich et al. 2005, Choi et al. 2007); EGFR L747_P753insS mutant (Sordella et al. 2004, Lynch et al. 2004, Choi et al. 2007); EGFR L747_A750delinsP (Greulich et al. 2005); EGFR L747_S752del mutant (Pao et al. 2004); EGFR L861Q mutant (Lee et al. 2006, Yang et al. 2006); EGFRvIII mutant (Huang et al. 2007); EGFR A289V mutant (Lee et al. 2006); EGFR G598V mutant (Lee et al. 2006); EGFR R108K mutant (Lee et al. 2006); EGFR T263P mutant (Lee et al. 2006); EGFR D770_N771insNPG mutant (Greulich et al. 2005, Xu et al. 2007); EGFR N771_H773dup mutant (Xu et al. 2007); EGFR K739_I744dup mutant (Xu et al. 2007); EGFR A767_V769dup mutant (Xu et al. 2007).
  hearth_reaction_1226016: hearth_species_179849 + hearth_species_1181062 => hearth_species_1226015; k_forcat_reaction_1226016*hearth_species_179849*hearth_species_1181062; hearth_reaction_1226016 is "hearth Binding of GRB2:GAB1 complex to ligand-responsive p-6Y-EGFR mutants";
  // Direct binding of GRB2:GAB1 complex to phosphorylated homodimers of EGFR cancer mutants has not been tested. This complex is recruted to EGFR via GRB2 binding to phosphorylated tyrosine residues Y1068 and Y1086 (corresponding to Y1092 and Y1110, respectively, when counting from the first amino acid of the EGFR precursor, prior to cleavage of the 24-amino acid signal peptide at the N-terminus). Phosphorylation of Y1068 (i.e. Y1092) has been directly demonstrated in the following EGFR cancer mutants: EGFR L858R mutant (Sordella et al. 2004, Lynch et al. 2004, Greulich et al. 2005, Yang et al. 2006, Choi et al. 2007); EGFR G719S mutant (Greulich et al. 2005, Choi et al. 2007); EGFR L747_P753insS mutant (Sordella et al. 2004, Lynch et al. 2004, Choi et al. 2007); EGFR L747_A750delinsP (Greulich et al. 2005); EGFR L747_S752del mutant (Pao et al. 2004); EGFR L861Q mutant (Lee et al. 2006, Yang et al. 2006); EGFRvIII mutant (Huang et al. 2007); EGFR A289V mutant (Lee et al. 2006); EGFR G598V mutant (Lee et al. 2006); EGFR R108K mutant (Lee et al. 2006); EGFR T263P mutant (Lee et al. 2006); EGFR D770_N771insNPG mutant (Greulich et al. 2005, Xu et al. 2007); EGFR N771_H773dup mutant (Xu et al. 2007); EGFR K739_I744dup mutant (Xu et al. 2007); EGFR A767_V769dup mutant (Xu et al. 2007).
  liver_reaction_1226016: liver_species_179849 + liver_species_1181062 => liver_species_1226015; k_forcat_reaction_1226016*liver_species_179849*liver_species_1181062; liver_reaction_1226016 is "liver Binding of GRB2:GAB1 complex to ligand-responsive p-6Y-EGFR mutants";
  // EGFRvIII cancer mutant was not directly tested for its ability to phosphorylate SHC1, but is assumed to interact with SHC1 in the same way as the wild-type EGFR protein (Soler et al. 1994, VanderKuur et al. 1995).
  hearth_reaction_5637796: 2 hearth_species_113592 + hearth_species_5637701 => hearth_species_5637703 + 2 hearth_species_29370; hearth_species_5637701*1*(k_forcat_reaction_5637796*(hearth_speciesreference_5637796_input_113592/k_reaction_5637796_species_113592)^2*(hearth_speciesreference_5637796_input_5637701/k_reaction_5637796_species_5637701)^1/((1 + hearth_speciesreference_5637796_input_113592/k_reaction_5637796_species_113592 + (hearth_speciesreference_5637796_input_113592/k_reaction_5637796_species_113592)^2)*(1 + hearth_speciesreference_5637796_input_5637701/k_reaction_5637796_species_5637701))); hearth_reaction_5637796 is "hearth Phosphorylation of SHC1 by p-5Y-EGFRvIII";
  // EGFRvIII cancer mutant was not directly tested for its ability to phosphorylate SHC1, but is assumed to interact with SHC1 in the same way as the wild-type EGFR protein (Soler et al. 1994, VanderKuur et al. 1995).
  liver_reaction_5637796: 2 liver_species_113592 + liver_species_5637701 => liver_species_5637703 + 2 liver_species_29370; liver_species_5637701*1*(k_forcat_reaction_5637796*(liver_speciesreference_5637796_input_113592/k_reaction_5637796_species_113592)^2*(liver_speciesreference_5637796_input_5637701/k_reaction_5637796_species_5637701)^1/((1 + liver_speciesreference_5637796_input_113592/k_reaction_5637796_species_113592 + (liver_speciesreference_5637796_input_113592/k_reaction_5637796_species_113592)^2)*(1 + liver_speciesreference_5637796_input_5637701/k_reaction_5637796_species_5637701))); liver_reaction_5637796 is "liver Phosphorylation of SHC1 by p-5Y-EGFRvIII";
  // Tyrosine residue Y992 (corresponding to Y1016 when counting from the first amino acid of the EGFR precursor, prior to cleavage of the 24-amino acid signal peptide at the N-terminus), a docking site for PLC-gamma 1 (PLCG1), is phosphorylated in EGFR cancer mutants and expected to recruit PLC-gamma 1 in the same way as the wild-type EGFR receptor. Phosphorylation of Y992 (corresponding to Y1016 when counting from the first amino acid of the EGFR precursor, prior to cleavage of the 24-amino acid signal peptide at the N-terminus) has been directly demonstrated for the following EGFR cancer mutants: EGFR L858R mutant (Sordella et al. 2004, Choi et al. 2007); EGFR G719S mutant (Choi et al. 2007); EGFR L747_P753delinsS mutant (Sordella et al. 2004, Choi et ak, 2007); EGFR L861Q mutant (Choi et al. 2007); EGFRvIII mutant (Grandal et al. 2007); EGFR A289V mutant (Lee et al. 2006); EGFR D770_N771insNPG mutant (Xu et al. 2007); EGFR N771_H773dup mutant (Xu et al. 2007); EGFR K739_I744dup mutant (Xu et al. 2007); EGFR A767_V769dup mutant (Xu et al. 2007).
  hearth_reaction_1247841: hearth_species_167682 + hearth_species_1181062 => hearth_species_1247845; k_forcat_reaction_1247841*hearth_species_167682*hearth_species_1181062; hearth_reaction_1247841 is "hearth PLCG1 binds to ligand-responsive p-6Y-EGFR mutants";
  // Tyrosine residue Y992 (corresponding to Y1016 when counting from the first amino acid of the EGFR precursor, prior to cleavage of the 24-amino acid signal peptide at the N-terminus), a docking site for PLC-gamma 1 (PLCG1), is phosphorylated in EGFR cancer mutants and expected to recruit PLC-gamma 1 in the same way as the wild-type EGFR receptor. Phosphorylation of Y992 (corresponding to Y1016 when counting from the first amino acid of the EGFR precursor, prior to cleavage of the 24-amino acid signal peptide at the N-terminus) has been directly demonstrated for the following EGFR cancer mutants: EGFR L858R mutant (Sordella et al. 2004, Choi et al. 2007); EGFR G719S mutant (Choi et al. 2007); EGFR L747_P753delinsS mutant (Sordella et al. 2004, Choi et ak, 2007); EGFR L861Q mutant (Choi et al. 2007); EGFRvIII mutant (Grandal et al. 2007); EGFR A289V mutant (Lee et al. 2006); EGFR D770_N771insNPG mutant (Xu et al. 2007); EGFR N771_H773dup mutant (Xu et al. 2007); EGFR K739_I744dup mutant (Xu et al. 2007); EGFR A767_V769dup mutant (Xu et al. 2007).
  liver_reaction_1247841: liver_species_167682 + liver_species_1181062 => liver_species_1247845; k_forcat_reaction_1247841*liver_species_167682*liver_species_1181062; liver_reaction_1247841 is "liver PLCG1 binds to ligand-responsive p-6Y-EGFR mutants";
  // Upon dimerization, EGFRvIII mutants trans-autophosphorylate on tyrosine residues Y1016 i.e. Y992 in the mature protein, Y1092 i.e. Y1068 in the mature protein, Y1110 i.e. Y0186 in the mature protein, Y1172 i.e. Y1148 in the mature protein and Y1197 i.e. Y1173 in the mature protein, while the tyrosine residue Y1069 i.e. Y1045 in the mature protein, a docking site for CBL, remains either unphosphorylated or hypophosphorylated, allowing EGFRvIII to activate downstream signaling cascades while escaping downregulation.
  hearth_reaction_1248655: 10 hearth_species_113592 + hearth_species_1248010 => 10 hearth_species_29370 + hearth_species_1248654; hearth_species_1248010*1*(k_forcat_reaction_1248655*(hearth_speciesreference_1248655_input_113592/k_reaction_1248655_species_113592)^10*(hearth_speciesreference_1248655_input_1248010/k_reaction_1248655_species_1248010)^1/((1 + hearth_speciesreference_1248655_input_113592/k_reaction_1248655_species_113592 + (hearth_speciesreference_1248655_input_113592/k_reaction_1248655_species_113592)^2 + (hearth_speciesreference_1248655_input_113592/k_reaction_1248655_species_113592)^3 + (hearth_speciesreference_1248655_input_113592/k_reaction_1248655_species_113592)^4 + (hearth_speciesreference_1248655_input_113592/k_reaction_1248655_species_113592)^5 + (hearth_speciesreference_1248655_input_113592/k_reaction_1248655_species_113592)^6 + (hearth_speciesreference_1248655_input_113592/k_reaction_1248655_species_113592)^7 + (hearth_speciesreference_1248655_input_113592/k_reaction_1248655_species_113592)^8 + (hearth_speciesreference_1248655_input_113592/k_reaction_1248655_species_113592)^9 + (hearth_speciesreference_1248655_input_113592/k_reaction_1248655_species_113592)^10)*(1 + hearth_speciesreference_1248655_input_1248010/k_reaction_1248655_species_1248010))); hearth_reaction_1248655 is "hearth Trans-autophosphorylation of EGFRvIII mutant dimers";
  // Upon dimerization, EGFRvIII mutants trans-autophosphorylate on tyrosine residues Y1016 i.e. Y992 in the mature protein, Y1092 i.e. Y1068 in the mature protein, Y1110 i.e. Y0186 in the mature protein, Y1172 i.e. Y1148 in the mature protein and Y1197 i.e. Y1173 in the mature protein, while the tyrosine residue Y1069 i.e. Y1045 in the mature protein, a docking site for CBL, remains either unphosphorylated or hypophosphorylated, allowing EGFRvIII to activate downstream signaling cascades while escaping downregulation.
  liver_reaction_1248655: 10 liver_species_113592 + liver_species_1248010 => 10 liver_species_29370 + liver_species_1248654; liver_species_1248010*1*(k_forcat_reaction_1248655*(liver_speciesreference_1248655_input_113592/k_reaction_1248655_species_113592)^10*(liver_speciesreference_1248655_input_1248010/k_reaction_1248655_species_1248010)^1/((1 + liver_speciesreference_1248655_input_113592/k_reaction_1248655_species_113592 + (liver_speciesreference_1248655_input_113592/k_reaction_1248655_species_113592)^2 + (liver_speciesreference_1248655_input_113592/k_reaction_1248655_species_113592)^3 + (liver_speciesreference_1248655_input_113592/k_reaction_1248655_species_113592)^4 + (liver_speciesreference_1248655_input_113592/k_reaction_1248655_species_113592)^5 + (liver_speciesreference_1248655_input_113592/k_reaction_1248655_species_113592)^6 + (liver_speciesreference_1248655_input_113592/k_reaction_1248655_species_113592)^7 + (liver_speciesreference_1248655_input_113592/k_reaction_1248655_species_113592)^8 + (liver_speciesreference_1248655_input_113592/k_reaction_1248655_species_113592)^9 + (liver_speciesreference_1248655_input_113592/k_reaction_1248655_species_113592)^10)*(1 + liver_speciesreference_1248655_input_1248010/k_reaction_1248655_species_1248010))); liver_reaction_1248655 is "liver Trans-autophosphorylation of EGFRvIII mutant dimers";
  // Direct binding of GRB2:SOS1 complex to phosphorylated homodimers of EGFRvIII cancer mutant has not been tested. GRB2 binds to phosphorylated tyrosine residues Y1068 and Y1086 (corresponding to Y1092 and Y1110, respectively, when counting from the first amino acid of the EGFR precursor, prior to cleavage of the 24-amino acid signal peptide at the N-terminus). Phosphorylation of Y1068 (i.e. Y1092) has been directly demonstrated in EGFRvIII mutant (Huang et al. 2007).
  hearth_reaction_5637770: hearth_species_109797 + hearth_species_1248654 => hearth_species_5637697; k_forcat_reaction_5637770*hearth_species_109797*hearth_species_1248654; hearth_reaction_5637770 is "hearth Binding of GRB2:SOS1 complex to phosphorylated EGFRvIII";
  // Direct binding of GRB2:SOS1 complex to phosphorylated homodimers of EGFRvIII cancer mutant has not been tested. GRB2 binds to phosphorylated tyrosine residues Y1068 and Y1086 (corresponding to Y1092 and Y1110, respectively, when counting from the first amino acid of the EGFR precursor, prior to cleavage of the 24-amino acid signal peptide at the N-terminus). Phosphorylation of Y1068 (i.e. Y1092) has been directly demonstrated in EGFRvIII mutant (Huang et al. 2007).
  liver_reaction_5637770: liver_species_109797 + liver_species_1248654 => liver_species_5637697; k_forcat_reaction_5637770*liver_species_109797*liver_species_1248654; liver_reaction_5637770 is "liver Binding of GRB2:SOS1 complex to phosphorylated EGFRvIII";
  // Once recruited, PLC-gamma 1 is assumed to be phosphorylated by EGFR cancer mutants in the same way it is phosphorylated by the wild-type EGFR.
  hearth_reaction_1247844: hearth_species_1247845 + 4 hearth_species_113592 => hearth_species_1247846 + 4 hearth_species_29370; hearth_species_1247845*1*(k_forcat_reaction_1247844*(hearth_speciesreference_1247844_input_1247845/k_reaction_1247844_species_1247845)^1*(hearth_speciesreference_1247844_input_113592/k_reaction_1247844_species_113592)^4/((1 + hearth_speciesreference_1247844_input_1247845/k_reaction_1247844_species_1247845)*(1 + hearth_speciesreference_1247844_input_113592/k_reaction_1247844_species_113592 + (hearth_speciesreference_1247844_input_113592/k_reaction_1247844_species_113592)^2 + (hearth_speciesreference_1247844_input_113592/k_reaction_1247844_species_113592)^3 + (hearth_speciesreference_1247844_input_113592/k_reaction_1247844_species_113592)^4))); hearth_reaction_1247844 is "hearth Phosphorylation of PLCG1 by ligand-responsive p-6Y-EGFR mutants";
  // Once recruited, PLC-gamma 1 is assumed to be phosphorylated by EGFR cancer mutants in the same way it is phosphorylated by the wild-type EGFR.
  liver_reaction_1247844: liver_species_1247845 + 4 liver_species_113592 => liver_species_1247846 + 4 liver_species_29370; liver_species_1247845*1*(k_forcat_reaction_1247844*(liver_speciesreference_1247844_input_1247845/k_reaction_1247844_species_1247845)^1*(liver_speciesreference_1247844_input_113592/k_reaction_1247844_species_113592)^4/((1 + liver_speciesreference_1247844_input_1247845/k_reaction_1247844_species_1247845)*(1 + liver_speciesreference_1247844_input_113592/k_reaction_1247844_species_113592 + (liver_speciesreference_1247844_input_113592/k_reaction_1247844_species_113592)^2 + (liver_speciesreference_1247844_input_113592/k_reaction_1247844_species_113592)^3 + (liver_speciesreference_1247844_input_113592/k_reaction_1247844_species_113592)^4))); liver_reaction_1247844 is "liver Phosphorylation of PLCG1 by ligand-responsive p-6Y-EGFR mutants";
  // Once phosphorylated, PLC-gamma 1 is expected to dissociate from phosphorylated EGFR cancer mutants and induce downstream signaling in the same way it does when activated by the wild-type EGFR. However, except for the phosphorylation of PLCG1 binding site in EGFR cancer mutants, other events involved in activation of PLCG1 signaling have not been studied in cells expressing EGFR cancer mutants.
  hearth_reaction_1247842: hearth_species_1247846 => hearth_species_167679 + hearth_species_1181062; k_forcat_reaction_1247842*hearth_species_1247846; hearth_reaction_1247842 is "hearth Dissociation of phosphorylated PLCG1 from ligand-responsive p-6Y-EGFR mutants";
  // Once phosphorylated, PLC-gamma 1 is expected to dissociate from phosphorylated EGFR cancer mutants and induce downstream signaling in the same way it does when activated by the wild-type EGFR. However, except for the phosphorylation of PLCG1 binding site in EGFR cancer mutants, other events involved in activation of PLCG1 signaling have not been studied in cells expressing EGFR cancer mutants.
  liver_reaction_1247842: liver_species_1247846 => liver_species_167679 + liver_species_1181062; k_forcat_reaction_1247842*liver_species_1247846; liver_reaction_1247842 is "liver Dissociation of phosphorylated PLCG1 from ligand-responsive p-6Y-EGFR mutants";
  // Phosphorylated CBL does not ubiquitinate EGFR kinase domain mutants efficiently, which enables mutant proteins to escape degradation. There are indications that phosphorylated CBL shows decreased affinity for EGFR kinase domain mutants compared to wild-type EGFR proteins, and quickly dissociates, before ubiquitination is completed. This decreased affinity may be due to altered structure of EGFR kinase domain mutants or to the presence of the chaperone protein HSP90 in complex with the mutant protein. Weaker afinity for phosphorylated CBL was directly demonstrated for EGFR L858R mutant (Yang et al. 2006), and poor ubiquitination inspite of CBL binding was shown for EGFR L858R and EGFR E746_A750del mutants (Yang et al. 2006, Padron et al. 2007). Association of HSP90 with active dimers of phospho-EGFR KD mutants negatively affects phospho-CBL-mediated ubiquitination of EGFR. Binding of HSP90 may decrease the affinity of active dimers of phospho-EGFR KD mutants for phospho-CBL, so that CBL dissociates from the complex upon phosphorylation and cannot perform ubiquitination.
  hearth_reaction_1225956: 2 hearth_species_113595 + hearth_species_1225857 => ; hearth_species_1225857*(k_inhibitor_modifierspeciesreference_1225956_negativeregulator_1225855/(k_inhibitor_modifierspeciesreference_1225956_negativeregulator_1225855 + hearth_species_1225855))*(k_forcat_reaction_1225956*(hearth_speciesreference_1225956_input_113595/k_reaction_1225956_species_113595)^2*(hearth_speciesreference_1225956_input_1225857/k_reaction_1225956_species_1225857)^1/((1 + hearth_speciesreference_1225956_input_113595/k_reaction_1225956_species_113595 + (hearth_speciesreference_1225956_input_113595/k_reaction_1225956_species_113595)^2)*(1 + hearth_speciesreference_1225956_input_1225857/k_reaction_1225956_species_1225857))); hearth_reaction_1225956 is "hearth Inefficient ubiquitination of ligand-responsive p-6Y-EGFR mutants by p-Y371-CBL";  // modifiers: hearth_species_1225855
  // Phosphorylated CBL does not ubiquitinate EGFR kinase domain mutants efficiently, which enables mutant proteins to escape degradation. There are indications that phosphorylated CBL shows decreased affinity for EGFR kinase domain mutants compared to wild-type EGFR proteins, and quickly dissociates, before ubiquitination is completed. This decreased affinity may be due to altered structure of EGFR kinase domain mutants or to the presence of the chaperone protein HSP90 in complex with the mutant protein. Weaker afinity for phosphorylated CBL was directly demonstrated for EGFR L858R mutant (Yang et al. 2006), and poor ubiquitination inspite of CBL binding was shown for EGFR L858R and EGFR E746_A750del mutants (Yang et al. 2006, Padron et al. 2007). Association of HSP90 with active dimers of phospho-EGFR KD mutants negatively affects phospho-CBL-mediated ubiquitination of EGFR. Binding of HSP90 may decrease the affinity of active dimers of phospho-EGFR KD mutants for phospho-CBL, so that CBL dissociates from the complex upon phosphorylation and cannot perform ubiquitination.
  liver_reaction_1225956: 2 liver_species_113595 + liver_species_1225857 => ; liver_species_1225857*(k_inhibitor_modifierspeciesreference_1225956_negativeregulator_1225855/(k_inhibitor_modifierspeciesreference_1225956_negativeregulator_1225855 + liver_species_1225855))*(k_forcat_reaction_1225956*(liver_speciesreference_1225956_input_113595/k_reaction_1225956_species_113595)^2*(liver_speciesreference_1225956_input_1225857/k_reaction_1225956_species_1225857)^1/((1 + liver_speciesreference_1225956_input_113595/k_reaction_1225956_species_113595 + (liver_speciesreference_1225956_input_113595/k_reaction_1225956_species_113595)^2)*(1 + liver_speciesreference_1225956_input_1225857/k_reaction_1225956_species_1225857))); liver_reaction_1225956 is "liver Inefficient ubiquitination of ligand-responsive p-6Y-EGFR mutants by p-Y371-CBL";  // modifiers: liver_species_1225855
  // Recruitment of GRB2:SOS1 complex by SHC1 bound to phosphorylated dimers of EGFRvIII cancer mutant has not been directly tested, but is assumed to happen in the same way it happens with the SHC1 bound to the phosphorylated homodimer of wild-type EGFR (Chardin et al. 1993).
  hearth_reaction_5637798: hearth_species_5637703 + hearth_species_109797 => hearth_species_5637704; k_forcat_reaction_5637798*hearth_species_5637703*hearth_species_109797; hearth_reaction_5637798 is "hearth Phosphorylated SHC1 in complex with p-5Y-EGFRvIII recruits GRB2:SOS1 complex";
  // Recruitment of GRB2:SOS1 complex by SHC1 bound to phosphorylated dimers of EGFRvIII cancer mutant has not been directly tested, but is assumed to happen in the same way it happens with the SHC1 bound to the phosphorylated homodimer of wild-type EGFR (Chardin et al. 1993).
  liver_reaction_5637798: liver_species_5637703 + liver_species_109797 => liver_species_5637704; k_forcat_reaction_5637798*liver_species_5637703*liver_species_109797; liver_reaction_5637798 is "liver Phosphorylated SHC1 in complex with p-5Y-EGFRvIII recruits GRB2:SOS1 complex";
  // Ligand-responsive EGFR mutants are able to bind EGF and exhibit increased activity in the presence of EGF.
  hearth_reaction_1220612: hearth_species_179863 + hearth_species_1218825 => hearth_species_1220578; k_forcat_reaction_1220612*hearth_species_179863*hearth_species_1218825; hearth_reaction_1220612 is "hearth Binding of EGF to ligand-responsive EGFR mutants";
  // Ligand-responsive EGFR mutants are able to bind EGF and exhibit increased activity in the presence of EGF.
  liver_reaction_1220612: liver_species_179863 + liver_species_1218825 => liver_species_1220578; k_forcat_reaction_1220612*liver_species_179863*liver_species_1218825; liver_reaction_1220612 is "liver Binding of EGF to ligand-responsive EGFR mutants";
  // SOS1 is the guanine nucleotide exchange factor (GEF) for RAS. SOS1, recruited by GRB2 bound to p-SHC1:p-EGFR mutants, is assumed to activate RAS nucleotide exchange from the inactive form (bound to GDP) to an active form (bound to GTP). Although this reaction has not been shown to occur directly for EGFR cancer mutants, activation of RAF/MAP kinase cascade, through detection of phosphorylated ERK1/2, has been demonstrated in cells expressing EGFR L858R mutant (Sordella et al. 2004, Paez et al. 2004, Shimamura et al. 2005), EGFR E746_A750 mutant (Sordella et al. 2004, Shimamura et al. 2005), EGFR L747_P753delinS mutant (Sordella et al. 2004), and EGFR E746_A750del;T790M double mutant (Shimamura et al. 2005).
  hearth_reaction_1225957: hearth_species_109796 + hearth_species_29438 => hearth_species_109783 + hearth_species_29420; hearth_species_1225856*1*(k_forcat_reaction_1225957*(hearth_speciesreference_1225957_input_109796/k_reaction_1225957_species_109796)^1*(hearth_speciesreference_1225957_input_29438/k_reaction_1225957_species_29438)^1/((1 + hearth_speciesreference_1225957_input_109796/k_reaction_1225957_species_109796)*(1 + hearth_speciesreference_1225957_input_29438/k_reaction_1225957_species_29438))); hearth_reaction_1225957 is "hearth SOS-mediated nucleotide exchange of RAS (mediated by GRB2:SOS1 in complex with phosphorylated SHC1 and ligand-responsive p-6Y-EGFR mutants)";  // modifiers: hearth_species_1225856
  // SOS1 is the guanine nucleotide exchange factor (GEF) for RAS. SOS1, recruited by GRB2 bound to p-SHC1:p-EGFR mutants, is assumed to activate RAS nucleotide exchange from the inactive form (bound to GDP) to an active form (bound to GTP). Although this reaction has not been shown to occur directly for EGFR cancer mutants, activation of RAF/MAP kinase cascade, through detection of phosphorylated ERK1/2, has been demonstrated in cells expressing EGFR L858R mutant (Sordella et al. 2004, Paez et al. 2004, Shimamura et al. 2005), EGFR E746_A750 mutant (Sordella et al. 2004, Shimamura et al. 2005), EGFR L747_P753delinS mutant (Sordella et al. 2004), and EGFR E746_A750del;T790M double mutant (Shimamura et al. 2005).
  liver_reaction_1225957: liver_species_109796 + liver_species_29438 => liver_species_109783 + liver_species_29420; liver_species_1225856*1*(k_forcat_reaction_1225957*(liver_speciesreference_1225957_input_109796/k_reaction_1225957_species_109796)^1*(liver_speciesreference_1225957_input_29438/k_reaction_1225957_species_29438)^1/((1 + liver_speciesreference_1225957_input_109796/k_reaction_1225957_species_109796)*(1 + liver_speciesreference_1225957_input_29438/k_reaction_1225957_species_29438))); liver_reaction_1225957 is "liver SOS-mediated nucleotide exchange of RAS (mediated by GRB2:SOS1 in complex with phosphorylated SHC1 and ligand-responsive p-6Y-EGFR mutants)";  // modifiers: liver_species_1225856
  // Direct binding of the GRB2:GAB1 complex to phosphorylated homodimers of EGFRvIII cancer mutant has not been tested. This complex is recruted to EGFR via GRB2 binding to phosphorylated tyrosine residues Y1068 and Y1086 (corresponding to Y1092 and Y1110, respectively, when counting from the first amino acid of the EGFR precursor, prior to cleavage of the 24-amino acid signal peptide at the N-terminus). Phosphorylation of Y1068 (i.e. Y1092) has been directly demonstrated in EGFRvIII mutant (Huang et al. 2007).
  hearth_reaction_5637764: hearth_species_179849 + hearth_species_1248654 => hearth_species_5637694; k_forcat_reaction_5637764*hearth_species_179849*hearth_species_1248654; hearth_reaction_5637764 is "hearth Binding of GRB2:GAB1 complex to p-EGFRvIII mutant";
  // Direct binding of the GRB2:GAB1 complex to phosphorylated homodimers of EGFRvIII cancer mutant has not been tested. This complex is recruted to EGFR via GRB2 binding to phosphorylated tyrosine residues Y1068 and Y1086 (corresponding to Y1092 and Y1110, respectively, when counting from the first amino acid of the EGFR precursor, prior to cleavage of the 24-amino acid signal peptide at the N-terminus). Phosphorylation of Y1068 (i.e. Y1092) has been directly demonstrated in EGFRvIII mutant (Huang et al. 2007).
  liver_reaction_5637764: liver_species_179849 + liver_species_1248654 => liver_species_5637694; k_forcat_reaction_5637764*liver_species_179849*liver_species_1248654; liver_reaction_5637764 is "liver Binding of GRB2:GAB1 complex to p-EGFRvIII mutant";
  // Benzoquinoid ansamycins (geldanamycin, herbimycin, and geldanamycin derivatives 17-AAG, 17-DMAG and IPI-504) are antitumor antibiotics that inactivate HSP90 by binding to its substrate-binding pocket.
  hearth_reaction_1218824: 2 hearth_species_1217511 + hearth_species_1221657 => hearth_species_1218829; k_forcat_reaction_1218824*hearth_species_1217511^2*hearth_species_1221657; hearth_reaction_1218824 is "hearth HSP90 is inactivated by binding to benzaquinoid ansamycins";
  // Benzoquinoid ansamycins (geldanamycin, herbimycin, and geldanamycin derivatives 17-AAG, 17-DMAG and IPI-504) are antitumor antibiotics that inactivate HSP90 by binding to its substrate-binding pocket.
  liver_reaction_1218824: 2 liver_species_1217511 + liver_species_1221657 => liver_species_1218829; k_forcat_reaction_1218824*liver_species_1217511^2*liver_species_1221657; liver_reaction_1218824 is "liver HSP90 is inactivated by binding to benzaquinoid ansamycins";
  // Recruitment of GRB2:SOS1 complex by SHC1 bound to phosphorylated dimers of EGFR cancer mutants has not been directly tested, but is assumed to happen in the same way it happens with the SHC1 bound to the phosphorylated homodimer of wild-type EGFR.
  hearth_reaction_1225961: hearth_species_109797 + hearth_species_1225854 => hearth_species_1225856; k_forcat_reaction_1225961*hearth_species_109797*hearth_species_1225854; hearth_reaction_1225961 is "hearth Phosphorylated SHC1 in complex with ligand-responsive p-6Y-EGFR mutants recruits GRB2:SOS1 complex";
  // Recruitment of GRB2:SOS1 complex by SHC1 bound to phosphorylated dimers of EGFR cancer mutants has not been directly tested, but is assumed to happen in the same way it happens with the SHC1 bound to the phosphorylated homodimer of wild-type EGFR.
  liver_reaction_1225961: liver_species_109797 + liver_species_1225854 => liver_species_1225856; k_forcat_reaction_1225961*liver_species_109797*liver_species_1225854; liver_reaction_1225961 is "liver Phosphorylated SHC1 in complex with ligand-responsive p-6Y-EGFR mutants recruits GRB2:SOS1 complex";
  // Tyrosine residue Y992 (corresponding to Y1016 when counting from the first amino acid of the EGFR precursor, prior to cleavage of the 24-amino acid signal peptide at the N-terminus), a docking site for PLC-gamma 1 (PLCG1), is phosphorylated in EGFRvIII cancer mutant and expected to recruit PLC-gamma 1 in the same way as the wild-type EGFR receptor (Grandal et al. 2007).
  hearth_reaction_5637792: hearth_species_167682 + hearth_species_1248654 => hearth_species_5637698; k_forcat_reaction_5637792*hearth_species_167682*hearth_species_1248654; hearth_reaction_5637792 is "hearth PLC-gamma 1 binds to p-EGFRvIII mutant";
  // Tyrosine residue Y992 (corresponding to Y1016 when counting from the first amino acid of the EGFR precursor, prior to cleavage of the 24-amino acid signal peptide at the N-terminus), a docking site for PLC-gamma 1 (PLCG1), is phosphorylated in EGFRvIII cancer mutant and expected to recruit PLC-gamma 1 in the same way as the wild-type EGFR receptor (Grandal et al. 2007).
  liver_reaction_5637792: liver_species_167682 + liver_species_1248654 => liver_species_5637698; k_forcat_reaction_5637792*liver_species_167682*liver_species_1248654; liver_reaction_5637792 is "liver PLC-gamma 1 binds to p-EGFRvIII mutant";
  // EGFRvIII cancer mutant is assumed to recruit the PI3K complex PIK3CA:PIK3R1 in a manner similar to wild-type EGFR (Rodrigues et al. 2000).
  hearth_reaction_5637765: hearth_species_5637694 + hearth_species_1806218 => hearth_species_5637693; k_forcat_reaction_5637765*hearth_species_5637694*hearth_species_1806218; hearth_reaction_5637765 is "hearth Binding of PI3K to complex of GRB2:GAB1 and p-EGFRvIII";
  // EGFRvIII cancer mutant is assumed to recruit the PI3K complex PIK3CA:PIK3R1 in a manner similar to wild-type EGFR (Rodrigues et al. 2000).
  liver_reaction_5637765: liver_species_5637694 + liver_species_1806218 => liver_species_5637693; k_forcat_reaction_5637765*liver_species_5637694*liver_species_1806218; liver_reaction_5637765 is "liver Binding of PI3K to complex of GRB2:GAB1 and p-EGFRvIII";
  // Based on the wild-type EGFR signaling, it is assumed that the guanine nucleotide exchange factor SOS1 interacts with phosphorylated EGFR mutants through the adaptor protein, GRB2. Upon formation of this complex, SOS1 activates RAS by promoting GDP release and GTP binding. Although this reaction has not been directly confirmed for EGFR cancer mutants, activation of RAF/MAP kinase cascade has been demonstrated, through detection of phosphorylated ERK1/2, in cells expressing EGFR L858R mutant (Sordella et al. 2004, Paez et al. 2004, Shimamura et al. 2005), EGFR E746_A750del mutant (Sordella et al. 2004, Shimamura et al. 2005), EGFR L747_P753delinsS mutant (Sordella et al. 2004) and EGFR E746_A750del;T790M double mutant (Shimamura et al. 2005).
  hearth_reaction_1225951: hearth_species_109796 + hearth_species_29438 => hearth_species_109783 + hearth_species_29420; hearth_species_1225859*1*(k_forcat_reaction_1225951*(hearth_speciesreference_1225951_input_109796/k_reaction_1225951_species_109796)^1*(hearth_speciesreference_1225951_input_29438/k_reaction_1225951_species_29438)^1/((1 + hearth_speciesreference_1225951_input_109796/k_reaction_1225951_species_109796)*(1 + hearth_speciesreference_1225951_input_29438/k_reaction_1225951_species_29438))); hearth_reaction_1225951 is "hearth SOS-mediated nucleotide exchange of RAS (mediated by GRB2:SOS1 in complex with ligand-responsive p-6Y-EGFR mutants)";  // modifiers: hearth_species_1225859
  // Based on the wild-type EGFR signaling, it is assumed that the guanine nucleotide exchange factor SOS1 interacts with phosphorylated EGFR mutants through the adaptor protein, GRB2. Upon formation of this complex, SOS1 activates RAS by promoting GDP release and GTP binding. Although this reaction has not been directly confirmed for EGFR cancer mutants, activation of RAF/MAP kinase cascade has been demonstrated, through detection of phosphorylated ERK1/2, in cells expressing EGFR L858R mutant (Sordella et al. 2004, Paez et al. 2004, Shimamura et al. 2005), EGFR E746_A750del mutant (Sordella et al. 2004, Shimamura et al. 2005), EGFR L747_P753delinsS mutant (Sordella et al. 2004) and EGFR E746_A750del;T790M double mutant (Shimamura et al. 2005).
  liver_reaction_1225951: liver_species_109796 + liver_species_29438 => liver_species_109783 + liver_species_29420; liver_species_1225859*1*(k_forcat_reaction_1225951*(liver_speciesreference_1225951_input_109796/k_reaction_1225951_species_109796)^1*(liver_speciesreference_1225951_input_29438/k_reaction_1225951_species_29438)^1/((1 + liver_speciesreference_1225951_input_109796/k_reaction_1225951_species_109796)*(1 + liver_speciesreference_1225951_input_29438/k_reaction_1225951_species_29438))); liver_reaction_1225951 is "liver SOS-mediated nucleotide exchange of RAS (mediated by GRB2:SOS1 in complex with ligand-responsive p-6Y-EGFR mutants)";  // modifiers: liver_species_1225859
  // Association of EGFRvIII mutant with HSP90 chaperone protein and its co-chaperone CDC37 is necessary for the proper functioning of mutant EGFR.
  hearth_reaction_1247999: hearth_species_1225828 + hearth_species_1214162 + hearth_species_1221657 => hearth_species_1248004; k_forcat_reaction_1247999*hearth_species_1225828*hearth_species_1214162*hearth_species_1221657; hearth_reaction_1247999 is "hearth EGFRvIII mutant binds chaperone proteins HSP90 and CDC37";
  // Association of EGFRvIII mutant with HSP90 chaperone protein and its co-chaperone CDC37 is necessary for the proper functioning of mutant EGFR.
  liver_reaction_1247999: liver_species_1225828 + liver_species_1214162 + liver_species_1221657 => liver_species_1248004; k_forcat_reaction_1247999*liver_species_1225828*liver_species_1214162*liver_species_1221657; liver_reaction_1247999 is "liver EGFRvIII mutant binds chaperone proteins HSP90 and CDC37";
  // The cytoplasmic domain of EGFR contains tyrosine, serine and threonine phosphorylation sites. Activation of ligand-responsive EGFR mutants through spontaneous or EGF-induced dimerization results in trans-autophosphorylation of 5 tyrosine residues (Y1016 i.e. Y992 in the mature protein, Y1092 i.e. Y1068 in the mature protein, Y1110 i.e. Y1086 in the mature protein,Y1172 i.e. Y1148 in the mature protein and Y1197 i.e. Y1173 in the mature protein), which enables constitutive receptor signaling as it provides specific binding sites for cytosolic target proteins involved in signal transduction (Zhang et al. 2006, Yun et al. 2007, Sordella et al. 2004, Lee et al. 2006). Tyrosine residue Y1069 i.e. Y1045 in the mature protein, involved in EGFR down-regulation, is usually phosphorylated in ligand-responsive EGFR mutants (Sordella et al. 2004, Lee et al. 2006). The exact phosphorylation pattern has not been examined for each mutant, but is assumed to closely follow, based on existing experimental evidence, the trans-autophosphorylation pattern of the wild-type EGFR.
  hearth_reaction_1169421: 12 hearth_species_113592 + hearth_species_1220582 => 12 hearth_species_29370 + hearth_species_1181062; hearth_species_1220582*1*(k_forcat_reaction_1169421*(hearth_speciesreference_1169421_input_113592/k_reaction_1169421_species_113592)^12*(hearth_speciesreference_1169421_input_1220582/k_reaction_1169421_species_1220582)^1/((1 + hearth_speciesreference_1169421_input_113592/k_reaction_1169421_species_113592 + (hearth_speciesreference_1169421_input_113592/k_reaction_1169421_species_113592)^2 + (hearth_speciesreference_1169421_input_113592/k_reaction_1169421_species_113592)^3 + (hearth_speciesreference_1169421_input_113592/k_reaction_1169421_species_113592)^4 + (hearth_speciesreference_1169421_input_113592/k_reaction_1169421_species_113592)^5 + (hearth_speciesreference_1169421_input_113592/k_reaction_1169421_species_113592)^6 + (hearth_speciesreference_1169421_input_113592/k_reaction_1169421_species_113592)^7 + (hearth_speciesreference_1169421_input_113592/k_reaction_1169421_species_113592)^8 + (hearth_speciesreference_1169421_input_113592/k_reaction_1169421_species_113592)^9 + (hearth_speciesreference_1169421_input_113592/k_reaction_1169421_species_113592)^10 + (hearth_speciesreference_1169421_input_113592/k_reaction_1169421_species_113592)^11 + (hearth_speciesreference_1169421_input_113592/k_reaction_1169421_species_113592)^12)*(1 + hearth_speciesreference_1169421_input_1220582/k_reaction_1169421_species_1220582))); hearth_reaction_1169421 is "hearth Trans-autophosphorylation of activated ligand-responsive EGFR mutant dimers";
  // The cytoplasmic domain of EGFR contains tyrosine, serine and threonine phosphorylation sites. Activation of ligand-responsive EGFR mutants through spontaneous or EGF-induced dimerization results in trans-autophosphorylation of 5 tyrosine residues (Y1016 i.e. Y992 in the mature protein, Y1092 i.e. Y1068 in the mature protein, Y1110 i.e. Y1086 in the mature protein,Y1172 i.e. Y1148 in the mature protein and Y1197 i.e. Y1173 in the mature protein), which enables constitutive receptor signaling as it provides specific binding sites for cytosolic target proteins involved in signal transduction (Zhang et al. 2006, Yun et al. 2007, Sordella et al. 2004, Lee et al. 2006). Tyrosine residue Y1069 i.e. Y1045 in the mature protein, involved in EGFR down-regulation, is usually phosphorylated in ligand-responsive EGFR mutants (Sordella et al. 2004, Lee et al. 2006). The exact phosphorylation pattern has not been examined for each mutant, but is assumed to closely follow, based on existing experimental evidence, the trans-autophosphorylation pattern of the wild-type EGFR.
  liver_reaction_1169421: 12 liver_species_113592 + liver_species_1220582 => 12 liver_species_29370 + liver_species_1181062; liver_species_1220582*1*(k_forcat_reaction_1169421*(liver_speciesreference_1169421_input_113592/k_reaction_1169421_species_113592)^12*(liver_speciesreference_1169421_input_1220582/k_reaction_1169421_species_1220582)^1/((1 + liver_speciesreference_1169421_input_113592/k_reaction_1169421_species_113592 + (liver_speciesreference_1169421_input_113592/k_reaction_1169421_species_113592)^2 + (liver_speciesreference_1169421_input_113592/k_reaction_1169421_species_113592)^3 + (liver_speciesreference_1169421_input_113592/k_reaction_1169421_species_113592)^4 + (liver_speciesreference_1169421_input_113592/k_reaction_1169421_species_113592)^5 + (liver_speciesreference_1169421_input_113592/k_reaction_1169421_species_113592)^6 + (liver_speciesreference_1169421_input_113592/k_reaction_1169421_species_113592)^7 + (liver_speciesreference_1169421_input_113592/k_reaction_1169421_species_113592)^8 + (liver_speciesreference_1169421_input_113592/k_reaction_1169421_species_113592)^9 + (liver_speciesreference_1169421_input_113592/k_reaction_1169421_species_113592)^10 + (liver_speciesreference_1169421_input_113592/k_reaction_1169421_species_113592)^11 + (liver_speciesreference_1169421_input_113592/k_reaction_1169421_species_113592)^12)*(1 + liver_speciesreference_1169421_input_1220582/k_reaction_1169421_species_1220582))); liver_reaction_1169421 is "liver Trans-autophosphorylation of activated ligand-responsive EGFR mutant dimers";
  // Based on the wild-type EGFR signaling, it is assumed that the guanine nucleotide exchange factor SOS1 interacts with phosphorylated EGFRvIII mutant through the adaptor protein, GRB2. Upon formation of this complex, SOS1 activates RAS by promoting GDP release and GTP binding. Although this reaction has not been directly confirmed for EGFRvIII cancer mutant, RAS-MAPK signaling cascade is activated in cells expressing EGFRvIII (Montgomery et al.1995).
  hearth_reaction_5637806: hearth_species_109796 + hearth_species_29438 => hearth_species_109783 + hearth_species_29420; hearth_species_5637697*1*(k_forcat_reaction_5637806*(hearth_speciesreference_5637806_input_109796/k_reaction_5637806_species_109796)^1*(hearth_speciesreference_5637806_input_29438/k_reaction_5637806_species_29438)^1/((1 + hearth_speciesreference_5637806_input_109796/k_reaction_5637806_species_109796)*(1 + hearth_speciesreference_5637806_input_29438/k_reaction_5637806_species_29438))); hearth_reaction_5637806 is "hearth SOS-mediated nucleotide exchange of RAS (mediated by GRB2:SOS1 in complex with p-EGFRvIII)";  // modifiers: hearth_species_5637697
  // Based on the wild-type EGFR signaling, it is assumed that the guanine nucleotide exchange factor SOS1 interacts with phosphorylated EGFRvIII mutant through the adaptor protein, GRB2. Upon formation of this complex, SOS1 activates RAS by promoting GDP release and GTP binding. Although this reaction has not been directly confirmed for EGFRvIII cancer mutant, RAS-MAPK signaling cascade is activated in cells expressing EGFRvIII (Montgomery et al.1995).
  liver_reaction_5637806: liver_species_109796 + liver_species_29438 => liver_species_109783 + liver_species_29420; liver_species_5637697*1*(k_forcat_reaction_5637806*(liver_speciesreference_5637806_input_109796/k_reaction_5637806_species_109796)^1*(liver_speciesreference_5637806_input_29438/k_reaction_5637806_species_29438)^1/((1 + liver_speciesreference_5637806_input_109796/k_reaction_5637806_species_109796)*(1 + liver_speciesreference_5637806_input_29438/k_reaction_5637806_species_29438))); liver_reaction_5637806 is "liver SOS-mediated nucleotide exchange of RAS (mediated by GRB2:SOS1 in complex with p-EGFRvIII)";  // modifiers: liver_species_5637697
  // EGFRvIII mutant lacks the ligand binding domain and is therefore unable to bind EGFR ligands, but is able to dimerize spontaneously. Self-dimerization may be dependent on N-linked glycosylation.
  hearth_reaction_1248002: 2 hearth_species_1248004 => hearth_species_1248010; k_forcat_reaction_1248002*hearth_species_1248004^2; hearth_reaction_1248002 is "hearth Ligand-independent dimerization of EGFRvIII mutant";
  // EGFRvIII mutant lacks the ligand binding domain and is therefore unable to bind EGFR ligands, but is able to dimerize spontaneously. Self-dimerization may be dependent on N-linked glycosylation.
  liver_reaction_1248002: 2 liver_species_1248004 => liver_species_1248010; k_forcat_reaction_1248002*liver_species_1248004^2; liver_reaction_1248002 is "liver Ligand-independent dimerization of EGFRvIII mutant";
  // In EGFRvIII mutant, Y1069 (i.e. Y1045 in the mature protein) is not phosphorylated (Han et al. 2006, Grandal et al. 2007). Han et al. detected no CBL binding to EGFRvIII mutant (Han et al. 2006), while Grandal et al. detected very little binding, which they explained by indirect recruitment of CBL to EGFRvIII through GRB2 (Grandal et al. 2007).
  hearth_reaction_5637794: hearth_species_1248654 + 2 hearth_species_112199 => ; k_forcat_reaction_5637794*hearth_species_1248654*hearth_species_112199^2; hearth_reaction_5637794 is "hearth EGFRvIII does not bind CBL";
  // In EGFRvIII mutant, Y1069 (i.e. Y1045 in the mature protein) is not phosphorylated (Han et al. 2006, Grandal et al. 2007). Han et al. detected no CBL binding to EGFRvIII mutant (Han et al. 2006), while Grandal et al. detected very little binding, which they explained by indirect recruitment of CBL to EGFRvIII through GRB2 (Grandal et al. 2007).
  liver_reaction_5637794: liver_species_1248654 + 2 liver_species_112199 => ; k_forcat_reaction_5637794*liver_species_1248654*liver_species_112199^2; liver_reaction_5637794 is "liver EGFRvIII does not bind CBL";
  // SHC1 (Src homology 2 domain-containing transforming protein) is known to bind two phosphorylated tyrosine docking sites of EGFR: Y1148 and Y1173 (corresponding to Y1172 and Y1197 when counting from the first amino acid of EGFR precursor, before the cleavage of the 24-amino acid signal peptide at the N-terminus takes place). Phosphorylation of Y1173 tyrosine residue was directly demonstrated in the following EGFR cancer mutants: EGFR L858R mutant (Sordella et al. 2004, Greulich et al. 2005); EGFR G719S mutant (Greulich et al. 2005); EGFR L747_P753delinsS mutant (Sordella et al. 2004); EGFR L747_A750delinsP (Greulich et al. 2005); EGFRvIII mutant (Han et al. 2006, Grandal et al. 2007); EGFR D770_N771insNPG mutant (Greulich et al. 2005, Xu et al. 2007); EGFR N771_H773dup mutant (Xu et al. 2007); EGFR K739_I744dup mutant (Xu et al. 2007); EGFR A767_V769dup mutant (Xu et al. 2007). Phosphorylation of Y1148 was shown in EGFRvIII mutant (Huang et al. 2007). Besides EGFR L858R mutant, which was directly shown to bind SHC1 (Greulich et al. 2005), binding of SHC1 was not tested in other EGFR cancer mutants. Nonetheless, it is assumed that SHC1 binds EGFR cancer mutants in the same way it binds wild-type EGFR.
  hearth_reaction_1225947: hearth_species_1181062 + hearth_species_74680 => hearth_species_1225858; k_forcat_reaction_1225947*hearth_species_1181062*hearth_species_74680; hearth_reaction_1225947 is "hearth Binding of SHC1 to p-6Y-EGFR mutants";
  // SHC1 (Src homology 2 domain-containing transforming protein) is known to bind two phosphorylated tyrosine docking sites of EGFR: Y1148 and Y1173 (corresponding to Y1172 and Y1197 when counting from the first amino acid of EGFR precursor, before the cleavage of the 24-amino acid signal peptide at the N-terminus takes place). Phosphorylation of Y1173 tyrosine residue was directly demonstrated in the following EGFR cancer mutants: EGFR L858R mutant (Sordella et al. 2004, Greulich et al. 2005); EGFR G719S mutant (Greulich et al. 2005); EGFR L747_P753delinsS mutant (Sordella et al. 2004); EGFR L747_A750delinsP (Greulich et al. 2005); EGFRvIII mutant (Han et al. 2006, Grandal et al. 2007); EGFR D770_N771insNPG mutant (Greulich et al. 2005, Xu et al. 2007); EGFR N771_H773dup mutant (Xu et al. 2007); EGFR K739_I744dup mutant (Xu et al. 2007); EGFR A767_V769dup mutant (Xu et al. 2007). Phosphorylation of Y1148 was shown in EGFRvIII mutant (Huang et al. 2007). Besides EGFR L858R mutant, which was directly shown to bind SHC1 (Greulich et al. 2005), binding of SHC1 was not tested in other EGFR cancer mutants. Nonetheless, it is assumed that SHC1 binds EGFR cancer mutants in the same way it binds wild-type EGFR.
  liver_reaction_1225947: liver_species_1181062 + liver_species_74680 => liver_species_1225858; k_forcat_reaction_1225947*liver_species_1181062*liver_species_74680; liver_reaction_1225947 is "liver Binding of SHC1 to p-6Y-EGFR mutants";
  // Although ligand-responsive EGFR mutants dimerize spontaneously, dimerization is increased in the presence of EGF.
  hearth_reaction_1220613: 2 hearth_species_1220578 => hearth_species_1500847; k_forcat_reaction_1220613*hearth_species_1220578^2; hearth_reaction_1220613 is "hearth EGF-induced dimerization of ligand-responsive EGFR mutants";
  // Although ligand-responsive EGFR mutants dimerize spontaneously, dimerization is increased in the presence of EGF.
  liver_reaction_1220613: 2 liver_species_1220578 => liver_species_1500847; k_forcat_reaction_1220613*liver_species_1220578^2; liver_reaction_1220613 is "liver EGF-induced dimerization of ligand-responsive EGFR mutants";
  // EGFR cancer mutants are assumed to recruit the PI3K complex PIK3CA:PIK3R1 in a manner similar to wild-type EGFR.
  hearth_reaction_1226012: hearth_species_1806218 + hearth_species_1226015 => hearth_species_1226013; k_forcat_reaction_1226012*hearth_species_1806218*hearth_species_1226015; hearth_reaction_1226012 is "hearth Binding of PI3K to complex of GRB2:GAB1 and ligand-responsive p-6Y-EGFR mutants";
  // EGFR cancer mutants are assumed to recruit the PI3K complex PIK3CA:PIK3R1 in a manner similar to wild-type EGFR.
  liver_reaction_1226012: liver_species_1806218 + liver_species_1226015 => liver_species_1226013; k_forcat_reaction_1226012*liver_species_1806218*liver_species_1226015; liver_reaction_1226012 is "liver Binding of PI3K to complex of GRB2:GAB1 and ligand-responsive p-6Y-EGFR mutants";
  // Non-covalent (reversible) tyrosine kinase inhibitors (TKIs), erlotinib, gefitinib, lapatinib and vandetanib, selectively inhibit EGFR-stimulated tumor cell growth by blocking EGFR mutant autophosphorylation through competitive inhibition of ATP binding to the kinase domain. A number of EGFR kinase domain mutants and extracellular domain point mutants show increased senistivity to non-covalent TKIs compared with the wild-type EGFR. EGFR kinase domain mutants may be resistant to non-covalent TKIs due to primary or secondary mutations in the kinase domain that increase the affinity of the kinase domain for ATP, such as small insertions within exon 20, and substituion of threonine 790 with methionine (T790M).
  hearth_reaction_1220610: hearth_species_1220582 + 2 hearth_species_1216523 => hearth_species_1220585 + hearth_species_1220587; k_forcat_reaction_1220610*hearth_species_1220582*hearth_species_1216523^2; hearth_reaction_1220610 is "hearth Non-covalent tyrosine kinase inhibitors bind and inactivate sensitive ligand-responsive EGFR cancer mutants";
  // Non-covalent (reversible) tyrosine kinase inhibitors (TKIs), erlotinib, gefitinib, lapatinib and vandetanib, selectively inhibit EGFR-stimulated tumor cell growth by blocking EGFR mutant autophosphorylation through competitive inhibition of ATP binding to the kinase domain. A number of EGFR kinase domain mutants and extracellular domain point mutants show increased senistivity to non-covalent TKIs compared with the wild-type EGFR. EGFR kinase domain mutants may be resistant to non-covalent TKIs due to primary or secondary mutations in the kinase domain that increase the affinity of the kinase domain for ATP, such as small insertions within exon 20, and substituion of threonine 790 with methionine (T790M).
  liver_reaction_1220610: liver_species_1220582 + 2 liver_species_1216523 => liver_species_1220585 + liver_species_1220587; k_forcat_reaction_1220610*liver_species_1220582*liver_species_1216523^2; liver_reaction_1220610 is "liver Non-covalent tyrosine kinase inhibitors bind and inactivate sensitive ligand-responsive EGFR cancer mutants";
  // The kinase activity of PI3K mediates the phosphorylation of PIP2 to form PIP3. It is assumed that EGFR cancer mutants induce PI3K/AKT signaling in a manner similar to wild-type EGFR. Phosphorylation of AKT on serine residue S473, and therby activation of PI3K/AKT signaling cascade, has been directly demonstrated in cells expressing the following EGFR cancer mutants: EGFR L858R mutant (Sordella et al. 2004, Paez et al. 2004, Greulich et al. 2005, Shimamura et al. 2005); EGFR G719S mutant (Greulich et al. 2005); EGFR E746_A750del mutant (Sordella et al. 2004, Shimamura et al. 2005); EGFR L747_P753insS mutant (Sordella et al. 2004); EGFR L747_A750delinsP mutant (Greulich et al. 2005); EGFR L861Q mutant (Lee et al. 2006); EGFR D770_N771insNPG mutant (Greulich et al. 2005, Xu et al. 2007); EGFR N771_H773dup mutant (Xu et al. 2007); EGFR K739_I744dup mutant (Xu et al. 2007); EGFR A767_V769dup mutant (Xu et al. 2007); EGFR E746_A750del;T790M double mutant (Shimamura et al. 2005).
  hearth_reaction_1226014: hearth_species_113592 + hearth_species_179856 => hearth_species_179838 + hearth_species_29370; hearth_species_1226013*1*(k_forcat_reaction_1226014*(hearth_speciesreference_1226014_input_113592/k_reaction_1226014_species_113592)^1*(hearth_speciesreference_1226014_input_179856/k_reaction_1226014_species_179856)^1/((1 + hearth_speciesreference_1226014_input_113592/k_reaction_1226014_species_113592)*(1 + hearth_speciesreference_1226014_input_179856/k_reaction_1226014_species_179856))); hearth_reaction_1226014 is "hearth Conversion of PIP2 to PIP3 by PI3K bound to ligand-responsive p-6Y-EGFR mutants";  // modifiers: hearth_species_1226013
  // The kinase activity of PI3K mediates the phosphorylation of PIP2 to form PIP3. It is assumed that EGFR cancer mutants induce PI3K/AKT signaling in a manner similar to wild-type EGFR. Phosphorylation of AKT on serine residue S473, and therby activation of PI3K/AKT signaling cascade, has been directly demonstrated in cells expressing the following EGFR cancer mutants: EGFR L858R mutant (Sordella et al. 2004, Paez et al. 2004, Greulich et al. 2005, Shimamura et al. 2005); EGFR G719S mutant (Greulich et al. 2005); EGFR E746_A750del mutant (Sordella et al. 2004, Shimamura et al. 2005); EGFR L747_P753insS mutant (Sordella et al. 2004); EGFR L747_A750delinsP mutant (Greulich et al. 2005); EGFR L861Q mutant (Lee et al. 2006); EGFR D770_N771insNPG mutant (Greulich et al. 2005, Xu et al. 2007); EGFR N771_H773dup mutant (Xu et al. 2007); EGFR K739_I744dup mutant (Xu et al. 2007); EGFR A767_V769dup mutant (Xu et al. 2007); EGFR E746_A750del;T790M double mutant (Shimamura et al. 2005).
  liver_reaction_1226014: liver_species_113592 + liver_species_179856 => liver_species_179838 + liver_species_29370; liver_species_1226013*1*(k_forcat_reaction_1226014*(liver_speciesreference_1226014_input_113592/k_reaction_1226014_species_113592)^1*(liver_speciesreference_1226014_input_179856/k_reaction_1226014_species_179856)^1/((1 + liver_speciesreference_1226014_input_113592/k_reaction_1226014_species_113592)*(1 + liver_speciesreference_1226014_input_179856/k_reaction_1226014_species_179856))); liver_reaction_1226014 is "liver Conversion of PIP2 to PIP3 by PI3K bound to ligand-responsive p-6Y-EGFR mutants";  // modifiers: liver_species_1226013
end
