// SBML level 3 version 1
// SBML generated from Reactome version 92 on 4/3/25, 1:52 PM using JSBML version 1.5.

model pathway_1643713()
  // Signaling by EGFR in Cancer
  // The pathway "Signaling by EGFR in Cancer" shows signaling by constitutively active EGFR cancer variants in the context of "Signaling by EGFR", allowing users to compare cancer events with the wild-type EGFR events. Red lines emphasize cancer related events and physical entities, while wild-type entities and events are shaded. Please refer to "Signaling by Ligand-Responsive EGFR Variants in Cancer", "Signaling by EGFRvIII in Cancer" and "Signaling by Overexpressed Wild-Type EGFR in Cancer" for detailed pathway summations.
  // reactome:R-HSA-1643713

  // Compartments:
  compartment plasma_membrane;  // GO:0005886
  compartment cytosol;  // GO:0005829
  compartment extracellular_region;  // GO:0005576

  // Species:
  // Derived from a Reactome DefinedSet. This is a list of alternative entities, any of which can perform the given function
  species species_1220585 in plasma_membrane = 2.520563; species_1220585 is "Resistant ligand-responsive EGFR mutants [plasma membrane]";  // reactome:R-HSA-1220585; hasPart uniprot:P00533 uniprot:Q16543 uniprot:P07900 uniprot:P01133
  // Derived from a Reactome Complex. Here is Reactomes nested structure for this complex: (Q13480, P62993). Reactome uses a nested structure for complexes, which cannot be fully represented in SBML Level 3 Version 1 core
  species GRB2_GAB1_cytosol in cytosol = 1.183149; GRB2_GAB1_cytosol is "GRB2:GAB1 [cytosol]";  // reactome:R-HSA-179849; hasPart uniprot:Q13480 uniprot:P62993; isHomologTo reactome:R-MMU-179849 reactome:R-RNO-179849 reactome:R-CFA-179849 reactome:R-BTA-179849
  // Derived from a Reactome Complex. Here is Reactomes nested structure for this complex: (2xP00533, P19174, 4xQ16543, 4xP07900). Reactome uses a nested structure for complexes, which cannot be fully represented in SBML Level 3 Version 1 core
  species species_5637698 in plasma_membrane = 2.349298; species_5637698 is "p-5Y-EGFRvIII:PLCG1 [plasma membrane]";  // reactome:R-HSA-5637698; hasPart uniprot:P00533 uniprot:P19174 uniprot:Q16543 uniprot:P07900
  // Derived from a Reactome Complex. Here is Reactomes nested structure for this complex: (2xP00533, 4xQ16543, 4xP07900). Reactome uses a nested structure for complexes, which cannot be fully represented in SBML Level 3 Version 1 core
  species species_1248654 in plasma_membrane = 2.39532; species_1248654 is "p-5Y-EGFRvIII mutant dimer [plasma membrane]";  // reactome:R-HSA-1248654; hasPart uniprot:P00533 uniprot:Q16543 uniprot:P07900
  // Derived from a Reactome DefinedSet. This is a list of alternative entities, any of which can perform the given function
  species species_1181062 in plasma_membrane = 2.734942; species_1181062 is "Ligand-responsive p-6Y-EGFR mutant dimers [plasma membrane]";  // reactome:R-HSA-1181062; hasPart uniprot:P00533 uniprot:Q16543 uniprot:P07900 uniprot:P01133
  // Derived from a Reactome Complex. Here is Reactomes nested structure for this complex: (100xP00533, P19174, 16xQ16543, 16xP07900, 4xP01133). Reactome uses a nested structure for complexes, which cannot be fully represented in SBML Level 3 Version 1 core
  species species_1247845 in plasma_membrane = 0.5926541; species_1247845 is "Ligand-responsive p-6Y-EGFR mutants:PLCG1 [plasma membrane]";  // reactome:R-HSA-1247845; hasPart uniprot:P00533 uniprot:P19174 uniprot:Q16543 uniprot:P07900
  // Derived from a Reactome Complex. Here is Reactomes nested structure for this complex: (50xP00533, 8xQ16543, 8xP07900, 4xP01133). Reactome uses a nested structure for complexes, which cannot be fully represented in SBML Level 3 Version 1 core
  species species_1500847 in plasma_membrane = 1.005668; species_1500847 is "EGF:Ligand-responsive EGFR mutants dimer [plasma membrane]";  // reactome:R-HSA-1500847; hasPart uniprot:P00533 uniprot:Q16543 uniprot:P07900 uniprot:P01133
  // Derived from a Reactome Complex. Here is Reactomes nested structure for this complex: (50xP00533, 8xQ16543, 8xP07900). Reactome uses a nested structure for complexes, which cannot be fully represented in SBML Level 3 Version 1 core
  species species_1500849 in plasma_membrane = 2.304689; species_1500849 is "Ligand-responsive EGFR mutants dimer [plasma membrane]";  // reactome:R-HSA-1500849; hasPart uniprot:P00533 uniprot:Q16543 uniprot:P07900
  // Derived from a Reactome Complex. Here is Reactomes nested structure for this complex: (P01111, P01116, P01112, P01116, 37565). Reactome uses a nested structure for complexes, which cannot be fully represented in SBML Level 3 Version 1 core
  species p21_RAS_GTP_plasma_membrane in plasma_membrane = 0.8333241; p21_RAS_GTP_plasma_membrane is "p21 RAS:GTP [plasma membrane]";  // reactome:R-HSA-109783; hasPart uniprot:P01111 uniprot:P01116 uniprot:P01112 CHEBI:37565; isHomologTo reactome:R-MMU-109783 reactome:R-RNO-109783 reactome:R-CFA-109783 reactome:R-BTA-109783
  // Derived from a Reactome DefinedSet. This is a list of alternative entities, any of which can perform the given function
  species Benzoquinoid_ansamycins_cytosol in cytosol = 1.66191; Benzoquinoid_ansamycins_cytosol is "Benzoquinoid ansamycins [cytosol]";  // isDescribedBy pubmed:16024644; reactome:R-ALL-1217511; hasPart iuphar.ligand:7751 iuphar.ligand:5984 iuphar.ligand:9829 iuphar.ligand:9827
  // Derived from a Reactome Complex. Here is Reactomes nested structure for this complex: (100xP00533, P19174, 16xQ16543, 16xP07900, 4xP01133). Reactome uses a nested structure for complexes, which cannot be fully represented in SBML Level 3 Version 1 core
  species species_1247846 in plasma_membrane = 1.432191; species_1247846 is "Ligand-responsive p-6Y-EGFR mutants:p-Y472,771,783,1254-PLCG1 [plasma membrane]";  // reactome:R-HSA-1247846; hasPart uniprot:P00533 uniprot:P19174 uniprot:Q16543 uniprot:P07900
  // Derived from a Reactome Complex. Here is Reactomes nested structure for this complex: (2xO14944, 2xP00533, 2xQ99075, 2xP35070, 2xQ6UW88, 2xP15514, 2xP01135, 2xP01133). Reactome uses a nested structure for complexes, which cannot be fully represented in SBML Level 3 Version 1 core
  species species_9624420 in plasma_membrane = 1.886613; species_9624420 is "EGF-like ligands:EGFR dimer [plasma membrane]";  // reactome:R-HSA-9624420; hasPart uniprot:O14944 uniprot:P00533 uniprot:Q99075 uniprot:P35070; isHomologTo reactome:R-MMU-9624420 reactome:R-RNO-9624420 reactome:R-CFA-9624420 reactome:R-BTA-9624420
  // Derived from a Reactome SimpleEntity. This is a small compound
  species PI_4_5_P2_plasma_membrane in plasma_membrane = 1.094353; PI_4_5_P2_plasma_membrane is "PI(4,5)P2 [plasma membrane]";  // CHEBI:58456 reactome:R-ALL-179856
  // Derived from a Reactome EntityWithAccessionedSequence. This is a protein
  species EGF_extracellular_region in extracellular_region = 1.540203; EGF_extracellular_region is "EGF [extracellular region]";  // uniprot:P01133 reactome:R-HSA-179863; isHomologTo reactome:R-MMU-179863 reactome:R-RNO-179863 reactome:R-CFA-179863 reactome:R-SSC-179863
  // Derived from a Reactome DefinedSet. This is a list of alternative entities, any of which can perform the given function
  species species_1216522 in cytosol = 2.856689; species_1216522 is "Covalent EGFR tyrosine kinase inhibitors [cytosol]";  // reactome:R-ALL-1216522; hasPart iuphar.ligand:7644 iuphar.ligand:5667 iuphar.ligand:5675 iuphar.ligand:5686
  // Derived from a Reactome Complex. Here is Reactomes nested structure for this complex: (100xP00533, 16xQ16543, 16xP07900, 4xP01133, P29353). Reactome uses a nested structure for complexes, which cannot be fully represented in SBML Level 3 Version 1 core
  species species_1225858 in plasma_membrane = 2.748585; species_1225858 is "Ligand-responsive p-6Y-EGFR mutants:SHC1 [plasma membrane]";  // reactome:R-HSA-1225858; hasPart uniprot:P00533 uniprot:Q16543 uniprot:P07900 uniprot:P01133
  // Derived from a Reactome EntityWithAccessionedSequence. This is a protein
  species p_4Y_PLCG1_plasma_membrane in plasma_membrane = 1.907135; p_4Y_PLCG1_plasma_membrane is "p-4Y-PLCG1 [plasma membrane]";  // uniprot:P19174 reactome:R-HSA-167679; isHomologTo reactome:R-MMU-167679 reactome:R-RNO-167679 reactome:R-CFA-167679 reactome:R-BTA-167679
  // Derived from a Reactome SimpleEntity. This is a small compound
  species ADP_cytosol in cytosol = 2.151891; ADP_cytosol is "ADP [cytosol]";  // CHEBI:456216 reactome:R-ALL-29370
  // Derived from a Reactome Complex. Here is Reactomes nested structure for this complex: (100xP00533, 16xQ16543, 16xP07900, 4xP01133, P29353). Reactome uses a nested structure for complexes, which cannot be fully represented in SBML Level 3 Version 1 core
  species species_1225854 in plasma_membrane = 0.4248077; species_1225854 is "Ligand-responsive p-6Y-EGFR mutants:p-Y349,350-SHC1 [plasma membrane]";  // reactome:R-HSA-1225854; hasPart uniprot:P00533 uniprot:Q16543 uniprot:P07900 uniprot:P01133
  // Derived from a Reactome Complex. Here is Reactomes nested structure for this complex: (2x5692, 76xP00533, 2x4920, 2x4941, 2x5717, 8xQ16543, 8xP07900, 2xP01133). Reactome uses a nested structure for complexes, which cannot be fully represented in SBML Level 3 Version 1 core
  species species_1220587 in plasma_membrane = 1.820907; species_1220587 is "Sensitive ligand-responsive EGFR mutants:Non-covalent EGFR TKIs [plasma membrane]";  // reactome:R-HSA-1220587; hasPart iuphar.ligand:5692 uniprot:P00533 iuphar.ligand:4920 iuphar.ligand:4941
  // Derived from a Reactome EntityWithAccessionedSequence. This is a protein
  species PLCG1_plasma_membrane in plasma_membrane = 0.04890171; PLCG1_plasma_membrane is "PLCG1 [plasma membrane]";  // uniprot:P19174 reactome:R-HSA-167682; isHomologTo reactome:R-MMU-167682 reactome:R-RNO-167682 reactome:R-CFA-167682 reactome:R-BTA-167682
  // Derived from a Reactome DefinedSet. This is a list of alternative entities, any of which can perform the given function
  species species_1220578 in plasma_membrane = 0.7286603; species_1220578 is "EGF:Ligand-responsive EGFR mutants:HSP90:CDC37 [plasma membrane]";  // reactome:R-HSA-1220578; hasPart uniprot:P00533 uniprot:Q16543 uniprot:P07900 uniprot:P01133
  // Derived from a Reactome DefinedSet. This is a list of alternative entities, any of which can perform the given function
  species species_1218825 in plasma_membrane = 0.4116947; species_1218825 is "Ligand-responsive EGFR mutants:HSP90:CDC37 [plasma membrane]";  // reactome:R-HSA-1218825; hasPart uniprot:P00533 uniprot:Q16543 uniprot:P07900
  // Derived from a Reactome SimpleEntity. This is a small compound
  species GDP_cytosol in cytosol = 2.41253; GDP_cytosol is "GDP [cytosol]";  // CHEBI:58189 reactome:R-ALL-29420
  // Derived from a Reactome Complex. Here is Reactomes nested structure for this complex: (2xP22681, 100xP00533, 16xQ16543, 16xP07900, 4xP01133). Reactome uses a nested structure for complexes, which cannot be fully represented in SBML Level 3 Version 1 core
  species species_1225857 in plasma_membrane = 0.4700373; species_1225857 is "Ligand-responsive p-6Y-EGFR mutants:p-Y371-CBL [plasma membrane]";  // reactome:R-HSA-1225857; hasPart uniprot:P22681 uniprot:P00533 uniprot:Q16543 uniprot:P07900
  // Derived from a Reactome Complex. Here is Reactomes nested structure for this complex: (2xP00533, 4xQ16543, 4xP07900, P29353). Reactome uses a nested structure for complexes, which cannot be fully represented in SBML Level 3 Version 1 core
  species species_5637701 in plasma_membrane = 1.202833; species_5637701 is "p-5Y-EGFRvIII:SHC1 [plasma membrane]";  // reactome:R-HSA-5637701; hasPart uniprot:P00533 uniprot:Q16543 uniprot:P07900 uniprot:P29353
  // Derived from a Reactome Complex. Here is Reactomes nested structure for this complex: (P42336, 2xP00533, 4xQ16543, 4xP07900, Q13480, P62993, P27986). Reactome uses a nested structure for complexes, which cannot be fully represented in SBML Level 3 Version 1 core
  species species_5637693 in plasma_membrane = 0.3893713; species_5637693 is "p-5Y-EGFRvIII:GRB2:GAB1:PI3K [plasma membrane]";  // reactome:R-HSA-5637693; hasPart uniprot:P42336 uniprot:P00533 uniprot:Q16543 uniprot:P07900
  // Derived from a Reactome Complex. Here is Reactomes nested structure for this complex: (2xP00533, Q07889, 4xQ16543, 4xP07900, P62993). Reactome uses a nested structure for complexes, which cannot be fully represented in SBML Level 3 Version 1 core
  species species_5637697 in plasma_membrane = 0.3264264; species_5637697 is "p-5Y-EGFRvIII:GRB2:SOS1 [plasma membrane]";  // reactome:R-HSA-5637697; hasPart uniprot:P00533 uniprot:Q07889 uniprot:Q16543 uniprot:P07900
  // Derived from a Reactome DefinedSet. This is a list of alternative entities, any of which can perform the given function
  species Ub_cytosol in cytosol = 2.996774; Ub_cytosol is "Ub [cytosol]";  // reactome:R-HSA-113595; hasPart uniprot:P0CG48 uniprot:P0CG47 uniprot:P62979 uniprot:P62987; isHomologTo reactome:R-MMU-113595 reactome:R-RNO-113595 reactome:R-CFA-113595 reactome:R-BTA-113595
  // Derived from a Reactome Complex. Here is Reactomes nested structure for this complex: (2x7751, 2x5984, 2x9829, 2xP07900, 2x9827, 2x9828). Reactome uses a nested structure for complexes, which cannot be fully represented in SBML Level 3 Version 1 core
  species species_1218829 in cytosol = 0.6547707; species_1218829 is "HSP90:Benzoquinoid ansamycins [cytosol]";  // reactome:R-HSA-1218829; hasPart iuphar.ligand:7751 iuphar.ligand:5984 iuphar.ligand:9829 uniprot:P07900
  // Derived from a Reactome Complex. Here is Reactomes nested structure for this complex: (2xP00533, 4xQ16543, 4xP07900, P29353). Reactome uses a nested structure for complexes, which cannot be fully represented in SBML Level 3 Version 1 core
  species species_5637703 in plasma_membrane = 1.538797; species_5637703 is "p-5Y-EGFRvIII:p-Y349,Y350-SHC1 [plasma membrane]";  // reactome:R-HSA-5637703; hasPart uniprot:P00533 uniprot:Q16543 uniprot:P07900 uniprot:P29353
  // Derived from a Reactome Complex. Here is Reactomes nested structure for this complex: (24xP00533, 2x7644, 2x5667, 2x5675, 8xQ16543, 8xP07900, 2xP01133, 2x5686, 2x9176). Reactome uses a nested structure for complexes, which cannot be fully represented in SBML Level 3 Version 1 core
  species species_1220579 in plasma_membrane = 2.517337; species_1220579 is "Resistant ligand-responsive EGFR mutants:Covalent EGFR TKIs [plasma membrane]";  // reactome:R-HSA-1220579; hasPart uniprot:P00533 iuphar.ligand:7644 iuphar.ligand:5667 iuphar.ligand:5675
  // Derived from a Reactome Complex. Here is Reactomes nested structure for this complex: (P42336, P27986). Reactome uses a nested structure for complexes, which cannot be fully represented in SBML Level 3 Version 1 core
  species PIK3CA_PIK3R1_cytosol in cytosol = 1.837919; PIK3CA_PIK3R1_cytosol is "PIK3CA:PIK3R1 [cytosol]";  // reactome:R-HSA-1806218; hasPart uniprot:P42336 uniprot:P27986; isHomologTo reactome:R-MMU-1806218 reactome:R-RNO-1806218 reactome:R-CFA-1806218 reactome:R-BTA-1806218
  // Derived from a Reactome Complex. Here is Reactomes nested structure for this complex: (100xP00533, 16xQ16543, 16xP07900, Q13480, P62993, 4xP01133). Reactome uses a nested structure for complexes, which cannot be fully represented in SBML Level 3 Version 1 core
  species species_1226015 in plasma_membrane = 0.8880949; species_1226015 is "Ligand-responsive p-6Y-EGFR mutants:GRB2:GAB1 [plasma membrane]";  // reactome:R-HSA-1226015; hasPart uniprot:P00533 uniprot:Q16543 uniprot:P07900 uniprot:Q13480
  // Derived from a Reactome Complex. Here is Reactomes nested structure for this complex: (100xP00533, Q07889, 16xQ16543, 16xP07900, 4xP01133, P62993). Reactome uses a nested structure for complexes, which cannot be fully represented in SBML Level 3 Version 1 core
  species species_1225859 in plasma_membrane = 1.912657; species_1225859 is "Ligand-responsive p-6Y-EGFR mutants:GRB2:SOS1 [plasma membrane]";  // reactome:R-HSA-1225859; hasPart uniprot:P00533 uniprot:Q07889 uniprot:Q16543 uniprot:P07900
  // Derived from a Reactome SimpleEntity. This is a small compound
  species ATP_cytosol in cytosol = 1.572862; ATP_cytosol is "ATP [cytosol]";  // CHEBI:30616 reactome:R-ALL-113592
  // Derived from a Reactome SimpleEntity. This is a small compound
  species PI_3_4_5_P3_plasma_membrane in plasma_membrane = 1.480749; PI_3_4_5_P3_plasma_membrane is "PI(3,4,5)P3 [plasma membrane]";  // CHEBI:57836 reactome:R-ALL-179838
  // Derived from a Reactome Complex. Here is Reactomes nested structure for this complex: (2xP00533, Q07889, 4xQ16543, 4xP07900, P29353, P62993). Reactome uses a nested structure for complexes, which cannot be fully represented in SBML Level 3 Version 1 core
  species species_5637704 in plasma_membrane = 2.918325; species_5637704 is "p-5Y-EGFRvIII:p-Y349,Y350-SHC1:GRB2:SOS1 [plasma membrane]";  // reactome:R-HSA-5637704; hasPart uniprot:P00533 uniprot:Q07889 uniprot:Q16543 uniprot:P07900
  // Derived from a Reactome SimpleEntity. This is a small compound
  species GTP_cytosol in cytosol = 0.8775504; GTP_cytosol is "GTP [cytosol]";  // CHEBI:37565 reactome:R-ALL-29438
  // Derived from a Reactome Complex. Here is Reactomes nested structure for this complex: (2xP22681, 100xP00533, 16xQ16543, 16xP07900, 4xP01133). Reactome uses a nested structure for complexes, which cannot be fully represented in SBML Level 3 Version 1 core
  species species_1225855 in plasma_membrane = 2.314073; species_1225855 is "Ligand-responsive p-6Y-EGFR mutants:CBL [plasma membrane]";  // reactome:R-HSA-1225855; hasPart uniprot:P22681 uniprot:P00533 uniprot:Q16543 uniprot:P07900
  // Derived from a Reactome ProteinDrug. A drug
  species Cetuximab_extracellular_region in extracellular_region = 1.580235; Cetuximab_extracellular_region is "Cetuximab [extracellular region]";  // iuphar.ligand:6882 reactome:R-ALL-1248673
  // Derived from a Reactome DefinedSet. This is a list of alternative entities, any of which can perform the given function
  species species_1216523 in cytosol = 2.309742; species_1216523 is "Non-covalent EGFR tyrosine kinase inhibitors [cytosol]";  // reactome:R-ALL-1216523; hasPart iuphar.ligand:5692 iuphar.ligand:4920 iuphar.ligand:4941 iuphar.ligand:5717
  // Derived from a Reactome EntityWithAccessionedSequence. This is a protein
  species CBL_cytosol in cytosol = 1.200686; CBL_cytosol is "CBL [cytosol]";  // uniprot:P22681 reactome:R-HSA-112199; isHomologTo reactome:R-MMU-112199 reactome:R-RNO-112199 reactome:R-CFA-112199 reactome:R-BTA-112199
  // Derived from a Reactome Complex. Here is Reactomes nested structure for this complex: (P00533, 2xQ16543, 2xP07900). Reactome uses a nested structure for complexes, which cannot be fully represented in SBML Level 3 Version 1 core
  species species_1248004 in plasma_membrane = 2.674588; species_1248004 is "EGFRvIII mutant:HSP90:CDC37 [plasma membrane]";  // reactome:R-HSA-1248004; hasPart uniprot:P00533 uniprot:Q16543 uniprot:P07900
  // Derived from a Reactome EntityWithAccessionedSequence. This is a protein
  species SHC1_cytosol in cytosol = 0.8499442; SHC1_cytosol is "SHC1 [cytosol]";  // uniprot:P29353 reactome:R-HSA-74680; isHomologTo reactome:R-MMU-74680 reactome:R-RNO-74680 reactome:R-CFA-74680 reactome:R-BTA-74680
  // Derived from a Reactome Complex. Here is Reactomes nested structure for this complex: (P01111, P01116, P01112, P01116, 58189). Reactome uses a nested structure for complexes, which cannot be fully represented in SBML Level 3 Version 1 core
  species p21_RAS_GDP_plasma_membrane in plasma_membrane = 1.057375; p21_RAS_GDP_plasma_membrane is "p21 RAS:GDP [plasma membrane]";  // reactome:R-HSA-109796; hasPart uniprot:P01111 uniprot:P01116 uniprot:P01112 CHEBI:58189; isHomologTo reactome:R-MMU-109796 reactome:R-RNO-109796 reactome:R-CFA-109796 reactome:R-BTA-109796
  // Derived from a Reactome DefinedSet. This is a list of alternative entities, any of which can perform the given function
  species species_1220582 in plasma_membrane = 2.423174; species_1220582 is "Active dimers of ligand-responsive EGFR mutants [plasma membrane]";  // reactome:R-HSA-1220582; hasPart uniprot:P00533 uniprot:Q16543 uniprot:P07900 uniprot:P01133
  // Derived from a Reactome Complex. Here is Reactomes nested structure for this complex: (2xP07900). Reactome uses a nested structure for complexes, which cannot be fully represented in SBML Level 3 Version 1 core
  species HSP90_cytosol in cytosol = 2.757079; HSP90_cytosol is "HSP90 [cytosol]";  // isDescribedBy pubmed:14718169; reactome:R-HSA-1221657; hasPart uniprot:P07900; isHomologTo reactome:R-MMU-1221657 reactome:R-RNO-1221657 reactome:R-CFA-1221657 reactome:R-BTA-1221657
  // Derived from a Reactome Complex. Here is Reactomes nested structure for this complex: (P42336, 100xP00533, 16xQ16543, 16xP07900, Q13480, P62993, 4xP01133, P27986). Reactome uses a nested structure for complexes, which cannot be fully represented in SBML Level 3 Version 1 core
  species species_1226013 in plasma_membrane = 0.2092658; species_1226013 is "Ligand-responsive p-6Y-EGFR mutants:GRB2:GAB1:PI3K [plasma membrane]";  // reactome:R-HSA-1226013; hasPart uniprot:P42336 uniprot:P00533 uniprot:Q16543 uniprot:P07900
  // Derived from a Reactome Complex. Here is Reactomes nested structure for this complex: (2xQ16543). Reactome uses a nested structure for complexes, which cannot be fully represented in SBML Level 3 Version 1 core
  species CDC37_cytosol in cytosol = 2.847981; CDC37_cytosol is "CDC37 [cytosol]";  // reactome:R-HSA-1225828; hasPart uniprot:Q16543; isHomologTo reactome:R-MMU-1225828 reactome:R-RNO-1225828 reactome:R-CFA-1225828 reactome:R-BTA-1225828
  // Derived from a Reactome Complex. Here is Reactomes nested structure for this complex: (5667, 5675, 2xP15514, 2xP01135, 2xP01133, 5686, 9176, 2xO14944, 2xP00533, 7644, 2xQ99075, 2xP35070, 2xQ6UW88). Reactome uses a nested structure for complexes, which cannot be fully represented in SBML Level 3 Version 1 core
  species species_1225979 in plasma_membrane = 1.577986; species_1225979 is "EGF-like ligands:EGFR Dimer:Covalent EGFR TKIs [plasma membrane]";  // reactome:R-HSA-1225979; hasPart iuphar.ligand:5667 iuphar.ligand:5675 uniprot:P15514 uniprot:P01135
  // Derived from a Reactome Complex. Here is Reactomes nested structure for this complex: (2xP00533, 4xQ16543, 4xP07900). Reactome uses a nested structure for complexes, which cannot be fully represented in SBML Level 3 Version 1 core
  species species_1248010 in plasma_membrane = 0.2581675; species_1248010 is "EGFRvIII mutant dimer [plasma membrane]";  // reactome:R-HSA-1248010; hasPart uniprot:P00533 uniprot:Q16543 uniprot:P07900
  // Derived from a Reactome Complex. Here is Reactomes nested structure for this complex: (Q07889, P62993). Reactome uses a nested structure for complexes, which cannot be fully represented in SBML Level 3 Version 1 core
  species GRB2_1_SOS1_cytosol in cytosol = 0.5766415; GRB2_1_SOS1_cytosol is "GRB2-1:SOS1 [cytosol]";  // isDescribedBy pubmed:19665053 pubmed:8493579; reactome:R-HSA-109797; hasPart uniprot:Q07889 uniprot:P62993; isHomologTo reactome:R-MMU-109797 reactome:R-RNO-109797 reactome:R-CFA-109797 reactome:R-BTA-109797
  // Derived from a Reactome EntityWithAccessionedSequence. This is a protein
  species EGFR_plasma_membrane in plasma_membrane = 1.989681; EGFR_plasma_membrane is "EGFR [plasma membrane]";  // uniprot:P00533 reactome:R-HSA-179837; isHomologTo reactome:R-MMU-179837 reactome:R-RNO-179837 reactome:R-CFA-179837 reactome:R-BTA-179837
  // Derived from a Reactome Complex. Here is Reactomes nested structure for this complex: (100xP00533, Q07889, 16xQ16543, 16xP07900, 4xP01133, P29353, P62993). Reactome uses a nested structure for complexes, which cannot be fully represented in SBML Level 3 Version 1 core
  species species_1225856 in plasma_membrane = 2.670698; species_1225856 is "Ligand responsive p-6Y-EGFR mutants:p-Y349,350-SHC1:GRB2:SOS1 [plasma membrane]";  // reactome:R-HSA-1225856; hasPart uniprot:P00533 uniprot:Q07889 uniprot:Q16543 uniprot:P07900
  // Derived from a Reactome EntityWithAccessionedSequence. This is a protein
  // EGFR V30_R297delinsG mutant of EGFR, commonly known as EGFRvIII, is found in ~25% high-grade glioblastomas and can also be found in squamous cell carcinoma of the lung. EGFRvIII lacks the ligand biding domain and is constitutively active.
  species EGFRvIII_plasma_membrane in plasma_membrane = 1.046679; EGFRvIII_plasma_membrane is "EGFRvIII [plasma membrane]";  // uniprot:P00533 reactome:R-HSA-1214162
  // Derived from a Reactome Complex. Here is Reactomes nested structure for this complex: (2xP00533, 4xQ16543, 4xP07900, Q13480, P62993). Reactome uses a nested structure for complexes, which cannot be fully represented in SBML Level 3 Version 1 core
  species species_5637694 in plasma_membrane = 0.192514; species_5637694 is "p-5Y-EGFRvIII:GRB2:GAB1 [plasma membrane]";  // reactome:R-HSA-5637694; hasPart uniprot:P00533 uniprot:Q16543 uniprot:P07900 uniprot:Q13480
  // Derived from a Reactome DefinedSet. This is a list of alternative entities, any of which can perform the given function
  species species_1182966 in plasma_membrane = 0.06006915; species_1182966 is "Ligand-responsive EGFR mutants [plasma membrane]";  // reactome:R-HSA-1182966; hasPart uniprot:P00533
  // Derived from a Reactome Complex. Here is Reactomes nested structure for this complex: (P00533, 6882). Reactome uses a nested structure for complexes, which cannot be fully represented in SBML Level 3 Version 1 core
  species EGFR_Cetuximab_plasma_membrane in plasma_membrane = 1.373105; EGFR_Cetuximab_plasma_membrane is "EGFR:Cetuximab [plasma membrane]";  // reactome:R-HSA-1248675; hasPart uniprot:P00533 iuphar.ligand:6882
  // Derived from a Reactome Complex. Here is Reactomes nested structure for this complex: (2xP00533, P19174, 4xQ16543, 4xP07900). Reactome uses a nested structure for complexes, which cannot be fully represented in SBML Level 3 Version 1 core
  species species_5637706 in plasma_membrane = 0.1892875; species_5637706 is "p-5Y-EGFRvIII:p-Y771,Y783,Y1254-PLCG1 [plasma membrane]";  // reactome:R-HSA-5637706; hasPart uniprot:P00533 uniprot:P19174 uniprot:Q16543 uniprot:P07900

  // Parameters:
  k_forcat_reaction_1225960 = 1;
  k_reaction_1225960_species_113592 = 1;
  k_reaction_1225960_species_1225855 = 1;
  k_forcat_reaction_1225950 = 1;
  k_forcat_reaction_5638137 = 1;
  k_forcat_reaction_1248677 = 1;
  k_forcat_reaction_1225949 = 1;
  k_forcat_reaction_1220611 = 1;
  k_forcat_reaction_1225978 = 1;
  k_forcat_reaction_5637766 = 1;
  k_forcat_reaction_5637800 = 1;
  k_forcat_reaction_1220614 = 1;
  k_forcat_reaction_5637795 = 1;
  k_reaction_5637795_species_113592 = 1;
  k_reaction_5637795_species_5637698 = 1;
  k_forcat_reaction_1225952 = 1;
  k_reaction_1225952_species_113592 = 1;
  k_reaction_1225952_species_1225858 = 1;
  k_forcat_reaction_5637808 = 1;
  k_reaction_5637808_species_109796 = 1;
  k_reaction_5637808_species_29438 = 1;
  k_forcat_reaction_1218833 = 1;
  k_forcat_reaction_5637801 = 1;
  k_reaction_5637801_species_113592 = 1;
  k_reaction_5637801_species_179856 = 1;
  k_forcat_reaction_1226016 = 1;
  k_forcat_reaction_5637796 = 1;
  k_reaction_5637796_species_113592 = 1;
  k_reaction_5637796_species_5637701 = 1;
  k_forcat_reaction_1247841 = 1;
  k_forcat_reaction_1248655 = 1;
  k_reaction_1248655_species_113592 = 1;
  k_reaction_1248655_species_1248010 = 1;
  k_forcat_reaction_5637770 = 1;
  k_forcat_reaction_1247844 = 1;
  k_reaction_1247844_species_1247845 = 1;
  k_reaction_1247844_species_113592 = 1;
  k_forcat_reaction_1247842 = 1;
  k_inhibitor_modifierspeciesreference_1225956_negativeregulator_1225855 = 1;
  k_forcat_reaction_1225956 = 1;
  k_reaction_1225956_species_113595 = 1;
  k_reaction_1225956_species_1225857 = 1;
  k_forcat_reaction_5637798 = 1;
  k_forcat_reaction_1220612 = 1;
  k_forcat_reaction_1225957 = 1;
  k_reaction_1225957_species_109796 = 1;
  k_reaction_1225957_species_29438 = 1;
  k_forcat_reaction_5637764 = 1;
  k_forcat_reaction_1218824 = 1;
  k_forcat_reaction_1225961 = 1;
  k_forcat_reaction_5637792 = 1;
  k_forcat_reaction_5637765 = 1;
  k_forcat_reaction_1225951 = 1;
  k_reaction_1225951_species_109796 = 1;
  k_reaction_1225951_species_29438 = 1;
  k_forcat_reaction_1247999 = 1;
  k_forcat_reaction_1169421 = 1;
  k_reaction_1169421_species_113592 = 1;
  k_reaction_1169421_species_1220582 = 1;
  k_forcat_reaction_5637806 = 1;
  k_reaction_5637806_species_109796 = 1;
  k_reaction_5637806_species_29438 = 1;
  k_forcat_reaction_1248002 = 1;
  k_forcat_reaction_5637794 = 1;
  k_forcat_reaction_1225947 = 1;
  k_forcat_reaction_1220613 = 1;
  k_forcat_reaction_1226012 = 1;
  k_forcat_reaction_1220610 = 1;
  k_forcat_reaction_1226014 = 1;
  k_reaction_1226014_species_113592 = 1;
  k_reaction_1226014_species_179856 = 1;
  get_time = 0; get_time is "Auxiliary variable used in place of time due to naming restrictions";
  avg_species_1220585 = 0; avg_species_1220585 is "Average of species_1220585";
  avg_species_179849 = 0; avg_species_179849 is "Average of species_179849";
  avg_species_5637698 = 0; avg_species_5637698 is "Average of species_5637698";
  avg_species_1248654 = 0; avg_species_1248654 is "Average of species_1248654";
  avg_species_1181062 = 0; avg_species_1181062 is "Average of species_1181062";
  avg_species_1247845 = 0; avg_species_1247845 is "Average of species_1247845";
  avg_species_1500847 = 0; avg_species_1500847 is "Average of species_1500847";
  avg_species_1500849 = 0; avg_species_1500849 is "Average of species_1500849";
  avg_species_109783 = 0; avg_species_109783 is "Average of species_109783";
  avg_species_1217511 = 0; avg_species_1217511 is "Average of species_1217511";
  avg_species_1247846 = 0; avg_species_1247846 is "Average of species_1247846";
  avg_species_9624420 = 0; avg_species_9624420 is "Average of species_9624420";
  avg_species_179856 = 0; avg_species_179856 is "Average of species_179856";
  avg_species_179863 = 0; avg_species_179863 is "Average of species_179863";
  avg_species_1216522 = 0; avg_species_1216522 is "Average of species_1216522";
  avg_species_1225858 = 0; avg_species_1225858 is "Average of species_1225858";
  avg_species_167679 = 0; avg_species_167679 is "Average of species_167679";
  avg_species_29370 = 0; avg_species_29370 is "Average of species_29370";
  avg_species_1225854 = 0; avg_species_1225854 is "Average of species_1225854";
  avg_species_1220587 = 0; avg_species_1220587 is "Average of species_1220587";
  avg_species_167682 = 0; avg_species_167682 is "Average of species_167682";
  avg_species_1220578 = 0; avg_species_1220578 is "Average of species_1220578";
  avg_species_1218825 = 0; avg_species_1218825 is "Average of species_1218825";
  avg_species_29420 = 0; avg_species_29420 is "Average of species_29420";
  avg_species_1225857 = 0; avg_species_1225857 is "Average of species_1225857";
  avg_species_5637701 = 0; avg_species_5637701 is "Average of species_5637701";
  avg_species_5637693 = 0; avg_species_5637693 is "Average of species_5637693";
  avg_species_5637697 = 0; avg_species_5637697 is "Average of species_5637697";
  avg_species_113595 = 0; avg_species_113595 is "Average of species_113595";
  avg_species_1218829 = 0; avg_species_1218829 is "Average of species_1218829";
  avg_species_5637703 = 0; avg_species_5637703 is "Average of species_5637703";
  avg_species_1220579 = 0; avg_species_1220579 is "Average of species_1220579";
  avg_species_1806218 = 0; avg_species_1806218 is "Average of species_1806218";
  avg_species_1226015 = 0; avg_species_1226015 is "Average of species_1226015";
  avg_species_1225859 = 0; avg_species_1225859 is "Average of species_1225859";
  avg_species_113592 = 0; avg_species_113592 is "Average of species_113592";
  avg_species_179838 = 0; avg_species_179838 is "Average of species_179838";
  avg_species_5637704 = 0; avg_species_5637704 is "Average of species_5637704";
  avg_species_29438 = 0; avg_species_29438 is "Average of species_29438";
  avg_species_1225855 = 0; avg_species_1225855 is "Average of species_1225855";
  avg_species_1248673 = 0; avg_species_1248673 is "Average of species_1248673";
  avg_species_1216523 = 0; avg_species_1216523 is "Average of species_1216523";
  avg_species_112199 = 0; avg_species_112199 is "Average of species_112199";
  avg_species_1248004 = 0; avg_species_1248004 is "Average of species_1248004";
  avg_species_74680 = 0; avg_species_74680 is "Average of species_74680";
  avg_species_109796 = 0; avg_species_109796 is "Average of species_109796";
  avg_species_1220582 = 0; avg_species_1220582 is "Average of species_1220582";
  avg_species_1221657 = 0; avg_species_1221657 is "Average of species_1221657";
  avg_species_1226013 = 0; avg_species_1226013 is "Average of species_1226013";
  avg_species_1225828 = 0; avg_species_1225828 is "Average of species_1225828";
  avg_species_1225979 = 0; avg_species_1225979 is "Average of species_1225979";
  avg_species_1248010 = 0; avg_species_1248010 is "Average of species_1248010";
  avg_species_109797 = 0; avg_species_109797 is "Average of species_109797";
  avg_species_179837 = 0; avg_species_179837 is "Average of species_179837";
  avg_species_1225856 = 0; avg_species_1225856 is "Average of species_1225856";
  avg_species_1214162 = 0; avg_species_1214162 is "Average of species_1214162";
  avg_species_5637694 = 0; avg_species_5637694 is "Average of species_5637694";
  avg_species_1182966 = 0; avg_species_1182966 is "Average of species_1182966";
  avg_species_1248675 = 0; avg_species_1248675 is "Average of species_1248675";
  avg_species_5637706 = 0; avg_species_5637706 is "Average of species_5637706";

  // Rate rules:
  get_time' = 1;
  avg_species_1220585' = (species_1220585 - avg_species_1220585)/(get_time + 1e-6);
  avg_species_179849' = (GRB2_GAB1_cytosol - avg_species_179849)/(get_time + 1e-6);
  avg_species_5637698' = (species_5637698 - avg_species_5637698)/(get_time + 1e-6);
  avg_species_1248654' = (species_1248654 - avg_species_1248654)/(get_time + 1e-6);
  avg_species_1181062' = (species_1181062 - avg_species_1181062)/(get_time + 1e-6);
  avg_species_1247845' = (species_1247845 - avg_species_1247845)/(get_time + 1e-6);
  avg_species_1500847' = (species_1500847 - avg_species_1500847)/(get_time + 1e-6);
  avg_species_1500849' = (species_1500849 - avg_species_1500849)/(get_time + 1e-6);
  avg_species_109783' = (p21_RAS_GTP_plasma_membrane - avg_species_109783)/(get_time + 1e-6);
  avg_species_1217511' = (Benzoquinoid_ansamycins_cytosol - avg_species_1217511)/(get_time + 1e-6);
  avg_species_1247846' = (species_1247846 - avg_species_1247846)/(get_time + 1e-6);
  avg_species_9624420' = (species_9624420 - avg_species_9624420)/(get_time + 1e-6);
  avg_species_179856' = (PI_4_5_P2_plasma_membrane - avg_species_179856)/(get_time + 1e-6);
  avg_species_179863' = (EGF_extracellular_region - avg_species_179863)/(get_time + 1e-6);
  avg_species_1216522' = (species_1216522 - avg_species_1216522)/(get_time + 1e-6);
  avg_species_1225858' = (species_1225858 - avg_species_1225858)/(get_time + 1e-6);
  avg_species_167679' = (p_4Y_PLCG1_plasma_membrane - avg_species_167679)/(get_time + 1e-6);
  avg_species_29370' = (ADP_cytosol - avg_species_29370)/(get_time + 1e-6);
  avg_species_1225854' = (species_1225854 - avg_species_1225854)/(get_time + 1e-6);
  avg_species_1220587' = (species_1220587 - avg_species_1220587)/(get_time + 1e-6);
  avg_species_167682' = (PLCG1_plasma_membrane - avg_species_167682)/(get_time + 1e-6);
  avg_species_1220578' = (species_1220578 - avg_species_1220578)/(get_time + 1e-6);
  avg_species_1218825' = (species_1218825 - avg_species_1218825)/(get_time + 1e-6);
  avg_species_29420' = (GDP_cytosol - avg_species_29420)/(get_time + 1e-6);
  avg_species_1225857' = (species_1225857 - avg_species_1225857)/(get_time + 1e-6);
  avg_species_5637701' = (species_5637701 - avg_species_5637701)/(get_time + 1e-6);
  avg_species_5637693' = (species_5637693 - avg_species_5637693)/(get_time + 1e-6);
  avg_species_5637697' = (species_5637697 - avg_species_5637697)/(get_time + 1e-6);
  avg_species_113595' = (Ub_cytosol - avg_species_113595)/(get_time + 1e-6);
  avg_species_1218829' = (species_1218829 - avg_species_1218829)/(get_time + 1e-6);
  avg_species_5637703' = (species_5637703 - avg_species_5637703)/(get_time + 1e-6);
  avg_species_1220579' = (species_1220579 - avg_species_1220579)/(get_time + 1e-6);
  avg_species_1806218' = (PIK3CA_PIK3R1_cytosol - avg_species_1806218)/(get_time + 1e-6);
  avg_species_1226015' = (species_1226015 - avg_species_1226015)/(get_time + 1e-6);
  avg_species_1225859' = (species_1225859 - avg_species_1225859)/(get_time + 1e-6);
  avg_species_113592' = (ATP_cytosol - avg_species_113592)/(get_time + 1e-6);
  avg_species_179838' = (PI_3_4_5_P3_plasma_membrane - avg_species_179838)/(get_time + 1e-6);
  avg_species_5637704' = (species_5637704 - avg_species_5637704)/(get_time + 1e-6);
  avg_species_29438' = (GTP_cytosol - avg_species_29438)/(get_time + 1e-6);
  avg_species_1225855' = (species_1225855 - avg_species_1225855)/(get_time + 1e-6);
  avg_species_1248673' = (Cetuximab_extracellular_region - avg_species_1248673)/(get_time + 1e-6);
  avg_species_1216523' = (species_1216523 - avg_species_1216523)/(get_time + 1e-6);
  avg_species_112199' = (CBL_cytosol - avg_species_112199)/(get_time + 1e-6);
  avg_species_1248004' = (species_1248004 - avg_species_1248004)/(get_time + 1e-6);
  avg_species_74680' = (SHC1_cytosol - avg_species_74680)/(get_time + 1e-6);
  avg_species_109796' = (p21_RAS_GDP_plasma_membrane - avg_species_109796)/(get_time + 1e-6);
  avg_species_1220582' = (species_1220582 - avg_species_1220582)/(get_time + 1e-6);
  avg_species_1221657' = (HSP90_cytosol - avg_species_1221657)/(get_time + 1e-6);
  avg_species_1226013' = (species_1226013 - avg_species_1226013)/(get_time + 1e-6);
  avg_species_1225828' = (CDC37_cytosol - avg_species_1225828)/(get_time + 1e-6);
  avg_species_1225979' = (species_1225979 - avg_species_1225979)/(get_time + 1e-6);
  avg_species_1248010' = (species_1248010 - avg_species_1248010)/(get_time + 1e-6);
  avg_species_109797' = (GRB2_1_SOS1_cytosol - avg_species_109797)/(get_time + 1e-6);
  avg_species_179837' = (EGFR_plasma_membrane - avg_species_179837)/(get_time + 1e-6);
  avg_species_1225856' = (species_1225856 - avg_species_1225856)/(get_time + 1e-6);
  avg_species_1214162' = (EGFRvIII_plasma_membrane - avg_species_1214162)/(get_time + 1e-6);
  avg_species_5637694' = (species_5637694 - avg_species_5637694)/(get_time + 1e-6);
  avg_species_1182966' = (species_1182966 - avg_species_1182966)/(get_time + 1e-6);
  avg_species_1248675' = (EGFR_Cetuximab_plasma_membrane - avg_species_1248675)/(get_time + 1e-6);
  avg_species_5637706' = (species_5637706 - avg_species_5637706)/(get_time + 1e-6);

  // Reactions:
  // EGFR L858R mutant was shown to directly phosphorylate CBL on tyrosine residue Y371. Other EGFR cancer mutants with phosphorylation of tyrosine Y1069 (i.e. Y1045 in the mature protein) are assumed to bind and phosphorylate CBL in a manner similar to the wild-type EGFR.
  reaction_1225960: 2 ATP_cytosol + species_1225855 => 2 ADP_cytosol + species_1225857; species_1225855*1*(k_forcat_reaction_1225960*(speciesreference_1225960_input_113592/k_reaction_1225960_species_113592)^2*(speciesreference_1225960_input_1225855/k_reaction_1225960_species_1225855)^1/((1 + speciesreference_1225960_input_113592/k_reaction_1225960_species_113592 + (speciesreference_1225960_input_113592/k_reaction_1225960_species_113592)^2)*(1 + speciesreference_1225960_input_1225855/k_reaction_1225960_species_1225855))); reaction_1225960 is "Phosphorylation of CBL by ligand-responsive p-6Y-EGFR mutants";  // reactome:R-HSA-1225960; isDescribedBy pubmed:16849543; reactome:R-HSA-1225960; GO:0004713
  // Direct binding of GRB2:SOS1 complex to phosphorylated homodimers of EGFR cancer mutants has not been tested. GRB2 binds to phosphorylated tyrosine residues Y1068 and Y1086 (corresponding to Y1092 and Y1110, respectively, when counting from the first amino acid of the EGFR precursor, prior to cleavage of the 24-amino acid signal peptide at the N-terminus). Phosphorylation of Y1068 (i.e. Y1092) has been directly demonstrated in the following EGFR cancer mutants: EGFR L858R mutant (Sordella et al. 2004, Lynch et al. 2004, Greulich et al. 2005, Yang et al. 2006, Choi et al. 2007); EGFR G719S mutant (Greulich et al. 2005, Choi et al. 2007); EGFR L747_P753insS mutant (Sordella et al. 2004, Lynch et al. 2004, Choi et al. 2007); EGFR L747_A750delinsP (Greulich et al. 2005); EGFR L747_S752del mutant (Pao et al. 2004); EGFR L861Q mutant (Lee et al. 2006, Yang et al. 2006); EGFRvIII mutant (Huang et al. 2007); EGFR A289V mutant (Lee et al. 2006); EGFR G598V mutant (Lee et al. 2006); EGFR R108K mutant (Lee et al. 2006); EGFR T263P mutant (Lee et al. 2006); EGFR D770_N771insNPG mutant (Greulich et al. 2005, Xu et al. 2007); EGFR N771_H773dup mutant (Xu et al. 2007); EGFR K739_I744dup mutant (Xu et al. 2007); EGFR A767_V769dup mutant (Xu et al. 2007).
  reaction_1225950: GRB2_1_SOS1_cytosol + species_1181062 => species_1225859; k_forcat_reaction_1225950*GRB2_1_SOS1_cytosol*species_1181062; reaction_1225950 is "Binding of GRB2:SOS1 complex to phosphorylated ligand-responsive EGFR mutants";  // reactome:R-HSA-1225950; isDescribedBy pubmed:15284455 pubmed:16187797 pubmed:17712310 pubmed:17177598; reactome:R-HSA-1225950; occursIn DOID:162
  // EGFRvIII mutant lacks the ligand binding domain and is therefore unable to bind EGFR ligands (Fernandes et al. 2001).
  reaction_5638137: EGF_extracellular_region + species_1248004 => ; k_forcat_reaction_5638137*EGF_extracellular_region*species_1248004; reaction_5638137 is "EGFRvIII cancer variant does not bind EGF ligand";  // reactome:R-HSA-5638137; isDescribedBy pubmed:11087732; reactome:R-HSA-5638137; occursIn DOID:162
  // Cetuximab binds to the extracellular domain of EGFR and blocks ligand binding, leading to receptor inactivation, internalization and degradation. Cetuximab is approved for combination therapy and monotherapy of metastatic colorectal cancer and advanced squamous cell carcinoma of head and neck in patients whose tumors over-express wild-type EGFR protein, usually due to amplification of EGFR gene.
  reaction_1248677: EGFR_plasma_membrane + Cetuximab_extracellular_region => EGFR_Cetuximab_plasma_membrane; k_forcat_reaction_1248677*EGFR_plasma_membrane*Cetuximab_extracellular_region; reaction_1248677 is "Inactivation of over-expressed wild type EGFR by Cetuximab recombinant antibody";  // reactome:R-HSA-1248677; isDescribedBy pubmed:15269313 pubmed:15837620 pubmed:16314626; reactome:R-HSA-1248677; occursIn DOID:5520 DOID:5672 DOID:162
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  reaction_1225949: 2 CBL_cytosol + species_1181062 => species_1225855; k_forcat_reaction_1225949*CBL_cytosol^2*species_1181062; reaction_1225949 is "Binding of CBL to ligand-responsive p-6Y-EGFR mutants";  // reactome:R-HSA-1225949; isDescribedBy pubmed:15284455 pubmed:17699773 pubmed:16849543 pubmed:16969069; reactome:R-HSA-1225949; occursIn DOID:162
  // Covalent (irreversible) tyrosine kinase inhibitors (TKIs), pelitinib, WZ4002, HKI-272, canertinib and afatinib, form a covalent bond with the EGFR cysteine residue C397 and inhibit trans-autophosphorylation of mutants resistant to non-covalent TKIs. However, effective concentrations of covalent TKIs also inhibit wild type EGFR, resulting in severe side effects. Hence, covalent TKIs have not shown much promise as therapeutics.
  reaction_1220611: 2 species_1216522 + species_1220585 => species_1220579; k_forcat_reaction_1220611*species_1216522^2*species_1220585; reaction_1220611 is "Covalent tyrosine kinase inhibitors bind and inactivate EGFR kinase domain mutant dimers resistant to non-covalent tyrosine kinase inhibitors";  // reactome:R-HSA-1220611; isDescribedBy pubmed:20033049 pubmed:20966921; reactome:R-HSA-1220611; occursIn DOID:162
  // Covalent (irreversible) TKIs, pelitinib, WZ4002, HKI-272, canertinib and afatinib, inhibit the wild-type EGFR through formation of the covalent bond with the cysteine residue C397.
  reaction_1225978: species_9624420 + 2 species_1216522 => species_1225979; k_forcat_reaction_1225978*species_9624420*species_1216522^2; reaction_1225978 is "Covalent tyrosine kinase inhibitors bind and inhibit wild-type EGF:EGFR dimers";  // reactome:R-HSA-1225978; isDescribedBy pubmed:20033049; reactome:R-HSA-1225978; occursIn DOID:162
  // SHC1 (Src homology 2 domain-containing transforming protein) is known to bind two phosphorylated tyrosine docking sites of EGFR: Y1148 and Y1173 (corresponding to Y1172 and Y1197 when counting from the first amino acid of EGFR precursor, before the cleavage of the 24-amino acid signal peptide at the N-terminus takes place). Phosphorylation of Y1173 tyrosine residue was directly demonstrated in EGFRvIII mutant (Han et al. 2006, Grandal et al. 2007) as well as the phosphorylation of Y1148 (Huang et al. 2007). Binding of SHC1 to EGFRvIII cancer mutant has not been tested but SHC1 is assumed to bind EGFRvIII in the same way it binds wild-type EGFR.
  Binding_of_SHC1_to_p_5Y_EGFRvIII: species_1248654 + SHC1_cytosol => species_5637701; k_forcat_reaction_5637766*species_1248654*SHC1_cytosol; Binding_of_SHC1_to_p_5Y_EGFRvIII is "Binding of SHC1 to p-5Y-EGFRvIII";  // reactome:R-HSA-5637766; isDescribedBy pubmed:17372273 pubmed:16969069 pubmed:17646646; reactome:R-HSA-5637766; occursIn DOID:162
  // Once phosphorylated, PLC-gamma 1 is expected to dissociate from phosphorylated EGFRvIII cancer mutant and induce downstream signaling in the same way it does when activated by the wild-type EGFR. However, except for the phosphorylation of PLCG1 binding site in EGFRvIII (Grandal et al. 2007), other events involved in activation of PLCG1 signaling have not been studied in cells expressing EGFRvIII.
  reaction_5637800: species_5637706 => p_4Y_PLCG1_plasma_membrane + species_1248654; k_forcat_reaction_5637800*species_5637706; reaction_5637800 is "Dissociation of phosphorylated PLC-gamma 1 from p-EGFRvIII mutant";  // reactome:R-HSA-5637800; isDescribedBy pubmed:17372273 pubmed:10579907; reactome:R-HSA-5637800; occursIn DOID:162
  // EGFR ligand-responsive mutants dimerize spontaneously, without ligand binding, although ligand binding ability is preserved. This was experimentally demonstrated for EFGR L858R mutant and is presumed to happen in other constitutively active EGFR kinase domain mutants and EGFR extracellular domain point mutants.
  reaction_1220614: 2 species_1218825 => species_1500849; k_forcat_reaction_1220614*species_1218825^2; reaction_1220614 is "Spontaneous dimerization of ligand-responsive EGFR mutants";  // reactome:R-HSA-1220614; isDescribedBy pubmed:16777603 pubmed:16187797 pubmed:17349580 pubmed:19560417; reactome:R-HSA-1220614; occursIn DOID:162
  // Once recruited, PLC-gamma 1 is assumed to be phosphorylated by EGFRvIII cancer mutant in the same way it is phosphorylated by the wild-type EGFR (Meisenhelder et al. 1989, Wahl et al. 1990).
  reaction_5637795: 4 ATP_cytosol + species_5637698 => 4 ADP_cytosol + species_5637706; species_5637698*1*(k_forcat_reaction_5637795*(speciesreference_5637795_input_113592/k_reaction_5637795_species_113592)^4*(speciesreference_5637795_input_5637698/k_reaction_5637795_species_5637698)^1/((1 + speciesreference_5637795_input_113592/k_reaction_5637795_species_113592 + (speciesreference_5637795_input_113592/k_reaction_5637795_species_113592)^2 + (speciesreference_5637795_input_113592/k_reaction_5637795_species_113592)^3 + (speciesreference_5637795_input_113592/k_reaction_5637795_species_113592)^4)*(1 + speciesreference_5637795_input_5637698/k_reaction_5637795_species_5637698))); reaction_5637795 is "Phosphorylation of PLC-gamma 1 by p-EGFRvIII mutant";  // reactome:R-HSA-5637795; isDescribedBy pubmed:2472219 pubmed:1689311; reactome:R-HSA-5637795; GO:0004713
  // Constitutive phosphorylation of SHC1 was directly demonstrated in cells expressing EGFR L858R mutant (Greulich et al. 2005). Other EGFR cancer mutants were not directly tested for their ability to phosphorylate SHC1, but are assumed to interact with SHC1 in the same way as the wild-type EGFR protein.
  reaction_1225952: 2 ATP_cytosol + species_1225858 => 2 ADP_cytosol + species_1225854; species_1225858*1*(k_forcat_reaction_1225952*(speciesreference_1225952_input_113592/k_reaction_1225952_species_113592)^2*(speciesreference_1225952_input_1225858/k_reaction_1225952_species_1225858)^1/((1 + speciesreference_1225952_input_113592/k_reaction_1225952_species_113592 + (speciesreference_1225952_input_113592/k_reaction_1225952_species_113592)^2)*(1 + speciesreference_1225952_input_1225858/k_reaction_1225952_species_1225858))); reaction_1225952 is "Phosphorylation of SHC1 by ligand-responsive p-6Y-EGFR mutants";  // reactome:R-HSA-1225952; isDescribedBy pubmed:16187797; reactome:R-HSA-1225952; GO:0004713
  // SOS1 is the guanine nucleotide exchange factor (GEF) for RAS. SOS1, recruited by GRB2 bound to p-SHC1:p-EGFRvIII mutant, is assumed to activate RAS nucleotide exchange from the inactive form (bound to GDP) to an active form (bound to GTP). Although this reaction has not been shown to occur directly for EGFRvIII cancer mutant, activation of RAF/MAP kinase cascade has been demonstrated in cells expressing EGFRvIII (Montgomery et al. 1995).
  reaction_5637808: p21_RAS_GDP_plasma_membrane + GTP_cytosol => p21_RAS_GTP_plasma_membrane + GDP_cytosol; species_5637704*1*(k_forcat_reaction_5637808*(speciesreference_5637808_input_109796/k_reaction_5637808_species_109796)^1*(speciesreference_5637808_input_29438/k_reaction_5637808_species_29438)^1/((1 + speciesreference_5637808_input_109796/k_reaction_5637808_species_109796)*(1 + speciesreference_5637808_input_29438/k_reaction_5637808_species_29438))); reaction_5637808 is "SOS-mediated nucleotide exchange of RAS (mediated by GRB2:SOS1 in complex with phosphorylated SHC1 and p-EGFRvIII)";  // modifiers: species_5637704; reactome:R-HSA-5637808; isDescribedBy pubmed:8530489; reactome:R-HSA-5637808; GO:0005085
  // EGFR kinase domain mutants need continuous association with HSP90 chaperone protein for proper functioning. CDC37 is a co-chaperone of HSP90 that acts as a scaffold and regulator of interaction between HSP90 and its protein kinase clients. CDC37 binds a protein kinase through its N-terminal domain and HSP90 through its C-terminal domain, arresting ATP-ase activity of HSP90 and enabling the loading of a client kinase. CDC37 is frequently over-expressed in cancers involving mutant kinases and acts as an oncogene (reviewed by Gray Jr. et al. 2008). Association of EGFR extracellular domain point mutants with HSP90 chaperone has not been tested.
  reaction_1218833: 2 CDC37_cytosol + species_1182966 + 2 HSP90_cytosol => species_1218825; k_forcat_reaction_1218833*CDC37_cytosol^2*species_1182966*HSP90_cytosol^2; reaction_1218833 is "Binding of ligand-responsive EGFR mutants to chaperoning proteins HSP90 and CDC37";  // reactome:R-HSA-1218833; isDescribedBy pubmed:16024644 pubmed:16849543 pubmed:14718169; reactome:R-HSA-1218833; occursIn DOID:162
  // The kinase activity of PI3K mediates the phosphorylation of PIP2 to form PIP3. It is assumed that EGFRvIII cancer mutant induces PI3K/AKT signaling in a manner similar to wild-type EGFR. Accordingly, activation of PI3K/AKT signaling cascade has been demonstrated in cells expressing EGFRvIII (Lammering et al. 2003, Li et al. 2004)
  reaction_5637801: ATP_cytosol + PI_4_5_P2_plasma_membrane => PI_3_4_5_P3_plasma_membrane + ADP_cytosol; species_5637693*1*(k_forcat_reaction_5637801*(speciesreference_5637801_input_113592/k_reaction_5637801_species_113592)^1*(speciesreference_5637801_input_179856/k_reaction_5637801_species_179856)^1/((1 + speciesreference_5637801_input_113592/k_reaction_5637801_species_113592)*(1 + speciesreference_5637801_input_179856/k_reaction_5637801_species_179856))); reaction_5637801 is "Conversion of PIP2 to PIP3 by PI3K bound to phosphorylated EGFRvIII";  // modifiers: species_5637693; reactome:R-HSA-5637801; isDescribedBy pubmed:12944901 pubmed:15077177; reactome:R-HSA-5637801; GO:0046934
  // Direct binding of GRB2:GAB1 complex to phosphorylated homodimers of EGFR cancer mutants has not been tested. This complex is recruted to EGFR via GRB2 binding to phosphorylated tyrosine residues Y1068 and Y1086 (corresponding to Y1092 and Y1110, respectively, when counting from the first amino acid of the EGFR precursor, prior to cleavage of the 24-amino acid signal peptide at the N-terminus). Phosphorylation of Y1068 (i.e. Y1092) has been directly demonstrated in the following EGFR cancer mutants: EGFR L858R mutant (Sordella et al. 2004, Lynch et al. 2004, Greulich et al. 2005, Yang et al. 2006, Choi et al. 2007); EGFR G719S mutant (Greulich et al. 2005, Choi et al. 2007); EGFR L747_P753insS mutant (Sordella et al. 2004, Lynch et al. 2004, Choi et al. 2007); EGFR L747_A750delinsP (Greulich et al. 2005); EGFR L747_S752del mutant (Pao et al. 2004); EGFR L861Q mutant (Lee et al. 2006, Yang et al. 2006); EGFRvIII mutant (Huang et al. 2007); EGFR A289V mutant (Lee et al. 2006); EGFR G598V mutant (Lee et al. 2006); EGFR R108K mutant (Lee et al. 2006); EGFR T263P mutant (Lee et al. 2006); EGFR D770_N771insNPG mutant (Greulich et al. 2005, Xu et al. 2007); EGFR N771_H773dup mutant (Xu et al. 2007); EGFR K739_I744dup mutant (Xu et al. 2007); EGFR A767_V769dup mutant (Xu et al. 2007).
  reaction_1226016: GRB2_GAB1_cytosol + species_1181062 => species_1226015; k_forcat_reaction_1226016*GRB2_GAB1_cytosol*species_1181062; reaction_1226016 is "Binding of GRB2:GAB1 complex to ligand-responsive p-6Y-EGFR mutants";  // reactome:R-HSA-1226016; isDescribedBy pubmed:15284455 pubmed:16187797 pubmed:17177598 pubmed:16953218; reactome:R-HSA-1226016; occursIn DOID:162
  // EGFRvIII cancer mutant was not directly tested for its ability to phosphorylate SHC1, but is assumed to interact with SHC1 in the same way as the wild-type EGFR protein (Soler et al. 1994, VanderKuur et al. 1995).
  reaction_5637796: 2 ATP_cytosol + species_5637701 => species_5637703 + 2 ADP_cytosol; species_5637701*1*(k_forcat_reaction_5637796*(speciesreference_5637796_input_113592/k_reaction_5637796_species_113592)^2*(speciesreference_5637796_input_5637701/k_reaction_5637796_species_5637701)^1/((1 + speciesreference_5637796_input_113592/k_reaction_5637796_species_113592 + (speciesreference_5637796_input_113592/k_reaction_5637796_species_113592)^2)*(1 + speciesreference_5637796_input_5637701/k_reaction_5637796_species_5637701))); reaction_5637796 is "Phosphorylation of SHC1 by p-5Y-EGFRvIII";  // reactome:R-HSA-5637796; isDescribedBy pubmed:8036006 pubmed:7535773; reactome:R-HSA-5637796; GO:0004713
  // Tyrosine residue Y992 (corresponding to Y1016 when counting from the first amino acid of the EGFR precursor, prior to cleavage of the 24-amino acid signal peptide at the N-terminus), a docking site for PLC-gamma 1 (PLCG1), is phosphorylated in EGFR cancer mutants and expected to recruit PLC-gamma 1 in the same way as the wild-type EGFR receptor. Phosphorylation of Y992 (corresponding to Y1016 when counting from the first amino acid of the EGFR precursor, prior to cleavage of the 24-amino acid signal peptide at the N-terminus) has been directly demonstrated for the following EGFR cancer mutants: EGFR L858R mutant (Sordella et al. 2004, Choi et al. 2007); EGFR G719S mutant (Choi et al. 2007); EGFR L747_P753delinsS mutant (Sordella et al. 2004, Choi et ak, 2007); EGFR L861Q mutant (Choi et al. 2007); EGFRvIII mutant (Grandal et al. 2007); EGFR A289V mutant (Lee et al. 2006); EGFR D770_N771insNPG mutant (Xu et al. 2007); EGFR N771_H773dup mutant (Xu et al. 2007); EGFR K739_I744dup mutant (Xu et al. 2007); EGFR A767_V769dup mutant (Xu et al. 2007).
  reaction_1247841: PLCG1_plasma_membrane + species_1181062 => species_1247845; k_forcat_reaction_1247841*PLCG1_plasma_membrane*species_1181062; reaction_1247841 is "PLCG1 binds to ligand-responsive p-6Y-EGFR mutants";  // reactome:R-HSA-1247841; isDescribedBy pubmed:15284455 pubmed:17712310 pubmed:16953218 pubmed:16187797; reactome:R-HSA-1247841; occursIn DOID:162
  // Upon dimerization, EGFRvIII mutants trans-autophosphorylate on tyrosine residues Y1016 i.e. Y992 in the mature protein, Y1092 i.e. Y1068 in the mature protein, Y1110 i.e. Y0186 in the mature protein, Y1172 i.e. Y1148 in the mature protein and Y1197 i.e. Y1173 in the mature protein, while the tyrosine residue Y1069 i.e. Y1045 in the mature protein, a docking site for CBL, remains either unphosphorylated or hypophosphorylated, allowing EGFRvIII to activate downstream signaling cascades while escaping downregulation.
  reaction_1248655: 10 ATP_cytosol + species_1248010 => 10 ADP_cytosol + species_1248654; species_1248010*1*(k_forcat_reaction_1248655*(speciesreference_1248655_input_113592/k_reaction_1248655_species_113592)^10*(speciesreference_1248655_input_1248010/k_reaction_1248655_species_1248010)^1/((1 + speciesreference_1248655_input_113592/k_reaction_1248655_species_113592 + (speciesreference_1248655_input_113592/k_reaction_1248655_species_113592)^2 + (speciesreference_1248655_input_113592/k_reaction_1248655_species_113592)^3 + (speciesreference_1248655_input_113592/k_reaction_1248655_species_113592)^4 + (speciesreference_1248655_input_113592/k_reaction_1248655_species_113592)^5 + (speciesreference_1248655_input_113592/k_reaction_1248655_species_113592)^6 + (speciesreference_1248655_input_113592/k_reaction_1248655_species_113592)^7 + (speciesreference_1248655_input_113592/k_reaction_1248655_species_113592)^8 + (speciesreference_1248655_input_113592/k_reaction_1248655_species_113592)^9 + (speciesreference_1248655_input_113592/k_reaction_1248655_species_113592)^10)*(1 + speciesreference_1248655_input_1248010/k_reaction_1248655_species_1248010))); reaction_1248655 is "Trans-autophosphorylation of EGFRvIII mutant dimers";  // reactome:R-HSA-1248655; isDescribedBy pubmed:16969069 pubmed:17646646; reactome:R-HSA-1248655; GO:0004713
  // Direct binding of GRB2:SOS1 complex to phosphorylated homodimers of EGFRvIII cancer mutant has not been tested. GRB2 binds to phosphorylated tyrosine residues Y1068 and Y1086 (corresponding to Y1092 and Y1110, respectively, when counting from the first amino acid of the EGFR precursor, prior to cleavage of the 24-amino acid signal peptide at the N-terminus). Phosphorylation of Y1068 (i.e. Y1092) has been directly demonstrated in EGFRvIII mutant (Huang et al. 2007).
  reaction_5637770: GRB2_1_SOS1_cytosol + species_1248654 => species_5637697; k_forcat_reaction_5637770*GRB2_1_SOS1_cytosol*species_1248654; reaction_5637770 is "Binding of GRB2:SOS1 complex to phosphorylated EGFRvIII";  // reactome:R-HSA-5637770; isDescribedBy pubmed:17646646; reactome:R-HSA-5637770; occursIn DOID:162
  // Once recruited, PLC-gamma 1 is assumed to be phosphorylated by EGFR cancer mutants in the same way it is phosphorylated by the wild-type EGFR.
  reaction_1247844: species_1247845 + 4 ATP_cytosol => species_1247846 + 4 ADP_cytosol; species_1247845*1*(k_forcat_reaction_1247844*(speciesreference_1247844_input_1247845/k_reaction_1247844_species_1247845)^1*(speciesreference_1247844_input_113592/k_reaction_1247844_species_113592)^4/((1 + speciesreference_1247844_input_1247845/k_reaction_1247844_species_1247845)*(1 + speciesreference_1247844_input_113592/k_reaction_1247844_species_113592 + (speciesreference_1247844_input_113592/k_reaction_1247844_species_113592)^2 + (speciesreference_1247844_input_113592/k_reaction_1247844_species_113592)^3 + (speciesreference_1247844_input_113592/k_reaction_1247844_species_113592)^4))); reaction_1247844 is "Phosphorylation of PLCG1 by ligand-responsive p-6Y-EGFR mutants";  // reactome:R-HSA-1247844; isDescribedBy pubmed:2472219 pubmed:1689311; reactome:R-HSA-1247844; GO:0004713
  // Once phosphorylated, PLC-gamma 1 is expected to dissociate from phosphorylated EGFR cancer mutants and induce downstream signaling in the same way it does when activated by the wild-type EGFR. However, except for the phosphorylation of PLCG1 binding site in EGFR cancer mutants, other events involved in activation of PLCG1 signaling have not been studied in cells expressing EGFR cancer mutants.
  reaction_1247842: species_1247846 => p_4Y_PLCG1_plasma_membrane + species_1181062; k_forcat_reaction_1247842*species_1247846; reaction_1247842 is "Dissociation of phosphorylated PLCG1 from ligand-responsive p-6Y-EGFR mutants";  // reactome:R-HSA-1247842; isDescribedBy pubmed:15284455; reactome:R-HSA-1247842; occursIn DOID:162
  // Phosphorylated CBL does not ubiquitinate EGFR kinase domain mutants efficiently, which enables mutant proteins to escape degradation. There are indications that phosphorylated CBL shows decreased affinity for EGFR kinase domain mutants compared to wild-type EGFR proteins, and quickly dissociates, before ubiquitination is completed. This decreased affinity may be due to altered structure of EGFR kinase domain mutants or to the presence of the chaperone protein HSP90 in complex with the mutant protein. Weaker afinity for phosphorylated CBL was directly demonstrated for EGFR L858R mutant (Yang et al. 2006), and poor ubiquitination inspite of CBL binding was shown for EGFR L858R and EGFR E746_A750del mutants (Yang et al. 2006, Padron et al. 2007). Association of HSP90 with active dimers of phospho-EGFR KD mutants negatively affects phospho-CBL-mediated ubiquitination of EGFR. Binding of HSP90 may decrease the affinity of active dimers of phospho-EGFR KD mutants for phospho-CBL, so that CBL dissociates from the complex upon phosphorylation and cannot perform ubiquitination.
  reaction_1225956: 2 Ub_cytosol + species_1225857 => ; species_1225857*(k_inhibitor_modifierspeciesreference_1225956_negativeregulator_1225855/(k_inhibitor_modifierspeciesreference_1225956_negativeregulator_1225855 + species_1225855))*(k_forcat_reaction_1225956*(speciesreference_1225956_input_113595/k_reaction_1225956_species_113595)^2*(speciesreference_1225956_input_1225857/k_reaction_1225956_species_1225857)^1/((1 + speciesreference_1225956_input_113595/k_reaction_1225956_species_113595 + (speciesreference_1225956_input_113595/k_reaction_1225956_species_113595)^2)*(1 + speciesreference_1225956_input_1225857/k_reaction_1225956_species_1225857))); reaction_1225956 is "Inefficient ubiquitination of ligand-responsive p-6Y-EGFR mutants by p-Y371-CBL";  // modifiers: species_1225855; reactome:R-HSA-1225956; isDescribedBy pubmed:17699773 pubmed:16849543; reactome:R-HSA-1225956; GO:0061630
  // Recruitment of GRB2:SOS1 complex by SHC1 bound to phosphorylated dimers of EGFRvIII cancer mutant has not been directly tested, but is assumed to happen in the same way it happens with the SHC1 bound to the phosphorylated homodimer of wild-type EGFR (Chardin et al. 1993).
  reaction_5637798: species_5637703 + GRB2_1_SOS1_cytosol => species_5637704; k_forcat_reaction_5637798*species_5637703*GRB2_1_SOS1_cytosol; reaction_5637798 is "Phosphorylated SHC1 in complex with p-5Y-EGFRvIII recruits GRB2:SOS1 complex";  // reactome:R-HSA-5637798; isDescribedBy pubmed:8493579; reactome:R-HSA-5637798; occursIn DOID:162
  // Ligand-responsive EGFR mutants are able to bind EGF and exhibit increased activity in the presence of EGF.
  reaction_1220612: EGF_extracellular_region + species_1218825 => species_1220578; k_forcat_reaction_1220612*EGF_extracellular_region*species_1218825; reaction_1220612 is "Binding of EGF to ligand-responsive EGFR mutants";  // reactome:R-HSA-1220612; isDescribedBy pubmed:16187797 pubmed:17177598; reactome:R-HSA-1220612; occursIn DOID:162
  // SOS1 is the guanine nucleotide exchange factor (GEF) for RAS. SOS1, recruited by GRB2 bound to p-SHC1:p-EGFR mutants, is assumed to activate RAS nucleotide exchange from the inactive form (bound to GDP) to an active form (bound to GTP). Although this reaction has not been shown to occur directly for EGFR cancer mutants, activation of RAF/MAP kinase cascade, through detection of phosphorylated ERK1/2, has been demonstrated in cells expressing EGFR L858R mutant (Sordella et al. 2004, Paez et al. 2004, Shimamura et al. 2005), EGFR E746_A750 mutant (Sordella et al. 2004, Shimamura et al. 2005), EGFR L747_P753delinS mutant (Sordella et al. 2004), and EGFR E746_A750del;T790M double mutant (Shimamura et al. 2005).
  reaction_1225957: p21_RAS_GDP_plasma_membrane + GTP_cytosol => p21_RAS_GTP_plasma_membrane + GDP_cytosol; species_1225856*1*(k_forcat_reaction_1225957*(speciesreference_1225957_input_109796/k_reaction_1225957_species_109796)^1*(speciesreference_1225957_input_29438/k_reaction_1225957_species_29438)^1/((1 + speciesreference_1225957_input_109796/k_reaction_1225957_species_109796)*(1 + speciesreference_1225957_input_29438/k_reaction_1225957_species_29438))); reaction_1225957 is "SOS-mediated nucleotide exchange of RAS (mediated by GRB2:SOS1 in complex with phosphorylated SHC1 and ligand-responsive p-6Y-EGFR mutants)";  // modifiers: species_1225856; reactome:R-HSA-1225957; isDescribedBy pubmed:15284455 pubmed:16024644 pubmed:15118125; reactome:R-HSA-1225957; GO:0005085
  // Direct binding of the GRB2:GAB1 complex to phosphorylated homodimers of EGFRvIII cancer mutant has not been tested. This complex is recruted to EGFR via GRB2 binding to phosphorylated tyrosine residues Y1068 and Y1086 (corresponding to Y1092 and Y1110, respectively, when counting from the first amino acid of the EGFR precursor, prior to cleavage of the 24-amino acid signal peptide at the N-terminus). Phosphorylation of Y1068 (i.e. Y1092) has been directly demonstrated in EGFRvIII mutant (Huang et al. 2007).
  reaction_5637764: GRB2_GAB1_cytosol + species_1248654 => species_5637694; k_forcat_reaction_5637764*GRB2_GAB1_cytosol*species_1248654; reaction_5637764 is "Binding of GRB2:GAB1 complex to p-EGFRvIII mutant";  // reactome:R-HSA-5637764; isDescribedBy pubmed:17646646; reactome:R-HSA-5637764; occursIn DOID:162
  // Benzoquinoid ansamycins (geldanamycin, herbimycin, and geldanamycin derivatives 17-AAG, 17-DMAG and IPI-504) are antitumor antibiotics that inactivate HSP90 by binding to its substrate-binding pocket.
  reaction_1218824: 2 Benzoquinoid_ansamycins_cytosol + HSP90_cytosol => species_1218829; k_forcat_reaction_1218824*Benzoquinoid_ansamycins_cytosol^2*HSP90_cytosol; reaction_1218824 is "HSP90 is inactivated by binding to benzaquinoid ansamycins";  // reactome:R-HSA-1218824; isDescribedBy pubmed:9108479; reactome:R-HSA-1218824; occursIn DOID:162
  // Recruitment of GRB2:SOS1 complex by SHC1 bound to phosphorylated dimers of EGFR cancer mutants has not been directly tested, but is assumed to happen in the same way it happens with the SHC1 bound to the phosphorylated homodimer of wild-type EGFR.
  reaction_1225961: GRB2_1_SOS1_cytosol + species_1225854 => species_1225856; k_forcat_reaction_1225961*GRB2_1_SOS1_cytosol*species_1225854; reaction_1225961 is "Phosphorylated SHC1 in complex with ligand-responsive p-6Y-EGFR mutants recruits GRB2:SOS1 complex";  // reactome:R-HSA-1225961; isDescribedBy pubmed:8493579; reactome:R-HSA-1225961; isDescribedBy pubmed:15284455
  // Tyrosine residue Y992 (corresponding to Y1016 when counting from the first amino acid of the EGFR precursor, prior to cleavage of the 24-amino acid signal peptide at the N-terminus), a docking site for PLC-gamma 1 (PLCG1), is phosphorylated in EGFRvIII cancer mutant and expected to recruit PLC-gamma 1 in the same way as the wild-type EGFR receptor (Grandal et al. 2007).
  reaction_5637792: PLCG1_plasma_membrane + species_1248654 => species_5637698; k_forcat_reaction_5637792*PLCG1_plasma_membrane*species_1248654; reaction_5637792 is "PLC-gamma 1 binds to p-EGFRvIII mutant";  // reactome:R-HSA-5637792; isDescribedBy pubmed:17372273; reactome:R-HSA-5637792; occursIn DOID:162
  // EGFRvIII cancer mutant is assumed to recruit the PI3K complex PIK3CA:PIK3R1 in a manner similar to wild-type EGFR (Rodrigues et al. 2000).
  reaction_5637765: species_5637694 + PIK3CA_PIK3R1_cytosol => species_5637693; k_forcat_reaction_5637765*species_5637694*PIK3CA_PIK3R1_cytosol; reaction_5637765 is "Binding of PI3K to complex of GRB2:GAB1 and p-EGFRvIII";  // reactome:R-HSA-5637765; isDescribedBy pubmed:10648629; reactome:R-HSA-5637765; occursIn DOID:162
  // Based on the wild-type EGFR signaling, it is assumed that the guanine nucleotide exchange factor SOS1 interacts with phosphorylated EGFR mutants through the adaptor protein, GRB2. Upon formation of this complex, SOS1 activates RAS by promoting GDP release and GTP binding. Although this reaction has not been directly confirmed for EGFR cancer mutants, activation of RAF/MAP kinase cascade has been demonstrated, through detection of phosphorylated ERK1/2, in cells expressing EGFR L858R mutant (Sordella et al. 2004, Paez et al. 2004, Shimamura et al. 2005), EGFR E746_A750del mutant (Sordella et al. 2004, Shimamura et al. 2005), EGFR L747_P753delinsS mutant (Sordella et al. 2004) and EGFR E746_A750del;T790M double mutant (Shimamura et al. 2005).
  reaction_1225951: p21_RAS_GDP_plasma_membrane + GTP_cytosol => p21_RAS_GTP_plasma_membrane + GDP_cytosol; species_1225859*1*(k_forcat_reaction_1225951*(speciesreference_1225951_input_109796/k_reaction_1225951_species_109796)^1*(speciesreference_1225951_input_29438/k_reaction_1225951_species_29438)^1/((1 + speciesreference_1225951_input_109796/k_reaction_1225951_species_109796)*(1 + speciesreference_1225951_input_29438/k_reaction_1225951_species_29438))); reaction_1225951 is "SOS-mediated nucleotide exchange of RAS (mediated by GRB2:SOS1 in complex with ligand-responsive p-6Y-EGFR mutants)";  // modifiers: species_1225859; reactome:R-HSA-1225951; isDescribedBy pubmed:15284455 pubmed:16024644 pubmed:15118125; reactome:R-HSA-1225951; GO:0005085
  // Association of EGFRvIII mutant with HSP90 chaperone protein and its co-chaperone CDC37 is necessary for the proper functioning of mutant EGFR.
  reaction_1247999: CDC37_cytosol + EGFRvIII_plasma_membrane + HSP90_cytosol => species_1248004; k_forcat_reaction_1247999*CDC37_cytosol*EGFRvIII_plasma_membrane*HSP90_cytosol; reaction_1247999 is "EGFRvIII mutant binds chaperone proteins HSP90 and CDC37";  // reactome:R-HSA-1247999; isDescribedBy pubmed:12471035; reactome:R-HSA-1247999; occursIn DOID:162
  // The cytoplasmic domain of EGFR contains tyrosine, serine and threonine phosphorylation sites. Activation of ligand-responsive EGFR mutants through spontaneous or EGF-induced dimerization results in trans-autophosphorylation of 5 tyrosine residues (Y1016 i.e. Y992 in the mature protein, Y1092 i.e. Y1068 in the mature protein, Y1110 i.e. Y1086 in the mature protein,Y1172 i.e. Y1148 in the mature protein and Y1197 i.e. Y1173 in the mature protein), which enables constitutive receptor signaling as it provides specific binding sites for cytosolic target proteins involved in signal transduction (Zhang et al. 2006, Yun et al. 2007, Sordella et al. 2004, Lee et al. 2006). Tyrosine residue Y1069 i.e. Y1045 in the mature protein, involved in EGFR down-regulation, is usually phosphorylated in ligand-responsive EGFR mutants (Sordella et al. 2004, Lee et al. 2006). The exact phosphorylation pattern has not been examined for each mutant, but is assumed to closely follow, based on existing experimental evidence, the trans-autophosphorylation pattern of the wild-type EGFR.
  reaction_1169421: 12 ATP_cytosol + species_1220582 => 12 ADP_cytosol + species_1181062; species_1220582*1*(k_forcat_reaction_1169421*(speciesreference_1169421_input_113592/k_reaction_1169421_species_113592)^12*(speciesreference_1169421_input_1220582/k_reaction_1169421_species_1220582)^1/((1 + speciesreference_1169421_input_113592/k_reaction_1169421_species_113592 + (speciesreference_1169421_input_113592/k_reaction_1169421_species_113592)^2 + (speciesreference_1169421_input_113592/k_reaction_1169421_species_113592)^3 + (speciesreference_1169421_input_113592/k_reaction_1169421_species_113592)^4 + (speciesreference_1169421_input_113592/k_reaction_1169421_species_113592)^5 + (speciesreference_1169421_input_113592/k_reaction_1169421_species_113592)^6 + (speciesreference_1169421_input_113592/k_reaction_1169421_species_113592)^7 + (speciesreference_1169421_input_113592/k_reaction_1169421_species_113592)^8 + (speciesreference_1169421_input_113592/k_reaction_1169421_species_113592)^9 + (speciesreference_1169421_input_113592/k_reaction_1169421_species_113592)^10 + (speciesreference_1169421_input_113592/k_reaction_1169421_species_113592)^11 + (speciesreference_1169421_input_113592/k_reaction_1169421_species_113592)^12)*(1 + speciesreference_1169421_input_1220582/k_reaction_1169421_species_1220582))); reaction_1169421 is "Trans-autophosphorylation of activated ligand-responsive EGFR mutant dimers";  // reactome:R-HSA-1169421; isDescribedBy pubmed:17349580 pubmed:16777603 pubmed:15284455 pubmed:17177598; reactome:R-HSA-1169421; GO:0004713
  // Based on the wild-type EGFR signaling, it is assumed that the guanine nucleotide exchange factor SOS1 interacts with phosphorylated EGFRvIII mutant through the adaptor protein, GRB2. Upon formation of this complex, SOS1 activates RAS by promoting GDP release and GTP binding. Although this reaction has not been directly confirmed for EGFRvIII cancer mutant, RAS-MAPK signaling cascade is activated in cells expressing EGFRvIII (Montgomery et al.1995).
  reaction_5637806: p21_RAS_GDP_plasma_membrane + GTP_cytosol => p21_RAS_GTP_plasma_membrane + GDP_cytosol; species_5637697*1*(k_forcat_reaction_5637806*(speciesreference_5637806_input_109796/k_reaction_5637806_species_109796)^1*(speciesreference_5637806_input_29438/k_reaction_5637806_species_29438)^1/((1 + speciesreference_5637806_input_109796/k_reaction_5637806_species_109796)*(1 + speciesreference_5637806_input_29438/k_reaction_5637806_species_29438))); reaction_5637806 is "SOS-mediated nucleotide exchange of RAS (mediated by GRB2:SOS1 in complex with p-EGFRvIII)";  // modifiers: species_5637697; reactome:R-HSA-5637806; isDescribedBy pubmed:8530489; reactome:R-HSA-5637806; GO:0005085
  // EGFRvIII mutant lacks the ligand binding domain and is therefore unable to bind EGFR ligands, but is able to dimerize spontaneously. Self-dimerization may be dependent on N-linked glycosylation.
  reaction_1248002: 2 species_1248004 => species_1248010; k_forcat_reaction_1248002*species_1248004^2; reaction_1248002 is "Ligand-independent dimerization of EGFRvIII mutant";  // reactome:R-HSA-1248002; isDescribedBy pubmed:11087732; reactome:R-HSA-1248002; occursIn DOID:162
  // In EGFRvIII mutant, Y1069 (i.e. Y1045 in the mature protein) is not phosphorylated (Han et al. 2006, Grandal et al. 2007). Han et al. detected no CBL binding to EGFRvIII mutant (Han et al. 2006), while Grandal et al. detected very little binding, which they explained by indirect recruitment of CBL to EGFRvIII through GRB2 (Grandal et al. 2007).
  EGFRvIII_does_not_bind_CBL: species_1248654 + 2 CBL_cytosol => ; k_forcat_reaction_5637794*species_1248654*CBL_cytosol^2;  // reactome:R-HSA-5637794; isDescribedBy pubmed:16969069 pubmed:17372273; reactome:R-HSA-5637794; occursIn DOID:162
  // SHC1 (Src homology 2 domain-containing transforming protein) is known to bind two phosphorylated tyrosine docking sites of EGFR: Y1148 and Y1173 (corresponding to Y1172 and Y1197 when counting from the first amino acid of EGFR precursor, before the cleavage of the 24-amino acid signal peptide at the N-terminus takes place). Phosphorylation of Y1173 tyrosine residue was directly demonstrated in the following EGFR cancer mutants: EGFR L858R mutant (Sordella et al. 2004, Greulich et al. 2005); EGFR G719S mutant (Greulich et al. 2005); EGFR L747_P753delinsS mutant (Sordella et al. 2004); EGFR L747_A750delinsP (Greulich et al. 2005); EGFRvIII mutant (Han et al. 2006, Grandal et al. 2007); EGFR D770_N771insNPG mutant (Greulich et al. 2005, Xu et al. 2007); EGFR N771_H773dup mutant (Xu et al. 2007); EGFR K739_I744dup mutant (Xu et al. 2007); EGFR A767_V769dup mutant (Xu et al. 2007). Phosphorylation of Y1148 was shown in EGFRvIII mutant (Huang et al. 2007). Besides EGFR L858R mutant, which was directly shown to bind SHC1 (Greulich et al. 2005), binding of SHC1 was not tested in other EGFR cancer mutants. Nonetheless, it is assumed that SHC1 binds EGFR cancer mutants in the same way it binds wild-type EGFR.
  reaction_1225947: species_1181062 + SHC1_cytosol => species_1225858; k_forcat_reaction_1225947*species_1181062*SHC1_cytosol; reaction_1225947 is "Binding of SHC1 to p-6Y-EGFR mutants";  // reactome:R-HSA-1225947; isDescribedBy pubmed:15284455 pubmed:16187797 pubmed:17372273 pubmed:16969069; reactome:R-HSA-1225947; occursIn DOID:162
  // Although ligand-responsive EGFR mutants dimerize spontaneously, dimerization is increased in the presence of EGF.
  reaction_1220613: 2 species_1220578 => species_1500847; k_forcat_reaction_1220613*species_1220578^2; reaction_1220613 is "EGF-induced dimerization of ligand-responsive EGFR mutants";  // reactome:R-HSA-1220613; isDescribedBy pubmed:16777603 pubmed:16187797 pubmed:17349580 pubmed:19560417; reactome:R-HSA-1220613; occursIn DOID:162
  // EGFR cancer mutants are assumed to recruit the PI3K complex PIK3CA:PIK3R1 in a manner similar to wild-type EGFR.
  reaction_1226012: PIK3CA_PIK3R1_cytosol + species_1226015 => species_1226013; k_forcat_reaction_1226012*PIK3CA_PIK3R1_cytosol*species_1226015; reaction_1226012 is "Binding of PI3K to complex of GRB2:GAB1 and ligand-responsive p-6Y-EGFR mutants";  // reactome:R-HSA-1226012; isDescribedBy pubmed:15284455; reactome:R-HSA-1226012; occursIn DOID:162
  // Non-covalent (reversible) tyrosine kinase inhibitors (TKIs), erlotinib, gefitinib, lapatinib and vandetanib, selectively inhibit EGFR-stimulated tumor cell growth by blocking EGFR mutant autophosphorylation through competitive inhibition of ATP binding to the kinase domain. A number of EGFR kinase domain mutants and extracellular domain point mutants show increased senistivity to non-covalent TKIs compared with the wild-type EGFR. EGFR kinase domain mutants may be resistant to non-covalent TKIs due to primary or secondary mutations in the kinase domain that increase the affinity of the kinase domain for ATP, such as small insertions within exon 20, and substituion of threonine 790 with methionine (T790M).
  reaction_1220610: species_1220582 + 2 species_1216523 => species_1220585 + species_1220587; k_forcat_reaction_1220610*species_1220582*species_1216523^2; reaction_1220610 is "Non-covalent tyrosine kinase inhibitors bind and inactivate sensitive ligand-responsive EGFR cancer mutants";  // reactome:R-HSA-1220610; isDescribedBy pubmed:17349580 pubmed:17177598; reactome:R-HSA-1220610; occursIn DOID:162
  // The kinase activity of PI3K mediates the phosphorylation of PIP2 to form PIP3. It is assumed that EGFR cancer mutants induce PI3K/AKT signaling in a manner similar to wild-type EGFR. Phosphorylation of AKT on serine residue S473, and therby activation of PI3K/AKT signaling cascade, has been directly demonstrated in cells expressing the following EGFR cancer mutants: EGFR L858R mutant (Sordella et al. 2004, Paez et al. 2004, Greulich et al. 2005, Shimamura et al. 2005); EGFR G719S mutant (Greulich et al. 2005); EGFR E746_A750del mutant (Sordella et al. 2004, Shimamura et al. 2005); EGFR L747_P753insS mutant (Sordella et al. 2004); EGFR L747_A750delinsP mutant (Greulich et al. 2005); EGFR L861Q mutant (Lee et al. 2006); EGFR D770_N771insNPG mutant (Greulich et al. 2005, Xu et al. 2007); EGFR N771_H773dup mutant (Xu et al. 2007); EGFR K739_I744dup mutant (Xu et al. 2007); EGFR A767_V769dup mutant (Xu et al. 2007); EGFR E746_A750del;T790M double mutant (Shimamura et al. 2005).
  reaction_1226014: ATP_cytosol + PI_4_5_P2_plasma_membrane => PI_3_4_5_P3_plasma_membrane + ADP_cytosol; species_1226013*1*(k_forcat_reaction_1226014*(speciesreference_1226014_input_113592/k_reaction_1226014_species_113592)^1*(speciesreference_1226014_input_179856/k_reaction_1226014_species_179856)^1/((1 + speciesreference_1226014_input_113592/k_reaction_1226014_species_113592)*(1 + speciesreference_1226014_input_179856/k_reaction_1226014_species_179856))); reaction_1226014 is "Conversion of PIP2 to PIP3 by PI3K bound to ligand-responsive p-6Y-EGFR mutants";  // modifiers: species_1226013; reactome:R-HSA-1226014; isDescribedBy pubmed:15284455 pubmed:16024644 pubmed:17712310 pubmed:16187797; reactome:R-HSA-1226014; GO:0046934
end
